// SBML level 2 version 1

function min2(a, b)
  1/2*(a + b - abs(a - b));
end

function min4(a, b, c, d)
  min2(min2(a, b), min2(c, d));
end

model tRNAAminoacylation()
  // tRNAAminoacylation module

  // Compartments:
  compartment c = 1;
  compartment m = 1;
  compartment e = 1;

  // Species:
  species MG_001_MONOMER__c in c = 60/c; MG_001_MONOMER__c is "DNA polymerase III, beta subunit";
  species MG_003_MONOMER__c in c = 20/c; MG_003_MONOMER__c is "DNA gyrase, B subunit";
  species MG_004_MONOMER__c in c = 1/c; MG_004_MONOMER__c is "DNA gyrase, A subunit";
  species MG_005_MONOMER__c in c = 1/c; MG_005_MONOMER__c is "seryl-tRNA synthetase";
  species MG_006_MONOMER__c in c = 1/c; MG_006_MONOMER__c is "thymidylate kinase";
  species MG_007_MONOMER__c in c = 235/c; MG_007_MONOMER__c is "DNA polymerase III delta prime subunit, putative";
  species MG_008_MONOMER__c in c = 215/c; MG_008_MONOMER__c is "tRNA modification GTPase TrmE";
  species MG_013_MONOMER__c in c = 0; MG_013_MONOMER__c is "methylenetetrahydrofolate dehydrogenase/methylenetetrahydrofolate cyclohydrolase";
  species MG_014_MONOMER__m in m = 1/m; MG_014_MONOMER__m is "multidrug ABC transporter, ATP-binding/permease protein";
  species MG_015_MONOMER__m in m = 0; MG_015_MONOMER__m is "multidrug ABC transporter, ATP-binding/permease protein";
  species MG_019_MONOMER__c in c = 1/c; MG_019_MONOMER__c is "chaperone protein DnaJ";
  species MG_021_MONOMER__c in c = 0; MG_021_MONOMER__c is "methionyl-tRNA synthetase";
  species MG_022_MONOMER__c in c = 176/c; MG_022_MONOMER__c is "DNA-directed RNA polymerase, delta subunit";
  species MG_023_MONOMER__c in c = 1/c; MG_023_MONOMER__c is "fructose-1,6-bisphosphate aldolase, class II";
  species MG_029_MONOMER__c in c = 0; MG_029_MONOMER__c is "DJ-1/PfpI family protein";
  species MG_030_MONOMER__c in c = 0; MG_030_MONOMER__c is "uracil phosphoribosyltransferase";
  species MG_031_MONOMER__c in c = 9/c; MG_031_MONOMER__c is "DNA polymerase III, alpha subunit, Gram-positive type";
  species MG_033_MONOMER__m in m = 0; MG_033_MONOMER__m is "glycerol uptake facilitator";
  species MG_034_MONOMER__c in c = 1/c; MG_034_MONOMER__c is "thymidine kinase";
  species MG_035_MONOMER__c in c = 0; MG_035_MONOMER__c is "histidyl-tRNA synthetase";
  species MG_036_MONOMER__c in c = 0; MG_036_MONOMER__c is "aspartyl-tRNA synthetase";
  species MG_038_MONOMER__c in c = 3/c; MG_038_MONOMER__c is "glycerol kinase";
  species MG_039_MONOMER__c in c = 0; MG_039_MONOMER__c is "FAD-dependent glycerol-3-phosphate dehydrogenase, putative";
  species MG_040_MONOMER__e in e = 0; MG_040_MONOMER__e is "Monosaccharide (riboside/galactoside) ABC transporter, substrate binding protein";
  species MG_041_MONOMER__c in c = 51/c; MG_041_MONOMER__c is "PTS system, HPr";
  species MG_042_MONOMER__c in c = 1/c; MG_042_MONOMER__c is "spermidine/putrescine (polyamine) ABC transporter, ATP-binding protein, putative";
  species MG_043_MONOMER__m in m = 23/m; MG_043_MONOMER__m is "spermidine/putrescine (polyamine) ABC transporter, permease protein, putative";
  species MG_044_MONOMER__m in m = 31/m; MG_044_MONOMER__m is "spermidine/putrescine (polyamine) ABC transporter, permease protein, putative";
  species MG_045_MONOMER__e in e = 3/e; MG_045_MONOMER__e is "spermidine/putrescine (polyamine) ABC transporter, spermidine/putrescine binding protein, putative";
  species MG_046_MONOMER__c in c = 0; MG_046_MONOMER__c is "metalloendopeptidase";
  species MG_047_MONOMER__c in c = 1/c; MG_047_MONOMER__c is "S-adenosylmethionine synthetase";
  species MG_048_MONOMER__c in c = 6/c; MG_048_MONOMER__c is "signal recognition particle protein";
  species MG_049_MONOMER__c in c = 4/c; MG_049_MONOMER__c is "purine nucleoside phosphorylase";
  species MG_051_MONOMER__c in c = 1/c; MG_051_MONOMER__c is "pyrimidine-nucleoside phosphorylase";
  species MG_052_MONOMER__c in c = 1/c; MG_052_MONOMER__c is "cytidine deaminase";
  species MG_053_MONOMER__c in c = 0; MG_053_MONOMER__c is "phosphoglucomutase/phosphomannomutase, putative";
  species MG_055_MONOMER__m in m = 255/m; MG_055_MONOMER__m is "preprotein translocase, SecE subunit";
  species MG_473_MONOMER__c in c = 133/c; MG_473_MONOMER__c is "ribosomal protein L33 type 2";
  species MG_058_MONOMER__c in c = 5/c; MG_058_MONOMER__c is "ribose-phosphate pyrophosphokinase";
  species MG_062_MONOMER__m in m = 34/m; MG_062_MONOMER__m is "PTS system, fructose-specific IIABC component";
  species MG_063_MONOMER__c in c = 1/c; MG_063_MONOMER__c is "1-phosphofructokinase, putative";
  species MG_064_MONOMER__m in m = 26/m; MG_064_MONOMER__m is "ABC transporter, permease protein, putative";
  species MG_065_MONOMER__c in c = 1/c; MG_065_MONOMER__c is "ABC transporter, ATP-binding protein";
  species MG_066_MONOMER__c in c = 0; MG_066_MONOMER__c is "transketolase";
  species MG_069_MONOMER__m in m = 31/m; MG_069_MONOMER__m is "PTS system, glucose-specific IIABC component";
  species MG_070_MONOMER__c in c = 127/c; MG_070_MONOMER__c is "ribosomal protein S2";
  species MG_072_MONOMER__c in c = 0; MG_072_MONOMER__c is "preprotein translocase, SecA subunit";
  species MG_073_MONOMER__c in c = 0; MG_073_MONOMER__c is "excinuclease ABC, B subunit";
  species MG_077_MONOMER__m in m = 29/m; MG_077_MONOMER__m is "oligopeptide ABC transporter, permease protein";
  species MG_078_MONOMER__m in m = 30/m; MG_078_MONOMER__m is "oligopeptide ABC transporter, permease protein";
  species MG_079_MONOMER__c in c = 19/c; MG_079_MONOMER__c is "oligopeptide ABC transporter, ATP-binding protein";
  species MG_080_MONOMER__c in c = 22/c; MG_080_MONOMER__c is "oligopeptide ABC transporter, ATP-binding protein";
  species MG_081_MONOMER__c in c = 128/c; MG_081_MONOMER__c is "ribosomal protein L11";
  species MG_082_MONOMER__c in c = 128/c; MG_082_MONOMER__c is "ribosomal protein L1";
  species MG_084_MONOMER__c in c = 3/c; MG_084_MONOMER__c is "tRNA(Ile)-lysidine synthetase";
  species MG_085_MONOMER__c in c = 2/c; MG_085_MONOMER__c is "HPr(Ser) kinase/phosphatase";
  species MG_087_MONOMER__c in c = 209/c; MG_087_MONOMER__c is "ribosomal protein S12";
  species MG_088_MONOMER__c in c = 164/c; MG_088_MONOMER__c is "ribosomal protein S7";
  species MG_089_MONOMER__c in c = 1/c; MG_089_MONOMER__c is "translation elongation factor G";
  species MG_090_MONOMER__c in c = 120/c; MG_090_MONOMER__c is "ribosomal protein S6";
  species MG_091_MONOMER__c in c = 0; MG_091_MONOMER__c is "single-strand binding protein family";
  species MG_092_MONOMER__c in c = 119/c; MG_092_MONOMER__c is "ribosomal protein S18";
  species MG_093_MONOMER__c in c = 163/c; MG_093_MONOMER__c is "ribosomal protein L9";
  species MG_094_MONOMER__c in c = 3/c; MG_094_MONOMER__c is "replicative DNA helicase";
  species MG_098_MONOMER__c in c = 13/c; MG_098_MONOMER__c is "glutamyl-tRNA(Gln) and/or aspartyl-tRNA(Asn) amidotransferase, C subunit";
  species MG_099_MONOMER__c in c = 17/c; MG_099_MONOMER__c is "glutamyl-tRNA(Gln) and/or aspartyl-tRNA(Asn) amidotransferase, A subunit";
  species MG_100_MONOMER__c in c = 0; MG_100_MONOMER__c is "glutamyl-tRNA(Gln) and/or aspartyl-tRNA(Asn) amidotransferase, B subunit";
  species MG_102_MONOMER__c in c = 0; MG_102_MONOMER__c is "thioredoxin-disulfide reductase";
  species MG_476_MONOMER__m in m = 0; MG_476_MONOMER__m is "preprotein translocase, SecG subunit";
  species MG_105_MONOMER__c in c = 4/c; MG_105_MONOMER__c is "putative DNA integrity scanning protein";
  species MG_106_MONOMER__c in c = 0; MG_106_MONOMER__c is "peptide deformylase";
  species MG_107_MONOMER__c in c = 1/c; MG_107_MONOMER__c is "guanylate kinase";
  species MG_109_MONOMER__m in m = 0; MG_109_MONOMER__m is "serine/threonine protein kinase, putative";
  species MG_111_MONOMER__c in c = 0; MG_111_MONOMER__c is "glucose-6-phosphate isomerase";
  species MG_112_MONOMER__c in c = 0; MG_112_MONOMER__c is "ribulose-phosphate 3-epimerase";
  species MG_113_MONOMER__c in c = 0; MG_113_MONOMER__c is "asparaginyl-tRNA synthetase";
  species MG_114_MONOMER__m in m = 1/m; MG_114_MONOMER__m is "CDP-diacylglycerol--glycerol-3-phosphate 3-phosphatidyltransferase";
  species MG_118_MONOMER__c in c = 1/c; MG_118_MONOMER__c is "UDP-glucose 4-epimerase";
  species MG_119_MONOMER__c in c = 37/c; MG_119_MONOMER__c is "Monosaccharide (riboside/galactoside) ABC transporter, ATP-binding protein";
  species MG_120_MONOMER__m in m = 139/m; MG_120_MONOMER__m is "Monosaccharide (riboside/galactoside) ABC transporter, permease protein";
  species MG_121_MONOMER__m in m = 155/m; MG_121_MONOMER__m is "Monosaccharide (riboside/galactoside) ABC transporter, permease protein";
  species MG_123_MONOMER__m in m = 1/m; MG_123_MONOMER__m is "arginine deaminasse";
  species MG_124_MONOMER__c in c = 28/c; MG_124_MONOMER__c is "thioredoxin";
  species MG_126_MONOMER__c in c = 1/c; MG_126_MONOMER__c is "tryptophanyl-tRNA synthetase";
  species MG_127_MONOMER__c in c = 73/c; MG_127_MONOMER__c is "Spx subfamily protein";
  species MG_128_MONOMER__c in c = 3/c; MG_128_MONOMER__c is "inorganic polyphosphate/ATP-NAD kinase, probable";
  species MG_132_MONOMER__c in c = 0; MG_132_MONOMER__c is "purine nucleoside phosphoramidase";
  species MG_136_MONOMER__c in c = 0; MG_136_MONOMER__c is "lysyl-tRNA synthetase";
  species MG_137_MONOMER__c in c = 0; MG_137_MONOMER__c is "UDP-galactopyranose mutase";
  species MG_139_MONOMER__c in c = 0; MG_139_MONOMER__c is "ribonuclease J";
  species MG_150_MONOMER__c in c = 131/c; MG_150_MONOMER__c is "ribosomal protein S10";
  species MG_151_MONOMER__c in c = 146/c; MG_151_MONOMER__c is "ribosomal protein L3";
  species MG_152_MONOMER__c in c = 147/c; MG_152_MONOMER__c is "ribosomal protein L4/L1 family";
  species MG_153_MONOMER__c in c = 142/c; MG_153_MONOMER__c is "ribosomal protein L23";
  species MG_154_MONOMER__c in c = 159/c; MG_154_MONOMER__c is "ribosomal protein L2";
  species MG_155_MONOMER__c in c = 130/c; MG_155_MONOMER__c is "ribosomal protein S19";
  species MG_156_MONOMER__c in c = 145/c; MG_156_MONOMER__c is "ribosomal protein L22";
  species MG_157_MONOMER__c in c = 128/c; MG_157_MONOMER__c is "ribosomal protein S3";
  species MG_158_MONOMER__c in c = 146/c; MG_158_MONOMER__c is "ribosomal protein L16";
  species MG_159_MONOMER__c in c = 159/c; MG_159_MONOMER__c is "ribosomal protein L29";
  species MG_160_MONOMER__c in c = 130/c; MG_160_MONOMER__c is "ribosomal protein S17";
  species MG_161_MONOMER__c in c = 168/c; MG_161_MONOMER__c is "ribosomal protein L14";
  species MG_162_MONOMER__c in c = 128/c; MG_162_MONOMER__c is "ribosomal protein L24";
  species MG_163_MONOMER__c in c = 161/c; MG_163_MONOMER__c is "ribosomal protein L5";
  species MG_164_MONOMER__c in c = 97/c; MG_164_MONOMER__c is "ribosomal protein S14";
  species MG_165_MONOMER__c in c = 89/c; MG_165_MONOMER__c is "ribosomal protein S8";
  species MG_166_MONOMER__c in c = 122/c; MG_166_MONOMER__c is "ribosomal protein L6";
  species MG_167_MONOMER__c in c = 94/c; MG_167_MONOMER__c is "ribosomal protein L18";
  species MG_168_MONOMER__c in c = 105/c; MG_168_MONOMER__c is "ribosomal protein S5";
  species MG_169_MONOMER__c in c = 121/c; MG_169_MONOMER__c is "ribosomal protein L15";
  species MG_170_MONOMER__m in m = 3/m; MG_170_MONOMER__m is "preprotein translocase, SecY subunit";
  species MG_174_MONOMER__c in c = 168/c; MG_174_MONOMER__c is "ribosomal protein L36";
  species MG_175_MONOMER__c in c = 120/c; MG_175_MONOMER__c is "ribosomal protein S13";
  species MG_176_MONOMER__c in c = 113/c;
  species MG_177_MONOMER__c in c = 126/c; MG_177_MONOMER__c is "DNA-directed RNA polymerase, alpha subunit";
  species MG_178_MONOMER__c in c = 149/c; MG_178_MONOMER__c is "ribosomal protein L17";
  species MG_179_MONOMER__c in c = 8/c; MG_179_MONOMER__c is "metal ion (cobalt) ABC transporter, ATP-binding protein, putative";
  species MG_180_MONOMER__c in c = 25/c; MG_180_MONOMER__c is "metal ion (cobalt) ABC transporter, ATP-binding protein, putative";
  species MG_181_MONOMER__m in m = 1/m; MG_181_MONOMER__m is "metal ion (cobalt) ABC transporter, permease protein";
  species MG_182_MONOMER__c in c = 1/c; MG_182_MONOMER__c is "tRNA pseudouridine synthase A";
  species MG_184_MONOMER__c in c = 1/c; MG_184_MONOMER__c is "adenine-specific DNA modification methylase";
  species MG_186_MONOMER__e in e = 6/e; MG_186_MONOMER__e is "Oligosaccharide or polyol ABC transporter, substrate binding protein";
  species MG_187_MONOMER__c in c = 0; MG_187_MONOMER__c is "Oligosaccharide or polyol ABC transporter, ATP-binding protein";
  species MG_188_MONOMER__m in m = 15/m; MG_188_MONOMER__m is "Oligosaccharide or polyol ABC transporter, permease protein";
  species MG_189_MONOMER__m in m = 17/m; MG_189_MONOMER__m is "Oligosaccharide or polyol ABC transporter, permease protein";
  species MG_194_MONOMER__c in c = 0; MG_194_MONOMER__c is "phenylalanyl-tRNA synthetase, alpha subunit";
  species MG_195_MONOMER__c in c = 8/c; MG_195_MONOMER__c is "phenylalanyl-tRNA synthetase, beta subunit";
  species MG_196_MONOMER__c in c = 206/c; MG_196_MONOMER__c is "translation initiation factor IF-3";
  species MG_197_MONOMER__c in c = 146/c; MG_197_MONOMER__c is "ribosomal protein L35";
  species MG_198_MONOMER__c in c = 142/c; MG_198_MONOMER__c is "ribosomal protein L20";
  species MG_201_MONOMER__c in c = 0; MG_201_MONOMER__c is "co-chaperone GrpE";
  species MG_203_MONOMER__c in c = 1/c; MG_203_MONOMER__c is "DNA topoisomerase IV, B subunit";
  species MG_204_MONOMER__c in c = 2/c; MG_204_MONOMER__c is "DNA topoisomerase IV, A subunit";
  species MG_205_MONOMER__c in c = 1/c; MG_205_MONOMER__c is "heat-inducible transcription repressor HrcA, putative";
  species MG_206_MONOMER__c in c = 7/c; MG_206_MONOMER__c is "excinuclease ABC, C subunit";
  species MG_208_MONOMER__c in c = 0; MG_208_MONOMER__c is "glycoprotease";
  species MG_481_MONOMER__c in c = 119/c; MG_481_MONOMER__c is "30S ribosomal protein S21";
  species MG_482_MONOMER__c in c = 0; MG_482_MONOMER__c is "holo-(acyl-carrier-protein) synthase";
  species MG_213_MONOMER__c in c = 0; MG_213_MONOMER__c is "segregation and condensation protein A";
  species MG_214_MONOMER__c in c = 4/c; MG_214_MONOMER__c is "segregation and condensation protein B";
  species MG_215_MONOMER__c in c = 2/c; MG_215_MONOMER__c is "6-phosphofructokinase";
  species MG_216_MONOMER__c in c = 2/c; MG_216_MONOMER__c is "pyruvate kinase";
  species MG_221_MONOMER__c in c = 6/c; MG_221_MONOMER__c is "mraZ protein";
  species MG_224_MONOMER__c in c = 0; MG_224_MONOMER__c is "cell division protein FtsZ";
  species MG_225_MONOMER__m in m = 1/m; MG_225_MONOMER__m is "amino acid-polyamine-organocation (APC) permease";
  species MG_226_MONOMER__m in m = 1/m; MG_226_MONOMER__m is "amino acid-polyamine-organocation (APC) permease";
  species MG_227_MONOMER__c in c = 0; MG_227_MONOMER__c is "thymidylate synthase";
  species MG_228_MONOMER__c in c = 3/c; MG_228_MONOMER__c is "dihydrofolate reductase";
  species MG_229_MONOMER__c in c = 2/c; MG_229_MONOMER__c is "ribonucleoside-diphosphate reductase, beta chain";
  species MG_231_MONOMER__c in c = 0; MG_231_MONOMER__c is "ribonucleoside-diphosphate reductase, alpha chain";
  species MG_232_MONOMER__c in c = 136/c; MG_232_MONOMER__c is "ribosomal protein L21";
  species MG_234_MONOMER__c in c = 127/c; MG_234_MONOMER__c is "ribosomal protein L27";
  species MG_239_MONOMER__c in c = 5/c; MG_239_MONOMER__c is "ATP-dependent protease La";
  species MG_240_MONOMER__c in c = 3/c; MG_240_MONOMER__c is "nicotinamide-nucleotide adenylyltransferase/conserved hypothetical protein";
  species MG_244_MONOMER__c in c = 1/c; MG_244_MONOMER__c is "3-5' helicase";
  species MG_249_MONOMER__c in c = 13/c; MG_249_MONOMER__c is "RNA polymerase sigma factor RpoD";
  species MG_250_MONOMER__c in c = 33/c; MG_250_MONOMER__c is "DNA primase";
  species MG_251_MONOMER__c in c = 1/c; MG_251_MONOMER__c is "glycyl-tRNA synthetase";
  species MG_252_MONOMER__c in c = 0; MG_252_MONOMER__c is "23S rRNA methyltransferase; G2251";
  species MG_257_MONOMER__c in c = 114/c; MG_257_MONOMER__c is "ribosomal protein L31";
  species MG_259_MONOMER__c in c = 2/c; MG_259_MONOMER__c is "modification methylase";
  species MG_261_MONOMER__c in c = 0; MG_261_MONOMER__c is "DNA polymerase III, alpha subunit";
  species MG_265_MONOMER__c in c = 1/c; MG_265_MONOMER__c is "sugar phosphatase";
  species MG_271_MONOMER__c in c = 628/c; MG_271_MONOMER__c is "dihydrolipoamide dehydrogenase";
  species MG_272_MONOMER__c in c = 91/c; MG_272_MONOMER__c is "dihydrolipoamide acetyltransferase";
  species MG_273_MONOMER__c in c = 34/c; MG_273_MONOMER__c is "pyruvate dehydrogenase component E1, beta subunit";
  species MG_274_MONOMER__c in c = 38/c; MG_274_MONOMER__c is "pyruvate dehydrogenase component E1, alpha subunit";
  species MG_275_MONOMER__m in m = 3/m; MG_275_MONOMER__m is "NADH oxidase";
  species MG_276_MONOMER__c in c = 0; MG_276_MONOMER__c is "adenine phosphoribosyltransferase";
  species MG_277_MONOMER__m in m = 43/m; MG_277_MONOMER__m is "Protein-export membrane protein secDF";
  species MG_278_MONOMER__c in c = 1/c; MG_278_MONOMER__c is "GTP diphosphokinase";
  species MG_283_MONOMER__c in c = 1/c; MG_283_MONOMER__c is "prolyl-tRNA synthetase";
  species MG_287_MONOMER__c in c = 48/c; MG_287_MONOMER__c is "acyl carrier protein";
  species MG_289_MONOMER__e in e = 38/e; MG_289_MONOMER__e is "phosphonate ABC transporter, substrate binding protein (P37), putative";
  species MG_290_MONOMER__c in c = 1/c; MG_290_MONOMER__c is "phosphonate ABC transporter, ATP-binding protein, putative";
  species MG_291_MONOMER__m in m = 25/m; MG_291_MONOMER__m is "phosphonate ABC transporter, permease protein (P69), putative";
  species MG_292_MONOMER__c in c = 2/c; MG_292_MONOMER__c is "alanyl-tRNA synthetase";
  species MG_293_MONOMER__c in c = 1/c; MG_293_MONOMER__c is "glycerophosphoryl diester phosphodiesterase";
  species MG_295_MONOMER__c in c = 39/c; MG_295_MONOMER__c is "tRNA U34 sulfurtransferase";
  species MG_298_MONOMER__c in c = 7/c; MG_298_MONOMER__c is "chromosome segregation protein SMC";
  species MG_299_MONOMER__c in c = 0; MG_299_MONOMER__c is "phosphate acetyltransferase";
  species MG_301_MONOMER__c in c = 2/c; MG_301_MONOMER__c is "glyceraldehyde-3-phosphate dehydrogenase, type I";
  species MG_302_MONOMER__m in m = 1/m; MG_302_MONOMER__m is "metal ion (cobalt) ABC transporter, permease protein, putative";
  species MG_303_MONOMER__c in c = 38/c; MG_303_MONOMER__c is "metal ion (cobalt) ABC transporter, ATP-binding protein, putative";
  species MG_304_MONOMER__c in c = 5/c; MG_304_MONOMER__c is "metal ion (cobalt) ABC transporter, ATP-binding protein, putative";
  species MG_311_MONOMER__c in c = 97/c; MG_311_MONOMER__c is "ribosomal protein S4";
  species MG_315_MONOMER__c in c = 4/c; MG_315_MONOMER__c is "DNA polymerase III, delta subunit, putative";
  species MG_316_MONOMER__m in m = 0; MG_316_MONOMER__m is "DNA internalization-related competence protein ComEC/Rec2";
  species MG_321_MONOMER__e in e = 0; MG_321_MONOMER__e is "oligopeptide ABC transporter, substrate binding protein";
  species MG_322_MONOMER__m in m = 2/m; MG_322_MONOMER__m is "potassium uptake protein";
  species MG_323_MONOMER__c in c = 0; MG_323_MONOMER__c is "potassium uptake protein";
  species MG_325_MONOMER__c in c = 132/c; MG_325_MONOMER__c is "ribosomal protein L33";
  species MG_333_MONOMER__c in c = 1/c; MG_333_MONOMER__c is "FMN-dependent NADH-azoreductase, putative";
  species MG_336_MONOMER__c in c = 0; MG_336_MONOMER__c is "cysteine desulfurase";
  species MG_340_MONOMER__c in c = 11/c; MG_340_MONOMER__c is "DNA-directed RNA polymerase, beta subunit";
  species MG_341_MONOMER__c in c = 0; MG_341_MONOMER__c is "DNA-directed RNA polymerase, beta subunit";
  species MG_346_MONOMER__c in c = 1/c; MG_346_MONOMER__c is "23S rRNA methyltransferase; U2552";
  species MG_347_MONOMER__c in c = 1/c; MG_347_MONOMER__c is "tRNA (guanine-N(7)-)-methyltransferase";
  species MG_349_MONOMER__c in c = 1/c; MG_349_MONOMER__c is "Replication initiation/membrane attachment protein";
  species MG_351_MONOMER__c in c = 4/c; MG_351_MONOMER__c is "inorganic pyrophosphatase";
  species MG_352_MONOMER__c in c = 0; MG_352_MONOMER__c is "Holliday junction endonuclease";
  species MG_353_MONOMER__c in c = 1/c; MG_353_MONOMER__c is "DNA-binding protein HU, putative";
  species MG_355_MONOMER__c in c = 2/c; MG_355_MONOMER__c is "ATP-dependent Clp protease, ATPase subunit";
  species MG_357_MONOMER__c in c = 1/c; MG_357_MONOMER__c is "acetate kinase";
  species MG_358_MONOMER__c in c = 35/c; MG_358_MONOMER__c is "Holliday junction DNA helicase";
  species MG_359_MONOMER__c in c = 4/c; MG_359_MONOMER__c is "Holliday junction DNA helicase RuvB";
  species MG_361_MONOMER__c in c = 107/c; MG_361_MONOMER__c is "ribosomal protein L10";
  species MG_362_MONOMER__c in c = 118/c; MG_362_MONOMER__c is "ribosomal protein L7/L12";
  species MG_363_MONOMER__c in c = 118/c; MG_363_MONOMER__c is "ribosomal protein L32";
  species MG_522_MONOMER__c in c = 99/c; MG_522_MONOMER__c is "ribosomal protein S20";
  species MG_367_MONOMER__c in c = 0; MG_367_MONOMER__c is "ribonuclease III";
  species MG_368_MONOMER__c in c = 1/c; MG_368_MONOMER__c is "fatty acid/phospholipid synthesis protein PlsX";
  species MG_369_MONOMER__c in c = 0; MG_369_MONOMER__c is "DAK2 phosphatase domain protein";
  species MG_372_MONOMER__c in c = 1/c; MG_372_MONOMER__c is "thiamine biosynthesis/tRNA modification protein ThiI";
  species MG_375_MONOMER__c in c = 1/c; MG_375_MONOMER__c is "threonyl-tRNA synthetase";
  species MG_376_MONOMER__c in c = 3/c;
  species MG_379_MONOMER__c in c = 0; MG_379_MONOMER__c is "tRNA uridine 5-carboxymethylaminomethyl modification enzyme GidA";
  species MG_382_MONOMER__c in c = 2/c; MG_382_MONOMER__c is "uridine kinase";
  species MG_383_MONOMER__c in c = 0; MG_383_MONOMER__c is "NH(3)-dependent NAD+ synthetase, putative";
  species MG_385_MONOMER__c in c = 0; MG_385_MONOMER__c is "glycerophosphoryl diester phosphodiesterase family protein";
  species MG_390_MONOMER__m in m = 1/m; MG_390_MONOMER__m is "toxin ABC transporter, ATP-binding/permease protein";
  species MG_391_MONOMER__c in c = 4/c; MG_391_MONOMER__c is "cytosol aminopeptidase";
  species MG_392_MONOMER__c in c = 3/c; MG_392_MONOMER__c is "chaperonin";
  species MG_393_MONOMER__c in c = 97/c; MG_393_MONOMER__c is "chaperonin, 10 kDa";
  species MG_394_MONOMER__c in c = 3/c; MG_394_MONOMER__c is "serine hydroxymethyltransferase";
  species MG_396_MONOMER__c in c = 0; MG_396_MONOMER__c is "ribose 5-phosphate isomerase B";
  species MG_398_MONOMER__c in c = 2/c; MG_398_MONOMER__c is "ATP synthase F1, epsilon subunit";
  species MG_399_MONOMER__c in c = 0; MG_399_MONOMER__c is "ATP synthase F1, beta subunit";
  species MG_400_MONOMER__c in c = 31/c; MG_400_MONOMER__c is "ATP synthase F1, gamma subunit";
  species MG_401_MONOMER__c in c = 16/c; MG_401_MONOMER__c is "ATP synthase F1, alpha subunit";
  species MG_402_MONOMER__c in c = 77/c; MG_402_MONOMER__c is "ATP synthase F1, delta subunit";
  species MG_403_MONOMER__m in m = 124/m; MG_403_MONOMER__m is "ATP synthase F0, B subunit";
  species MG_404_MONOMER__m in m = 26/m; MG_404_MONOMER__m is "ATP synthase F0, C subunit";
  species MG_405_MONOMER__m in m = 124/m; MG_405_MONOMER__m is "ATP synthase F0, A subunit";
  species MG_407_MONOMER__c in c = 0; MG_407_MONOMER__c is "enolase";
  species MG_409_MONOMER__c in c = 0; MG_409_MONOMER__c is "phosphate transport system regulatory protein PhoU, putative";
  species MG_410_MONOMER__c in c = 0; MG_410_MONOMER__c is "phosphate ABC transporter, ATP-binding protein";
  species MG_411_MONOMER__m in m = 15/m; MG_411_MONOMER__m is "phosphate ABC transporter, permease protein PstA";
  species MG_412_MONOMER__e in e = 28/e; MG_412_MONOMER__e is "phosphate ABC transporter, substrate-binding protein";
  species MG_417_MONOMER__c in c = 123/c; MG_417_MONOMER__c is "ribosomal protein S9";
  species MG_418_MONOMER__c in c = 114/c; MG_418_MONOMER__c is "ribosomal protein L13";
  species MG_419_MONOMER__c in c = 2/c; MG_419_MONOMER__c is "DNA polymerase III, subunit gamma and tau";
  species MG_421_MONOMER__c in c = 20/c; MG_421_MONOMER__c is "excinuclease ABC, A subunit";
  species MG_424_MONOMER__c in c = 119/c; MG_424_MONOMER__c is "ribosomal protein S15";
  species MG_425_MONOMER__c in c = 0; MG_425_MONOMER__c is "ATP-dependent RNA helicase";
  species MG_426_MONOMER__c in c = 152/c; MG_426_MONOMER__c is "ribosomal protein L28";
  species MG_427_MONOMER__c in c = 0; MG_427_MONOMER__c is "osmotically inducible peroxidase";
  species MG_428_MONOMER__c in c = 1/c; MG_428_MONOMER__c is "LuxR bacterial regulatory protein, putative";
  species MG_429_MONOMER__c in c = 0; MG_429_MONOMER__c is "PTS system, E1";
  species MG_431_MONOMER__c in c = 1/c; MG_431_MONOMER__c is "triosephosphate isomerase";
  species MG_433_MONOMER__c in c = 0; MG_433_MONOMER__c is "translation elongation factor Ts";
  species MG_434_MONOMER__c in c = 3/c; MG_434_MONOMER__c is "uridylate kinase";
  species MG_437_MONOMER__m in m = 1/m; MG_437_MONOMER__m is "phosphatidate cytidylyltransferase";
  species MG_444_MONOMER__c in c = 140/c; MG_444_MONOMER__c is "ribosomal protein L19";
  species MG_445_MONOMER__c in c = 1/c; MG_445_MONOMER__c is "tRNA (guanine-N1)-methyltransferase";
  species MG_446_MONOMER__c in c = 109/c; MG_446_MONOMER__c is "ribosomal protein S16";
  species MG_451_MONOMER__c in c = 0; MG_451_MONOMER__c is "translation elongation factor Tu";
  species MG_453_MONOMER__c in c = 1/c; MG_453_MONOMER__c is "UTP-glucose-1-phosphate uridylyltransferase";
  species MG_454_MONOMER__c in c = 0; MG_454_MONOMER__c is "thiol-dependent peroxidase";
  species MG_455_MONOMER__c in c = 1/c; MG_455_MONOMER__c is "tyrosyl-tRNA synthetase";
  species MG_457_MONOMER__m in m = 4/m; MG_457_MONOMER__m is "ATP-dependent metalloprotease FtsH";
  species MG_458_MONOMER__c in c = 2/c; MG_458_MONOMER__c is "hypoxanthine phosphoribosyltransferase";
  species MG_460_MONOMER__c in c = 0; MG_460_MONOMER__c is "L-lactate dehydrogenase/malate dehydrogenase";
  species MG_464_MONOMER__m in m = 0; MG_464_MONOMER__m is "inner-membrane protein insertion factor";
  species MG_465_MONOMER__c in c = 11/c; MG_465_MONOMER__c is "ribonuclease P protein component";
  species MG_466_MONOMER__c in c = 134/c; MG_466_MONOMER__c is "ribosomal protein L34";
  species MG_467_MONOMER__c in c = 13/c; MG_467_MONOMER__c is "salivaricin A ABC transporter, ATP-binding protein";
  species MG_468_MONOMER__m in m = 1/m; MG_468_MONOMER__m is "salivaricin A ABC transporter, permease protein";
  species MG_526_MONOMER__c in c = 6/c; MG_526_MONOMER__c is "salivaricin A ABC transporter, ATP-binding protein";
  species MG_469_MONOMER__c in c = 0; MG_469_MONOMER__c is "chromosomal replication initiator protein DnaA";
  species MGrrnA16S__c in c = 0; MGrrnA16S__c is "16S ribosomal rRNA";
  species MGrrnA23S__c in c = 0; MGrrnA23S__c is "23S ribosomal rRNA";
  species MGrrnA5S__c in c = 29/c; MGrrnA5S__c is "5S ribosomal rRNA";
  species MG_0001__c in c = 0; MG_0001__c is "scRNA, signal recognition particle 4.5S RNA, MCS1";
  species MG_0003__c in c = 0; MG_0003__c is "Rnase P RNA, MCS5, M1 RNA";
  species DNA_GYRASE__c in c = 50/c; DNA_GYRASE__c is "DNA gyrase";
  species DNA_POLYMERASE_2CORE_BETA_CLAMP_GAMMA_COMPLEX_PRIMASE__c in c = 0; DNA_POLYMERASE_2CORE_BETA_CLAMP_GAMMA_COMPLEX_PRIMASE__c is "DNA polymerase (2) core, XX-clamp, XX-complex, and primase";
  species DNA_POLYMERASE_CORE__c in c = 26/c; DNA_POLYMERASE_CORE__c is "DNA-directed DNA polymerase";
  species DNA_POLYMERASE_CORE_BETA_CLAMP_GAMMA_COMPLEX__c in c = 0; DNA_POLYMERASE_CORE_BETA_CLAMP_GAMMA_COMPLEX__c is "DNA polymerase core, beta-clamp, and gamma-complex";
  species DNA_POLYMERASE_CORE_BETA_CLAMP_PRIMASE__c in c = 0; DNA_POLYMERASE_CORE_BETA_CLAMP_PRIMASE__c is "DNA polymerase core, beta-clamp, and primase";
  species DNA_POLYMERASE_GAMMA_COMPLEX__c in c = 14/c; DNA_POLYMERASE_GAMMA_COMPLEX__c is "DNA-directed DNA polymerase gamma complex";
  species DNA_POLYMERASE_HOLOENZYME__c in c = 0; DNA_POLYMERASE_HOLOENZYME__c is "DNA-directed DNA polymerase holoenzyme";
  species MG_0001_048__c in c = 29/c; MG_0001_048__c is "signal recognition particle";
  species MG_0003_465__c in c = 25/c; MG_0003_465__c is "ribonuclease P";
  species MG_001_DIMER__c in c = 0; MG_001_DIMER__c is "DNA polymerase III, beta clamp";
  species MG_005_DIMER__c in c = 118/c; MG_005_DIMER__c is "seryl-tRNA synthetase";
  species MG_006_DIMER__c in c = 134/c; MG_006_DIMER__c is "thymidylate kinase";
  species MG_008_379_TETRAMER__c in c = 18/c; MG_008_379_TETRAMER__c is "tRNA uridine 5-carboxymethylaminomethyl modification enzyme";
  species MG_013_DIMER__c in c = 9/c; MG_013_DIMER__c is "methylenetetrahydrofolate dehydrogenase/methylenetetrahydrofolate cyclohydrolase";
  species MG_014_015_DIMER__m in m = 21/m; MG_014_015_DIMER__m is "multidrug ABC transporter";
  species MG_019_DIMER__c in c = 25/c; MG_019_DIMER__c is "chaperone protein DnaJ";
  species MG_021_DIMER__c in c = 20/c; MG_021_DIMER__c is "methionyl-tRNA synthetase";
  species MG_023_DIMER__c in c = 127/c; MG_023_DIMER__c is "fructose-1,6-bisphosphate aldolase, class II";
  species MG_029_DIMER__c in c = 21/c; MG_029_DIMER__c is "DJ-1/PfpI family protein";
  species MG_030_TRIMER__c in c = 15/c; MG_030_TRIMER__c is "uracil phosphoribosyltransferase";
  species MG_033_TETRAMER__m in m = 16/m; MG_033_TETRAMER__m is "glycerol uptake facilitator";
  species MG_034_DIMER__c in c = 23/c; MG_034_DIMER__c is "thymidine kinase";
  species MG_035_DIMER__c in c = 19/c; MG_035_DIMER__c is "histidyl-tRNA synthetase";
  species MG_036_DIMER__c in c = 21/c; MG_036_DIMER__c is "aspartyl-tRNA synthetase";
  species MG_038_TETRAMER__c in c = 15/c; MG_038_TETRAMER__c is "glycerol kinase";
  species MG_039_DIMER__c in c = 12/c; MG_039_DIMER__c is "FAD-dependent glycerol-3-phosphate dehydrogenase, putative";
  species MG_040_119_120_121_PENTAMER__m in m = 44/m; MG_040_119_120_121_PENTAMER__m is "Monosaccharide (riboside/galactoside) ABC transporter";
  species MG_041_062_429_PENTAMER__m in m = 17/m; MG_041_062_429_PENTAMER__m is "PTS system, fructose-specific";
  species MG_041_069_429_PENTAMER__m in m = 8/m; MG_041_069_429_PENTAMER__m is "PTS system, glucose-specific";
  species MG_042_043_044_045_PENTAMER__m in m = 18/m; MG_042_043_044_045_PENTAMER__m is "spermidine/putrescine (polyamine) ABC transporter";
  species MG_046_DIMER__c in c = 21/c; MG_046_DIMER__c is "metalloendopeptidase";
  species MG_047_TETRAMER__c in c = 13/c; MG_047_TETRAMER__c is "S-adenosylmethionine synthetase";
  species MG_049_HEXAMER__c in c = 21/c; MG_049_HEXAMER__c is "purine nucleoside phosphorylase";
  species MG_051_DIMER__c in c = 59/c; MG_051_DIMER__c is "pyrimidine-nucleoside phosphorylase";
  species MG_052_DIMER__c in c = 32/c; MG_052_DIMER__c is "cytidine deaminase";
  species MG_053_TRIMER__c in c = 23/c; MG_053_TRIMER__c is "phosphoglucomutase/phosphomannomutase, putative";
  species MG_055_170_277_464_476_20MER__m in m = 13/m; MG_055_170_277_464_476_20MER__m is "preprotein translocase";
  species MG_058_HEXAMER__c in c = 8/c; MG_058_HEXAMER__c is "ribose-phosphate pyrophosphokinase";
  species MG_063_DIMER__c in c = 20/c; MG_063_DIMER__c is "1-phosphofructokinase, putative";
  species MG_064_065_TETRAMER__m in m = 16/m; MG_064_065_TETRAMER__m is "ABC transporter";
  species MG_066_DIMER__c in c = 24/c; MG_066_DIMER__c is "transketolase";
  species MG_072_DIMER__c in c = 13/c; MG_072_DIMER__c is "preprotein translocase, SecA subunit";
  species MG_073_206_421_TETRAMER__c in c = 16/c; MG_073_206_421_TETRAMER__c is "DNA incision complex";
  species MG_077_078_079_080_321_PENTAMER__m in m = 7/m; MG_077_078_079_080_321_PENTAMER__m is "oligopeptide ABC transporter";
  species MG_084_TETRAMER__c in c = 18/c; MG_084_TETRAMER__c is "tRNA(Ile)-lysidine synthetase";
  species MG_085_HEXAMER__c in c = 14/c; MG_085_HEXAMER__c is "HPr(Ser) kinase/phosphatase";
  species MG_089_DIMER__c in c = 133/c; MG_089_DIMER__c is "translation elongation factor G";
  species MG_091_OCTAMER__c in c = 0; MG_091_OCTAMER__c is "single-strand binding protein family, octamer";
  species MG_091_TETRAMER__c in c = 65/c; MG_091_TETRAMER__c is "single-strand binding protein family, tetramer";
  species MG_094_HEXAMER__c in c = 36/c; MG_094_HEXAMER__c is "replicative DNA helicase";
  species MG_098_099_100_TRIMER__c in c = 139/c; MG_098_099_100_TRIMER__c is "glutamyl-tRNA(Gln) and/or aspartyl-tRNA(Asn) amidotransferase";
  species MG_102_DIMER__c in c = 22/c; MG_102_DIMER__c is "thioredoxin-disulfide reductase";
  species MG_102_DIMER_ox__c in c = 0; MG_102_DIMER_ox__c is "oxidized thioredoxin-disulfide reductase";
  species MG_105_OCTAMER__c in c = 11/c; MG_105_OCTAMER__c is "putative DNA integrity scanning protein";
  species MG_106_DIMER__c in c = 22/c; MG_106_DIMER__c is "peptide deformylase";
  species MG_107_DIMER__c in c = 25/c; MG_107_DIMER__c is "guanylate kinase";
  species MG_109_DIMER__m in m = 34/m; MG_109_DIMER__m is "serine/threonine protein kinase, putative";
  species MG_111_DIMER__c in c = 18/c; MG_111_DIMER__c is "glucose-6-phosphate isomerase";
  species MG_112_DIMER__c in c = 19/c; MG_112_DIMER__c is "ribulose-phosphate 3-epimerase";
  species MG_113_DIMER__c in c = 18/c; MG_113_DIMER__c is "asparaginyl-tRNA synthetase";
  species MG_114_DIMER__m in m = 19/m; MG_114_DIMER__m is "CDP-diacylglycerol--glycerol-3-phosphate 3-phosphatidyltransferase";
  species MG_118_DIMER__c in c = 12/c; MG_118_DIMER__c is "UDP-glucose 4-epimerase";
  species MG_123_DIMER__m in m = 11/m; MG_123_DIMER__m is "arginine deaminase";
  species MG_124_MONOMER_ox__c in c = 0; MG_124_MONOMER_ox__c is "oxidized thioredoxin";
  species MG_126_DIMER__c in c = 13/c; MG_126_DIMER__c is "tryptophanyl-tRNA synthetase";
  species MG_127_MONOMER_ox__c in c = 0; MG_127_MONOMER_ox__c is "oxidized Spx subfamily protein";
  species MG_128_HEXAMER__c in c = 9/c; MG_128_HEXAMER__c is "inorganic polyphosphate/ATP-NAD kinase, probable";
  species MG_132_DIMER__c in c = 14/c; MG_132_DIMER__c is "purine nucleoside phosphoramidase";
  species MG_136_DIMER__c in c = 23/c; MG_136_DIMER__c is "lysyl-tRNA synthetase";
  species MG_137_DIMER__c in c = 25/c; MG_137_DIMER__c is "UDP-galactopyranose mutase";
  species MG_139_DIMER__c in c = 10/c; MG_139_DIMER__c is "ribonuclease J";
  species MG_179_180_181_TETRAMER__m in m = 14/m; MG_179_180_181_TETRAMER__m is "metal ion (cobalt) ABC transporter";
  species MG_182_DIMER__c in c = 13/c; MG_182_DIMER__c is "Pseudouridylate synthase";
  species MG_184_DIMER__c in c = 29/c; MG_184_DIMER__c is "adenine-specific DNA modification methylase";
  species MG_186_187_188_189_PENTAMER__m in m = 18/m; MG_186_187_188_189_PENTAMER__m is "Oligosaccharide or polyol ABC transporter";
  species MG_194_195_TETRAMER__c in c = 27/c; MG_194_195_TETRAMER__c is "phenylalanyl-tRNA synthetase";
  species MG_201_DIMER__c in c = 11/c; MG_201_DIMER__c is "co-chaperone GrpE";
  species MG_203_204_TETRAMER__c in c = 12/c; MG_203_204_TETRAMER__c is "topoisomerase IV";
  species MG_205_DIMER__c in c = 23/c; MG_205_DIMER__c is "heat-inducible transcription repressor HrcA, putative";
  species MG_208_DIMER__c in c = 24/c; MG_208_DIMER__c is "glycoprotease family protein";
  species MG_213_214_298_6MER__c in c = 5/c; MG_213_214_298_6MER__c is "chromosome segregation protein SMC";
  species MG_213_214_298_6MER_ADP__c in c = 81/c; MG_213_214_298_6MER_ADP__c is "Chromosome Segregation Protein SMC with SCP Proteins-ADP";
  species MG_215_TETRAMER__c in c = 18/c; MG_215_TETRAMER__c is "6-phosphofructokinase";
  species MG_216_TETRAMER__c in c = 19/c; MG_216_TETRAMER__c is "pyruvate kinase";
  species MG_221_OCTAMER__c in c = 12/c; MG_221_OCTAMER__c is "mraZ protein";
  species MG_224_2MER_GTP__c in c = 1/c; MG_224_2MER_GTP__c is "cell division protein ftsZ activated 2mer";
  species MG_224_3MER_GTP__c in c = 1/c; MG_224_3MER_GTP__c is "cell division protein ftsZ activated 3mer";
  species MG_224_4MER_GTP__c in c = 2/c; MG_224_4MER_GTP__c is "cell division protein ftsZ activated 4mer";
  species MG_224_5MER_GTP__c in c = 3/c; MG_224_5MER_GTP__c is "cell division protein ftsZ activated 5mer";
  species MG_224_6MER_GTP__c in c = 5/c; MG_224_6MER_GTP__c is "cell division protein ftsZ activated 6mer";
  species MG_224_7MER_GTP__c in c = 8/c; MG_224_7MER_GTP__c is "cell division protein ftsZ activated 7mer";
  species MG_224_8MER_GTP__c in c = 12/c; MG_224_8MER_GTP__c is "cell division protein ftsZ activated 8mer";
  species MG_224_9MER_GDP__c in c = 0; MG_224_9MER_GDP__c is "cell division protein ftsZ deactivated 9mer";
  species MG_224_9MER_GTP__c in c = 20/c; MG_224_9MER_GTP__c is "cell division protein ftsZ activated 9mer";
  species MG_224_MONOMER_GDP__c in c = 3/c; MG_224_MONOMER_GDP__c is "cell division protein ftsZ hydrolysed";
  species MG_224_MONOMER_GTP__c in c = 6/c; MG_224_MONOMER_GTP__c is "cell division protein ftsZ activated";
  species MG_225_DIMER__m in m = 15/m; MG_225_DIMER__m is "amino acid transporter";
  species MG_226_DIMER__m in m = 14/m; MG_226_DIMER__m is "amino acid transporter";
  species MG_227_DIMER__c in c = 22/c; MG_227_DIMER__c is "thymidylate synthase";
  species MG_228_TETRAMER__c in c = 15/c; MG_228_TETRAMER__c is "dihydrofolate reductase";
  species MG_229_231_TETRAMER__c in c = 30/c; MG_229_231_TETRAMER__c is "ribonucleoside-diphosphate reductase";
  species MG_229_231_TETRAMER_ox__c in c = 0; MG_229_231_TETRAMER_ox__c is "oxidized ribonucleoside-diphosphate reductase";
  species MG_239_HEXAMER__c in c = 14/c; MG_239_HEXAMER__c is "ATP-dependent protease La";
  species MG_240_HEXAMER__c in c = 13/c; MG_240_HEXAMER__c is "nicotinamide-nucleotide adenylyltransferase/conserved hypothetical protein";
  species MG_244_DIMER__c in c = 8/c; MG_244_DIMER__c is "3-5' helicase";
  species MG_251_DIMER__c in c = 14/c; MG_251_DIMER__c is "glycyl-tRNA synthetase";
  species MG_252_DIMER__c in c = 9/c; MG_252_DIMER__c is "23S rRNA methyltransferase";
  species MG_259_TETRAMER__c in c = 48/c; MG_259_TETRAMER__c is "modification methylase";
  species MG_265_DIMER__c in c = 40/c; MG_265_DIMER__c is "sugar phosphatase";
  species MG_271_272_273_274_192MER__c in c = 11/c; MG_271_272_273_274_192MER__c is "pyruvate dehydrogenase";
  species MG_271_272_273_274_192MER_ox__c in c = 0; MG_271_272_273_274_192MER_ox__c is "oxidized dihydrolipoamide dehydrogenase";
  species MG_275_TETRAMER__m in m = 242/m; MG_275_TETRAMER__m is "NADH oxidase";
  species MG_276_DIMER__c in c = 24/c; MG_276_DIMER__c is "adenine phosphoribosyltransferase";
  species MG_278_DIMER__c in c = 16/c; MG_278_DIMER__c is "GTP pyrophosphokinase";
  species MG_283_DIMER__c in c = 14/c; MG_283_DIMER__c is "prolyl-tRNA synthetase";
  species MG_287_MONOMER_ACP__c in c = 0; MG_287_MONOMER_ACP__c is "holo acyl carrier protein";
  species MG_287_MONOMER_ddcaACP__c in c = 0; MG_287_MONOMER_ddcaACP__c is "Dodecanoyl-ACP (n-C12:0ACP)";
  species MG_287_MONOMER_hdeACP__c in c = 0; MG_287_MONOMER_hdeACP__c is "cis-hexadec-9-enoyl-[acyl-carrier protein] (n-C16:1)";
  species MG_287_MONOMER_myrsACP__c in c = 0; MG_287_MONOMER_myrsACP__c is "Myristoyl-ACP (n-C14:0ACP)";
  species MG_287_MONOMER_ocdcaACP__c in c = 0; MG_287_MONOMER_ocdcaACP__c is "Octadecanoyl-ACP (n-C18:0ACP)";
  species MG_287_MONOMER_octeACP__c in c = 0; MG_287_MONOMER_octeACP__c is "cis-octadec-11-enoyl-[acyl-carrier protein] (n-C18:1)";
  species MG_287_MONOMER_palmACP__c in c = 0; MG_287_MONOMER_palmACP__c is "Palmitoyl-ACP (n-C16:0ACP)";
  species MG_287_MONOMER_tdeACP__c in c = 0; MG_287_MONOMER_tdeACP__c is "cis-tetradec-7-enoyl-[acyl-carrier protein] (n-C14:1)";
  species MG_289_290_291_PENTAMER__m in m = 15/m; MG_289_290_291_PENTAMER__m is "phosphonate ABC transporter";
  species MG_292_TETRAMER__c in c = 18/c; MG_292_TETRAMER__c is "alanyl-tRNA synthetase";
  species MG_293_DIMER__c in c = 33/c; MG_293_DIMER__c is "glycerophosphoryl diester phosphodiesterase family protein";
  species MG_295_MONOMER_ox__c in c = 0; MG_295_MONOMER_ox__c is "oxidized tRNA U34 sulfurtransferase";
  species MG_299_DIMER__c in c = 22/c; MG_299_DIMER__c is "phosphate acetyltransferase";
  species MG_301_TETRAMER__c in c = 15/c; MG_301_TETRAMER__c is "glyceraldehyde-3-phosphate dehydrogenase, type I";
  species MG_302_303_304_TETRAMER__m in m = 16/m; MG_302_303_304_TETRAMER__m is "metal ion (cobalt) ABC transporter";
  species MG_316_DIMER__m in m = 21/m; MG_316_DIMER__m is "DNA internalization-related competence protein ComEC/Rec2";
  species MG_322_323_TETRAMER__m in m = 10/m; MG_322_323_TETRAMER__m is "potassium uptake protein, TrkH family, putative";
  species MG_333_DIMER__c in c = 15/c; MG_333_DIMER__c is "FMN-dependent NADH-azoreductase, putative";
  species MG_336_DIMER__c in c = 15/c; MG_336_DIMER__c is "cysteine desulfurase";
  species MG_346_DIMER__c in c = 13/c; MG_346_DIMER__c is "23S rRNA methyltransferase";
  species MG_347_DIMER__c in c = 11/c; MG_347_DIMER__c is "tRNA (guanine-N(7)-)-methyltransferase";
  species MG_349_HEXAMER__c in c = 13/c; MG_349_HEXAMER__c is "Replication initiation/membrane attachment protein";
  species MG_351_HEXAMER__c in c = 11/c; MG_351_HEXAMER__c is "inorganic pyrophosphatase";
  species MG_352_DIMER__c in c = 18/c; MG_352_DIMER__c is "Holliday junction endonuclease";
  species MG_353_DIMER__c in c = 16/c; MG_353_DIMER__c is "DNA-binding protein HU, putative";
  species MG_355_HEXAMER__c in c = 13/c; MG_355_HEXAMER__c is "ATP-dependent Clp protease, ATPase subunit";
  species MG_357_DIMER__c in c = 54/c; MG_357_DIMER__c is "acetate kinase";
  species MG_358_359_10MER__c in c = 13/c; MG_358_359_10MER__c is "Holliday junction DNA helicase";
  species MG_367_DIMER__c in c = 13/c; MG_367_DIMER__c is "ribonuclease III";
  species MG_368_DIMER__c in c = 14/c; MG_368_DIMER__c is "fatty acid/phospholipid synthesis protein PlsX";
  species MG_369_DIMER__c in c = 14/c; MG_369_DIMER__c is "DAK2 phosphatase domain protein";
  species MG_372_DIMER__c in c = 108/c; MG_372_DIMER__c is "thiamine biosynthesis/tRNA modification protein ThiI";
  species MG_375_DIMER__c in c = 124/c; MG_375_DIMER__c is "threonyl-tRNA synthetase";
  species MG_376_HEXAMER__c in c = 16/c;
  species MG_382_TETRAMER__c in c = 10/c; MG_382_TETRAMER__c is "uridine kinase";
  species MG_383_DIMER__c in c = 16/c; MG_383_DIMER__c is "NH(3)-dependent NAD+ synthetase, putative";
  species MG_385_DIMER__c in c = 10/c; MG_385_DIMER__c is "glycerophosphoryl diester phosphodiesterase family protein";
  species MG_390_DIMER__m in m = 16/m; MG_390_DIMER__m is "toxin ABC transporter, ATP-binding/permease protein";
  species MG_391_HEXAMER__c in c = 35/c; MG_391_HEXAMER__c is "cytosol aminopeptidase";
  species MG_392_393_21MER__c in c = 13/c; MG_392_393_21MER__c is "GroEL-GroES chaperonin complex";
  species MG_394_TETRAMER__c in c = 14/c; MG_394_TETRAMER__c is "serine hydroxymethyltransferase";
  species MG_396_DIMER__c in c = 27/c; MG_396_DIMER__c is "ribose 5-phosphate isomerase B";
  species MG_398_399_400_401_402_403_404_405_22MER__m in m = 11/m; MG_398_399_400_401_402_403_404_405_22MER__m is "H(+)-transporting two-sector ATPase";
  species MG_407_DIMER__c in c = 34/c; MG_407_DIMER__c is "enolase";
  species MG_409_DIMER__c in c = 16/c; MG_409_DIMER__c is "phosphate transport system regulatory protein PhoU, putative";
  species MG_410_411_412_PENTAMER__m in m = 17/m; MG_410_411_412_PENTAMER__m is "phosphate ABC transporter";
  species MG_425_DIMER__c in c = 9/c; MG_425_DIMER__c is "ATP-dependent RNA helicase";
  species MG_427_DIMER__c in c = 17/c; MG_427_DIMER__c is "osmotically inducible peroxidase";
  species MG_427_DIMER_ox__c in c = 0; MG_427_DIMER_ox__c is "oxidized osmotically inducible peroxidase";
  species MG_428_DIMER__c in c = 10/c; MG_428_DIMER__c is "LuxR bacterial regulatory protein, putative";
  species MG_431_DIMER__c in c = 25/c; MG_431_DIMER__c is "triosephosphate isomerase";
  species MG_433_DIMER__c in c = 122/c; MG_433_DIMER__c is "translation elongation factor Ts";
  species MG_434_HEXAMER__c in c = 14/c; MG_434_HEXAMER__c is "uridylate kinase";
  species MG_437_DIMER__m in m = 13/m; MG_437_DIMER__m is "phosphatidate cytidylyltransferase";
  species MG_445_DIMER__c in c = 107/c; MG_445_DIMER__c is "tRNA (guanine-N1)-methyltransferase";
  species MG_451_DIMER__c in c = 139/c; MG_451_DIMER__c is "translation elongation factor Tu";
  species MG_453_TETRAMER__c in c = 9/c; MG_453_TETRAMER__c is "UTP-glucose-1-phosphate uridylyltransferase";
  species MG_454_DIMER__c in c = 29/c; MG_454_DIMER__c is "thiol-dependent peroxidase";
  species MG_454_DIMER_ox__c in c = 0; MG_454_DIMER_ox__c is "oxidized thiol-dependent peroxidase";
  species MG_455_DIMER__c in c = 95/c; MG_455_DIMER__c is "tyrosyl-tRNA synthetase";
  species MG_457_HEXAMER__m in m = 70/m; MG_457_HEXAMER__m is "ATP-dependent metalloprotease FtsH";
  species MG_458_TETRAMER__c in c = 17/c; MG_458_TETRAMER__c is "hypoxanthine phosphoribosyltransferase";
  species MG_460_TETRAMER__c in c = 13/c; MG_460_TETRAMER__c is "L-lactate dehydrogenase/malate dehydrogenase";
  species MG_467_468_526_TETRAMER__m in m = 26/m; MG_467_468_526_TETRAMER__m is "salivaricin A ABC transporter";
  species MG_469_1MER_ADP__c in c = 0; MG_469_1MER_ADP__c is "DnaA-ADP";
  species MG_469_1MER_ATP__c in c = 25/c; MG_469_1MER_ATP__c is "DnaA-ATP";
  species MG_469_2MER_1ATP_ADP__c in c = 0; MG_469_2MER_1ATP_ADP__c is "DnaA 2mer-(1)ATP-(1)ADP";
  species MG_469_2MER_ATP__c in c = 0; MG_469_2MER_ATP__c is "DnaA-ATP 2mer";
  species MG_469_3MER_2ATP_ADP__c in c = 0; MG_469_3MER_2ATP_ADP__c is "DnaA 3mer-(2)ATP-(1)ADP";
  species MG_469_3MER_ATP__c in c = 0; MG_469_3MER_ATP__c is "DnaA-ATP 3mer";
  species MG_469_4MER_3ATP_ADP__c in c = 0; MG_469_4MER_3ATP_ADP__c is "DnaA 4mer-(3)ATP-(1)ADP";
  species MG_469_4MER_ATP__c in c = 0; MG_469_4MER_ATP__c is "DnaA-ATP 4mer";
  species MG_469_5MER_4ATP_ADP__c in c = 0; MG_469_5MER_4ATP_ADP__c is "DnaA 5mer-(4)ATP-(1)ADP";
  species MG_469_5MER_ATP__c in c = 0; MG_469_5MER_ATP__c is "DnaA-ATP 5mer";
  species MG_469_6MER_5ATP_ADP__c in c = 0; MG_469_6MER_5ATP_ADP__c is "DnaA 6mer-(5)ATP-(1)ADP";
  species MG_469_6MER_ATP__c in c = 0; MG_469_6MER_ATP__c is "DnaA-ATP 6mer";
  species MG_469_7MER_6ATP_ADP__c in c = 0; MG_469_7MER_6ATP_ADP__c is "DnaA 7mer-(6)ATP-(1)ADP";
  species MG_469_7MER_ATP__c in c = 4/c; MG_469_7MER_ATP__c is "DnaA-ATP 7mer";
  species MG_482_DIMER__c in c = 13/c; MG_482_DIMER__c is "holo-(acyl-carrier-protein) synthase";
  species REPLISOME__c in c = 0; REPLISOME__c is "Replisome";
  species RIBOSOME_30S__c in c = 25/c; RIBOSOME_30S__c is "30S ribosomal subunit";
  species RIBOSOME_30S_IF3__c in c = 0; RIBOSOME_30S_IF3__c is "30S ribosomal subunit - translation initiation factor IF-3 complex";
  species RIBOSOME_50S__c in c = 12/c; RIBOSOME_50S__c is "50S ribosomal subunit";
  species RIBOSOME_70S__c in c = 56/c; RIBOSOME_70S__c is "70S ribosome";
  species RNA_POLYMERASE__c in c = 40/c; RNA_POLYMERASE__c is "DNA-directed RNA polymerase";
  species RNA_POLYMERASE_HOLOENZYME__c in c = 0; RNA_POLYMERASE_HOLOENZYME__c is "DNA-directed RNA polymerase holoenzyme";

  // Parameters:
  k_cpx_DNA_GYRASE = 1000000;
  k_cpx_DNA_POLYMERASE_2CORE_BETA_CLAMP_GAMMA_COMPLEX_PRIMASE = 0;
  k_cpx_DNA_POLYMERASE_CORE = 1000000;
  k_cpx_DNA_POLYMERASE_CORE_BETA_CLAMP_GAMMA_COMPLEX = 0;
  k_cpx_DNA_POLYMERASE_CORE_BETA_CLAMP_PRIMASE = 0;
  k_cpx_DNA_POLYMERASE_GAMMA_COMPLEX = 1000000;
  k_cpx_DNA_POLYMERASE_HOLOENZYME = 0;
  k_cpx_MG_0001_048 = 1000000;
  k_cpx_MG_0003_465 = 1000000;
  k_cpx_MG_001_DIMER = 0;
  k_cpx_MG_005_DIMER = 1000000;
  k_cpx_MG_006_DIMER = 1000000;
  k_cpx_MG_008_379_TETRAMER = 1000000;
  k_cpx_MG_013_DIMER = 1000000;
  k_cpx_MG_014_015_DIMER = 1000000;
  k_cpx_MG_019_DIMER = 1000000;
  k_cpx_MG_021_DIMER = 1000000;
  k_cpx_MG_023_DIMER = 1000000;
  k_cpx_MG_029_DIMER = 1000000;
  k_cpx_MG_030_TRIMER = 1000000;
  k_cpx_MG_033_TETRAMER = 1000000;
  k_cpx_MG_034_DIMER = 1000000;
  k_cpx_MG_035_DIMER = 1000000;
  k_cpx_MG_036_DIMER = 1000000;
  k_cpx_MG_038_TETRAMER = 1000000;
  k_cpx_MG_039_DIMER = 1000000;
  k_cpx_MG_040_119_120_121_PENTAMER = 1000000;
  k_cpx_MG_041_062_429_PENTAMER = 1000000;
  k_cpx_MG_041_069_429_PENTAMER = 1000000;
  k_cpx_MG_042_043_044_045_PENTAMER = 1000000;
  k_cpx_MG_046_DIMER = 1000000;
  k_cpx_MG_047_TETRAMER = 1000000;
  k_cpx_MG_049_HEXAMER = 1000000;
  k_cpx_MG_051_DIMER = 1000000;
  k_cpx_MG_052_DIMER = 1000000;
  k_cpx_MG_053_TRIMER = 1000000;
  k_cpx_MG_055_170_277_464_476_20MER = 1000000;
  k_cpx_MG_058_HEXAMER = 1000000;
  k_cpx_MG_063_DIMER = 1000000;
  k_cpx_MG_064_065_TETRAMER = 1000000;
  k_cpx_MG_066_DIMER = 1000000;
  k_cpx_MG_072_DIMER = 1000000;
  k_cpx_MG_073_206_421_TETRAMER = 1000000;
  k_cpx_MG_077_078_079_080_321_PENTAMER = 1000000;
  k_cpx_MG_084_TETRAMER = 1000000;
  k_cpx_MG_085_HEXAMER = 1000000;
  k_cpx_MG_089_DIMER = 1000000;
  k_cpx_MG_091_OCTAMER = 0;
  k_cpx_MG_091_TETRAMER = 1000000;
  k_cpx_MG_094_HEXAMER = 1000000;
  k_cpx_MG_098_099_100_TRIMER = 1000000;
  k_cpx_MG_102_DIMER = 1000000;
  k_cpx_MG_102_DIMER_ox = 0;
  k_cpx_MG_105_OCTAMER = 1000000;
  k_cpx_MG_106_DIMER = 1000000;
  k_cpx_MG_107_DIMER = 1000000;
  k_cpx_MG_109_DIMER = 1000000;
  k_cpx_MG_111_DIMER = 1000000;
  k_cpx_MG_112_DIMER = 1000000;
  k_cpx_MG_113_DIMER = 1000000;
  k_cpx_MG_114_DIMER = 1000000;
  k_cpx_MG_118_DIMER = 1000000;
  k_cpx_MG_123_DIMER = 1000000;
  k_cpx_MG_124_MONOMER_ox = 0;
  k_cpx_MG_126_DIMER = 1000000;
  k_cpx_MG_127_MONOMER_ox = 0;
  k_cpx_MG_128_HEXAMER = 1000000;
  k_cpx_MG_132_DIMER = 1000000;
  k_cpx_MG_136_DIMER = 1000000;
  k_cpx_MG_137_DIMER = 1000000;
  k_cpx_MG_139_DIMER = 1000000;
  k_cpx_MG_179_180_181_TETRAMER = 1000000;
  k_cpx_MG_182_DIMER = 1000000;
  k_cpx_MG_184_DIMER = 1000000;
  k_cpx_MG_186_187_188_189_PENTAMER = 1000000;
  k_cpx_MG_194_195_TETRAMER = 1000000;
  k_cpx_MG_201_DIMER = 1000000;
  k_cpx_MG_203_204_TETRAMER = 1000000;
  k_cpx_MG_205_DIMER = 1000000;
  k_cpx_MG_208_DIMER = 1000000;
  k_cpx_MG_213_214_298_6MER = 1000000;
  k_cpx_MG_213_214_298_6MER_ADP = 0;
  k_cpx_MG_215_TETRAMER = 1000000;
  k_cpx_MG_216_TETRAMER = 1000000;
  k_cpx_MG_221_OCTAMER = 1000000;
  k_cpx_MG_224_2MER_GTP = 0;
  k_cpx_MG_224_3MER_GTP = 0;
  k_cpx_MG_224_4MER_GTP = 0;
  k_cpx_MG_224_5MER_GTP = 0;
  k_cpx_MG_224_6MER_GTP = 0;
  k_cpx_MG_224_7MER_GTP = 0;
  k_cpx_MG_224_8MER_GTP = 0;
  k_cpx_MG_224_9MER_GDP = 0;
  k_cpx_MG_224_9MER_GTP = 0;
  k_cpx_MG_224_MONOMER_GDP = 0;
  k_cpx_MG_224_MONOMER_GTP = 0;
  k_cpx_MG_225_DIMER = 1000000;
  k_cpx_MG_226_DIMER = 1000000;
  k_cpx_MG_227_DIMER = 1000000;
  k_cpx_MG_228_TETRAMER = 1000000;
  k_cpx_MG_229_231_TETRAMER = 1000000;
  k_cpx_MG_229_231_TETRAMER_ox = 0;
  k_cpx_MG_239_HEXAMER = 1000000;
  k_cpx_MG_240_HEXAMER = 1000000;
  k_cpx_MG_244_DIMER = 1000000;
  k_cpx_MG_251_DIMER = 1000000;
  k_cpx_MG_252_DIMER = 1000000;
  k_cpx_MG_259_TETRAMER = 1000000;
  k_cpx_MG_265_DIMER = 1000000;
  k_cpx_MG_271_272_273_274_192MER = 1000000;
  k_cpx_MG_271_272_273_274_192MER_ox = 0;
  k_cpx_MG_275_TETRAMER = 1000000;
  k_cpx_MG_276_DIMER = 1000000;
  k_cpx_MG_278_DIMER = 1000000;
  k_cpx_MG_283_DIMER = 1000000;
  k_cpx_MG_287_MONOMER_ACP = 0;
  k_cpx_MG_287_MONOMER_ddcaACP = 0;
  k_cpx_MG_287_MONOMER_hdeACP = 0;
  k_cpx_MG_287_MONOMER_myrsACP = 0;
  k_cpx_MG_287_MONOMER_ocdcaACP = 0;
  k_cpx_MG_287_MONOMER_octeACP = 0;
  k_cpx_MG_287_MONOMER_palmACP = 0;
  k_cpx_MG_287_MONOMER_tdeACP = 0;
  k_cpx_MG_289_290_291_PENTAMER = 1000000;
  k_cpx_MG_292_TETRAMER = 1000000;
  k_cpx_MG_293_DIMER = 1000000;
  k_cpx_MG_295_MONOMER_ox = 0;
  k_cpx_MG_299_DIMER = 1000000;
  k_cpx_MG_301_TETRAMER = 1000000;
  k_cpx_MG_302_303_304_TETRAMER = 1000000;
  k_cpx_MG_316_DIMER = 1000000;
  k_cpx_MG_322_323_TETRAMER = 1000000;
  k_cpx_MG_333_DIMER = 1000000;
  k_cpx_MG_336_DIMER = 1000000;
  k_cpx_MG_346_DIMER = 1000000;
  k_cpx_MG_347_DIMER = 1000000;
  k_cpx_MG_349_HEXAMER = 1000000;
  k_cpx_MG_351_HEXAMER = 1000000;
  k_cpx_MG_352_DIMER = 1000000;
  k_cpx_MG_353_DIMER = 1000000;
  k_cpx_MG_355_HEXAMER = 1000000;
  k_cpx_MG_357_DIMER = 1000000;
  k_cpx_MG_358_359_10MER = 1000000;
  k_cpx_MG_367_DIMER = 1000000;
  k_cpx_MG_368_DIMER = 1000000;
  k_cpx_MG_369_DIMER = 1000000;
  k_cpx_MG_372_DIMER = 1000000;
  k_cpx_MG_375_DIMER = 1000000;
  k_cpx_MG_376_HEXAMER = 1000000;
  k_cpx_MG_382_TETRAMER = 1000000;
  k_cpx_MG_383_DIMER = 1000000;
  k_cpx_MG_385_DIMER = 1000000;
  k_cpx_MG_390_DIMER = 1000000;
  k_cpx_MG_391_HEXAMER = 1000000;
  k_cpx_MG_392_393_21MER = 1000000;
  k_cpx_MG_394_TETRAMER = 1000000;
  k_cpx_MG_396_DIMER = 1000000;
  k_cpx_MG_398_399_400_401_402_403_404_405_22MER = 1000000;
  k_cpx_MG_407_DIMER = 1000000;
  k_cpx_MG_409_DIMER = 1000000;
  k_cpx_MG_410_411_412_PENTAMER = 1000000;
  k_cpx_MG_425_DIMER = 1000000;
  k_cpx_MG_427_DIMER = 1000000;
  k_cpx_MG_427_DIMER_ox = 0;
  k_cpx_MG_428_DIMER = 1000000;
  k_cpx_MG_431_DIMER = 1000000;
  k_cpx_MG_433_DIMER = 1000000;
  k_cpx_MG_434_HEXAMER = 1000000;
  k_cpx_MG_437_DIMER = 1000000;
  k_cpx_MG_445_DIMER = 1000000;
  k_cpx_MG_451_DIMER = 1000000;
  k_cpx_MG_453_TETRAMER = 1000000;
  k_cpx_MG_454_DIMER = 1000000;
  k_cpx_MG_454_DIMER_ox = 0;
  k_cpx_MG_455_DIMER = 1000000;
  k_cpx_MG_457_HEXAMER = 1000000;
  k_cpx_MG_458_TETRAMER = 1000000;
  k_cpx_MG_460_TETRAMER = 1000000;
  k_cpx_MG_467_468_526_TETRAMER = 1000000;
  k_cpx_MG_469_1MER_ADP = 0;
  k_cpx_MG_469_1MER_ATP = 0;
  k_cpx_MG_469_2MER_1ATP_ADP = 0;
  k_cpx_MG_469_2MER_ATP = 0;
  k_cpx_MG_469_3MER_2ATP_ADP = 0;
  k_cpx_MG_469_3MER_ATP = 0;
  k_cpx_MG_469_4MER_3ATP_ADP = 0;
  k_cpx_MG_469_4MER_ATP = 0;
  k_cpx_MG_469_5MER_4ATP_ADP = 0;
  k_cpx_MG_469_5MER_ATP = 0;
  k_cpx_MG_469_6MER_5ATP_ADP = 0;
  k_cpx_MG_469_6MER_ATP = 0;
  k_cpx_MG_469_7MER_6ATP_ADP = 0;
  k_cpx_MG_469_7MER_ATP = 0;
  k_cpx_MG_482_DIMER = 1000000;
  k_cpx_REPLISOME = 0;
  k_cpx_RIBOSOME_30S = 0;
  k_cpx_RIBOSOME_30S_IF3 = 0;
  k_cpx_RIBOSOME_50S = 0;
  k_cpx_RIBOSOME_70S = 1000000;
  k_cpx_RNA_POLYMERASE = 1000000;
  k_cpx_RNA_POLYMERASE_HOLOENZYME = 0;

  // Reactions:
  Complexation_DNA_GYRASE: 2 MG_003_MONOMER__c + 2 MG_004_MONOMER__c => DNA_GYRASE__c; min2(MG_003_MONOMER__c*2^(-1), MG_004_MONOMER__c*2^(-1)); Complexation_DNA_GYRASE is "Complexation (DNA gyrase)";
  Complexation_DNA_POLYMERASE_2CORE_BETA_CLAMP_GAMMA_COMPLEX_PRIMASE: 2 MG_001_MONOMER__c + MG_007_MONOMER__c + 2 MG_031_MONOMER__c + MG_250_MONOMER__c + 2 MG_261_MONOMER__c + MG_315_MONOMER__c + 4 MG_419_MONOMER__c => DNA_POLYMERASE_2CORE_BETA_CLAMP_GAMMA_COMPLEX_PRIMASE__c; min2(min2(min2(MG_001_MONOMER__c*2^(-1), min4(MG_007_MONOMER__c*1^(-1), MG_031_MONOMER__c*2^(-1), MG_250_MONOMER__c*1^(-1), MG_261_MONOMER__c*2^(-1))), MG_315_MONOMER__c*1^(-1)), MG_419_MONOMER__c*4^(-1)); Complexation_DNA_POLYMERASE_2CORE_BETA_CLAMP_GAMMA_COMPLEX_PRIMASE is "Complexation (DNA polymerase (2) core, XX-clamp, XXX-complex, and primase)";
  Complexation_DNA_POLYMERASE_CORE: MG_031_MONOMER__c + MG_261_MONOMER__c => DNA_POLYMERASE_CORE__c; min2(MG_031_MONOMER__c*1^(-1), MG_261_MONOMER__c*1^(-1)); Complexation_DNA_POLYMERASE_CORE is "Complexation (DNA-directed DNA polymerase)";
  Complexation_DNA_POLYMERASE_CORE_BETA_CLAMP_GAMMA_COMPLEX: 2 MG_001_MONOMER__c + MG_007_MONOMER__c + MG_031_MONOMER__c + MG_261_MONOMER__c + MG_315_MONOMER__c + 4 MG_419_MONOMER__c => DNA_POLYMERASE_CORE_BETA_CLAMP_GAMMA_COMPLEX__c; min2(min2(MG_001_MONOMER__c*2^(-1), min4(MG_007_MONOMER__c*1^(-1), MG_031_MONOMER__c*1^(-1), MG_261_MONOMER__c*1^(-1), MG_315_MONOMER__c*1^(-1))), MG_419_MONOMER__c*4^(-1)); Complexation_DNA_POLYMERASE_CORE_BETA_CLAMP_GAMMA_COMPLEX is "Complexation (DNA polymerase core, beta-clamp, and gamma-complex)";
  Complexation_DNA_POLYMERASE_CORE_BETA_CLAMP_PRIMASE: 2 MG_001_MONOMER__c + MG_031_MONOMER__c + MG_250_MONOMER__c + MG_261_MONOMER__c => DNA_POLYMERASE_CORE_BETA_CLAMP_PRIMASE__c; min2(min2(min2(MG_001_MONOMER__c*2^(-1), MG_031_MONOMER__c*1^(-1)), MG_250_MONOMER__c*1^(-1)), MG_261_MONOMER__c*1^(-1)); Complexation_DNA_POLYMERASE_CORE_BETA_CLAMP_PRIMASE is "Complexation (DNA polymerase core, beta-clamp, and primase)";
  Complexation_DNA_POLYMERASE_GAMMA_COMPLEX: MG_007_MONOMER__c + MG_315_MONOMER__c + 4 MG_419_MONOMER__c => DNA_POLYMERASE_GAMMA_COMPLEX__c; min2(min2(MG_007_MONOMER__c*1^(-1), MG_315_MONOMER__c*1^(-1)), MG_419_MONOMER__c*4^(-1)); Complexation_DNA_POLYMERASE_GAMMA_COMPLEX is "Complexation (DNA-directed DNA polymerase gamma complex)";
  Complexation_DNA_POLYMERASE_HOLOENZYME: 2 MG_001_MONOMER__c + MG_007_MONOMER__c + 2 MG_031_MONOMER__c + 2 MG_261_MONOMER__c + MG_315_MONOMER__c + 4 MG_419_MONOMER__c => DNA_POLYMERASE_HOLOENZYME__c; min2(min2(MG_001_MONOMER__c*2^(-1), min4(MG_007_MONOMER__c*1^(-1), MG_031_MONOMER__c*2^(-1), MG_261_MONOMER__c*2^(-1), MG_315_MONOMER__c*1^(-1))), MG_419_MONOMER__c*4^(-1)); Complexation_DNA_POLYMERASE_HOLOENZYME is "Complexation (DNA-directed DNA polymerase holoenzyme)";
  Complexation_MG_0001_048: MG_048_MONOMER__c + MG_0001__c => MG_0001_048__c; min2(MG_048_MONOMER__c*1^(-1), MG_0001__c*1^(-1)); Complexation_MG_0001_048 is "Complexation (signal recognition particle)";
  Complexation_MG_0003_465: MG_465_MONOMER__c + MG_0003__c => MG_0003_465__c; min2(MG_465_MONOMER__c*1^(-1), MG_0003__c*1^(-1)); Complexation_MG_0003_465 is "Complexation (ribonuclease P)";
  Complexation_MG_001_DIMER: 2 MG_001_MONOMER__c => MG_001_DIMER__c; MG_001_MONOMER__c*2^(-1); Complexation_MG_001_DIMER is "Complexation (DNA polymerase III, beta clamp)";
  Complexation_MG_005_DIMER: 2 MG_005_MONOMER__c => MG_005_DIMER__c; MG_005_MONOMER__c*2^(-1); Complexation_MG_005_DIMER is "Complexation (seryl-tRNA synthetase)";
  Complexation_MG_006_DIMER: 2 MG_006_MONOMER__c => MG_006_DIMER__c; MG_006_MONOMER__c*2^(-1); Complexation_MG_006_DIMER is "Complexation (thymidylate kinase)";
  Complexation_MG_008_379_TETRAMER: 2 MG_008_MONOMER__c + 2 MG_379_MONOMER__c => MG_008_379_TETRAMER__c; min2(MG_008_MONOMER__c*2^(-1), MG_379_MONOMER__c*2^(-1)); Complexation_MG_008_379_TETRAMER is "Complexation (tRNA uridine 5-carboxymethylaminomethyl modification enzyme)";
  Complexation_MG_013_DIMER: 2 MG_013_MONOMER__c => MG_013_DIMER__c; MG_013_MONOMER__c*2^(-1); Complexation_MG_013_DIMER is "Complexation (methylenetetrahydrofolate dehydrogenase/methylenetetrahydrofolate cyclohydrolase)";
  Complexation_MG_014_015_DIMER: MG_014_MONOMER__m + MG_015_MONOMER__m => MG_014_015_DIMER__m; min2(MG_014_MONOMER__m*1^(-1), MG_015_MONOMER__m*1^(-1)); Complexation_MG_014_015_DIMER is "Complexation (multidrug ABC transporter)";
  Complexation_MG_019_DIMER: 2 MG_019_MONOMER__c => MG_019_DIMER__c; MG_019_MONOMER__c*2^(-1); Complexation_MG_019_DIMER is "Complexation (chaperone protein DnaJ)";
  Complexation_MG_021_DIMER: 2 MG_021_MONOMER__c => MG_021_DIMER__c; MG_021_MONOMER__c*2^(-1); Complexation_MG_021_DIMER is "Complexation (methionyl-tRNA synthetase)";
  Complexation_MG_023_DIMER: 2 MG_023_MONOMER__c => MG_023_DIMER__c; MG_023_MONOMER__c*2^(-1); Complexation_MG_023_DIMER is "Complexation (fructose-1,6-bisphosphate aldolase, class II)";
  Complexation_MG_029_DIMER: 2 MG_029_MONOMER__c => MG_029_DIMER__c; MG_029_MONOMER__c*2^(-1); Complexation_MG_029_DIMER is "Complexation (DJ-1/PfpI family protein)";
  Complexation_MG_030_TRIMER: 3 MG_030_MONOMER__c => MG_030_TRIMER__c; MG_030_MONOMER__c*3^(-1); Complexation_MG_030_TRIMER is "Complexation (uracil phosphoribosyltransferase)";
  Complexation_MG_033_TETRAMER: 4 MG_033_MONOMER__m => MG_033_TETRAMER__m; MG_033_MONOMER__m*4^(-1); Complexation_MG_033_TETRAMER is "Complexation (glycerol uptake facilitator)";
  Complexation_MG_034_DIMER: 2 MG_034_MONOMER__c => MG_034_DIMER__c; MG_034_MONOMER__c*2^(-1); Complexation_MG_034_DIMER is "Complexation (thymidine kinase)";
  Complexation_MG_035_DIMER: 2 MG_035_MONOMER__c => MG_035_DIMER__c; MG_035_MONOMER__c*2^(-1); Complexation_MG_035_DIMER is "Complexation (histidyl-tRNA synthetase)";
  Complexation_MG_036_DIMER: 2 MG_036_MONOMER__c => MG_036_DIMER__c; MG_036_MONOMER__c*2^(-1); Complexation_MG_036_DIMER is "Complexation (aspartyl-tRNA synthetase)";
  Complexation_MG_038_TETRAMER: 4 MG_038_MONOMER__c => MG_038_TETRAMER__c; MG_038_MONOMER__c*4^(-1); Complexation_MG_038_TETRAMER is "Complexation (glycerol kinase)";
  Complexation_MG_039_DIMER: 2 MG_039_MONOMER__c => MG_039_DIMER__c; MG_039_MONOMER__c*2^(-1); Complexation_MG_039_DIMER is "Complexation (FAD-dependent glycerol-3-phosphate dehydrogenase, putative)";
  Complexation_MG_040_119_120_121_PENTAMER: MG_040_MONOMER__e + 2 MG_119_MONOMER__c + MG_120_MONOMER__m + MG_121_MONOMER__m => MG_040_119_120_121_PENTAMER__m; min2(min2(min2(MG_040_MONOMER__e*1^(-1), MG_119_MONOMER__c*2^(-1)), MG_120_MONOMER__m*1^(-1)), MG_121_MONOMER__m*1^(-1)); Complexation_MG_040_119_120_121_PENTAMER is "Complexation (Monosaccharide (riboside/galactoside) ABC transporter)";
  Complexation_MG_041_062_429_PENTAMER: MG_041_MONOMER__c + 2 MG_062_MONOMER__m + 2 MG_429_MONOMER__c => MG_041_062_429_PENTAMER__m; min2(min2(MG_041_MONOMER__c*1^(-1), MG_062_MONOMER__m*2^(-1)), MG_429_MONOMER__c*2^(-1)); Complexation_MG_041_062_429_PENTAMER is "Complexation (PTS system, fructose-specific)";
  Complexation_MG_041_069_429_PENTAMER: MG_041_MONOMER__c + 2 MG_069_MONOMER__m + 2 MG_429_MONOMER__c => MG_041_069_429_PENTAMER__m; min2(min2(MG_041_MONOMER__c*1^(-1), MG_069_MONOMER__m*2^(-1)), MG_429_MONOMER__c*2^(-1)); Complexation_MG_041_069_429_PENTAMER is "Complexation (PTS system, glucose-specific)";
  Complexation_MG_042_043_044_045_PENTAMER: 2 MG_042_MONOMER__c + MG_043_MONOMER__m + MG_044_MONOMER__m + MG_045_MONOMER__e => MG_042_043_044_045_PENTAMER__m; min2(min2(min2(MG_042_MONOMER__c*2^(-1), MG_043_MONOMER__m*1^(-1)), MG_044_MONOMER__m*1^(-1)), MG_045_MONOMER__e*1^(-1)); Complexation_MG_042_043_044_045_PENTAMER is "Complexation (spermidine/putrescine (polyamine) ABC transporter)";
  Complexation_MG_046_DIMER: 2 MG_046_MONOMER__c => MG_046_DIMER__c; MG_046_MONOMER__c*2^(-1); Complexation_MG_046_DIMER is "Complexation (metalloendopeptidase)";
  Complexation_MG_047_TETRAMER: 4 MG_047_MONOMER__c => MG_047_TETRAMER__c; MG_047_MONOMER__c*4^(-1); Complexation_MG_047_TETRAMER is "Complexation (S-adenosylmethionine synthetase)";
  Complexation_MG_049_HEXAMER: 6 MG_049_MONOMER__c => MG_049_HEXAMER__c; MG_049_MONOMER__c*6^(-1); Complexation_MG_049_HEXAMER is "Complexation (purine nucleoside phosphorylase)";
  Complexation_MG_051_DIMER: 2 MG_051_MONOMER__c => MG_051_DIMER__c; MG_051_MONOMER__c*2^(-1); Complexation_MG_051_DIMER is "Complexation (pyrimidine-nucleoside phosphorylase)";
  Complexation_MG_052_DIMER: 2 MG_052_MONOMER__c => MG_052_DIMER__c; MG_052_MONOMER__c*2^(-1); Complexation_MG_052_DIMER is "Complexation (cytidine deaminase)";
  Complexation_MG_053_TRIMER: 3 MG_053_MONOMER__c => MG_053_TRIMER__c; MG_053_MONOMER__c*3^(-1); Complexation_MG_053_TRIMER is "Complexation (phosphoglucomutase/phosphomannomutase, putative)";
  Complexation_MG_055_170_277_464_476_20MER: 4 MG_055_MONOMER__m + 4 MG_476_MONOMER__m + 4 MG_170_MONOMER__m + 4 MG_277_MONOMER__m + 4 MG_464_MONOMER__m => MG_055_170_277_464_476_20MER__m; min2(min2(min2(min2(MG_055_MONOMER__m*4^(-1), MG_476_MONOMER__m*4^(-1)), MG_170_MONOMER__m*4^(-1)), MG_277_MONOMER__m*4^(-1)), MG_464_MONOMER__m*4^(-1)); Complexation_MG_055_170_277_464_476_20MER is "Complexation (preprotein translocase)";
  Complexation_MG_058_HEXAMER: 6 MG_058_MONOMER__c => MG_058_HEXAMER__c; MG_058_MONOMER__c*6^(-1); Complexation_MG_058_HEXAMER is "Complexation (ribose-phosphate pyrophosphokinase)";
  Complexation_MG_063_DIMER: 2 MG_063_MONOMER__c => MG_063_DIMER__c; MG_063_MONOMER__c*2^(-1); Complexation_MG_063_DIMER is "Complexation (1-phosphofructokinase, putative)";
  Complexation_MG_064_065_TETRAMER: 2 MG_064_MONOMER__m + 2 MG_065_MONOMER__c => MG_064_065_TETRAMER__m; min2(MG_064_MONOMER__m*2^(-1), MG_065_MONOMER__c*2^(-1)); Complexation_MG_064_065_TETRAMER is "Complexation (ABC transporter)";
  Complexation_MG_066_DIMER: 2 MG_066_MONOMER__c => MG_066_DIMER__c; MG_066_MONOMER__c*2^(-1); Complexation_MG_066_DIMER is "Complexation (transketolase)";
  Complexation_MG_072_DIMER: 2 MG_072_MONOMER__c => MG_072_DIMER__c; MG_072_MONOMER__c*2^(-1); Complexation_MG_072_DIMER is "Complexation (preprotein translocase, SecA subunit)";
  Complexation_MG_073_206_421_TETRAMER: MG_073_MONOMER__c + MG_206_MONOMER__c + 2 MG_421_MONOMER__c => MG_073_206_421_TETRAMER__c; min2(min2(MG_073_MONOMER__c*1^(-1), MG_206_MONOMER__c*1^(-1)), MG_421_MONOMER__c*2^(-1)); Complexation_MG_073_206_421_TETRAMER is "Complexation (DNA incision complex)";
  Complexation_MG_077_078_079_080_321_PENTAMER: MG_077_MONOMER__m + MG_078_MONOMER__m + MG_079_MONOMER__c + MG_080_MONOMER__c + MG_321_MONOMER__e => MG_077_078_079_080_321_PENTAMER__m; min2(min2(min2(min2(MG_077_MONOMER__m*1^(-1), MG_078_MONOMER__m*1^(-1)), MG_079_MONOMER__c*1^(-1)), MG_080_MONOMER__c*1^(-1)), MG_321_MONOMER__e*1^(-1)); Complexation_MG_077_078_079_080_321_PENTAMER is "Complexation (oligopeptide ABC transporter)";
  Complexation_MG_084_TETRAMER: 4 MG_084_MONOMER__c => MG_084_TETRAMER__c; MG_084_MONOMER__c*4^(-1); Complexation_MG_084_TETRAMER is "Complexation (tRNA(Ile)-lysidine synthetase)";
  Complexation_MG_085_HEXAMER: 6 MG_085_MONOMER__c => MG_085_HEXAMER__c; MG_085_MONOMER__c*6^(-1); Complexation_MG_085_HEXAMER is "Complexation (HPr(Ser) kinase/phosphatase)";
  Complexation_MG_089_DIMER: 2 MG_089_MONOMER__c => MG_089_DIMER__c; MG_089_MONOMER__c*2^(-1); Complexation_MG_089_DIMER is "Complexation (translation elongation factor G)";
  Complexation_MG_091_OCTAMER: 8 MG_091_MONOMER__c => MG_091_OCTAMER__c; MG_091_MONOMER__c*8^(-1); Complexation_MG_091_OCTAMER is "Complexation (single-strand binding protein family, octamer)";
  Complexation_MG_091_TETRAMER: 4 MG_091_MONOMER__c => MG_091_TETRAMER__c; MG_091_MONOMER__c*4^(-1); Complexation_MG_091_TETRAMER is "Complexation (single-strand binding protein family, tetramer)";
  Complexation_MG_094_HEXAMER: 6 MG_094_MONOMER__c => MG_094_HEXAMER__c; MG_094_MONOMER__c*6^(-1); Complexation_MG_094_HEXAMER is "Complexation (replicative DNA helicase)";
  Complexation_MG_098_099_100_TRIMER: MG_098_MONOMER__c + MG_099_MONOMER__c + MG_100_MONOMER__c => MG_098_099_100_TRIMER__c; min2(min2(MG_098_MONOMER__c*1^(-1), MG_099_MONOMER__c*1^(-1)), MG_100_MONOMER__c*1^(-1)); Complexation_MG_098_099_100_TRIMER is "Complexation (glutamyl-tRNA(Gln) and/or aspartyl-tRNA(Asn) amidotransferase)";
  Complexation_MG_102_DIMER: 2 MG_102_MONOMER__c => MG_102_DIMER__c; MG_102_MONOMER__c*2^(-1); Complexation_MG_102_DIMER is "Complexation (thioredoxin-disulfide reductase)";
  Complexation_MG_102_DIMER_ox: 2 MG_102_MONOMER__c => MG_102_DIMER_ox__c; MG_102_MONOMER__c*2^(-1); Complexation_MG_102_DIMER_ox is "Complexation (oxidized thioredoxin-disulfide reductase)";
  Complexation_MG_105_OCTAMER: 8 MG_105_MONOMER__c => MG_105_OCTAMER__c; MG_105_MONOMER__c*8^(-1); Complexation_MG_105_OCTAMER is "Complexation (putative DNA integrity scanning protein)";
  Complexation_MG_106_DIMER: 2 MG_106_MONOMER__c => MG_106_DIMER__c; MG_106_MONOMER__c*2^(-1); Complexation_MG_106_DIMER is "Complexation (peptide deformylase)";
  Complexation_MG_107_DIMER: 2 MG_107_MONOMER__c => MG_107_DIMER__c; MG_107_MONOMER__c*2^(-1); Complexation_MG_107_DIMER is "Complexation (guanylate kinase)";
  Complexation_MG_109_DIMER: 2 MG_109_MONOMER__m => MG_109_DIMER__m; MG_109_MONOMER__m*2^(-1); Complexation_MG_109_DIMER is "Complexation (serine/threonine protein kinase, putative)";
  Complexation_MG_111_DIMER: 2 MG_111_MONOMER__c => MG_111_DIMER__c; MG_111_MONOMER__c*2^(-1); Complexation_MG_111_DIMER is "Complexation (glucose-6-phosphate isomerase)";
  Complexation_MG_112_DIMER: 2 MG_112_MONOMER__c => MG_112_DIMER__c; MG_112_MONOMER__c*2^(-1); Complexation_MG_112_DIMER is "Complexation (ribulose-phosphate 3-epimerase)";
  Complexation_MG_113_DIMER: 2 MG_113_MONOMER__c => MG_113_DIMER__c; MG_113_MONOMER__c*2^(-1); Complexation_MG_113_DIMER is "Complexation (asparaginyl-tRNA synthetase)";
  Complexation_MG_114_DIMER: 2 MG_114_MONOMER__m => MG_114_DIMER__m; MG_114_MONOMER__m*2^(-1); Complexation_MG_114_DIMER is "Complexation (CDP-diacylglycerol--glycerol-3-phosphate 3-phosphatidyltransferase)";
  Complexation_MG_118_DIMER: 2 MG_118_MONOMER__c => MG_118_DIMER__c; MG_118_MONOMER__c*2^(-1); Complexation_MG_118_DIMER is "Complexation (UDP-glucose 4-epimerase)";
  Complexation_MG_123_DIMER: 2 MG_123_MONOMER__m => MG_123_DIMER__m; MG_123_MONOMER__m*2^(-1); Complexation_MG_123_DIMER is "Complexation (arginine deaminase)";
  Complexation_MG_124_MONOMER_ox: MG_124_MONOMER__c => MG_124_MONOMER_ox__c; MG_124_MONOMER__c*1^(-1); Complexation_MG_124_MONOMER_ox is "Complexation (oxidized thioredoxin)";
  Complexation_MG_126_DIMER: 2 MG_126_MONOMER__c => MG_126_DIMER__c; MG_126_MONOMER__c*2^(-1); Complexation_MG_126_DIMER is "Complexation (tryptophanyl-tRNA synthetase)";
  Complexation_MG_127_MONOMER_ox: MG_127_MONOMER__c => MG_127_MONOMER_ox__c; MG_127_MONOMER__c*1^(-1); Complexation_MG_127_MONOMER_ox is "Complexation (oxidized Spx subfamily protein)";
  Complexation_MG_128_HEXAMER: 6 MG_128_MONOMER__c => MG_128_HEXAMER__c; MG_128_MONOMER__c*6^(-1); Complexation_MG_128_HEXAMER is "Complexation (inorganic polyphosphate/ATP-NAD kinase, probable)";
  Complexation_MG_132_DIMER: 2 MG_132_MONOMER__c => MG_132_DIMER__c; MG_132_MONOMER__c*2^(-1); Complexation_MG_132_DIMER is "Complexation (purine nucleoside phosphoramidase)";
  Complexation_MG_136_DIMER: 2 MG_136_MONOMER__c => MG_136_DIMER__c; MG_136_MONOMER__c*2^(-1); Complexation_MG_136_DIMER is "Complexation (lysyl-tRNA synthetase)";
  Complexation_MG_137_DIMER: 2 MG_137_MONOMER__c => MG_137_DIMER__c; MG_137_MONOMER__c*2^(-1); Complexation_MG_137_DIMER is "Complexation (UDP-galactopyranose mutase)";
  Complexation_MG_139_DIMER: 2 MG_139_MONOMER__c => MG_139_DIMER__c; MG_139_MONOMER__c*2^(-1); Complexation_MG_139_DIMER is "Complexation (ribonuclease J)";
  Complexation_MG_179_180_181_TETRAMER: MG_179_MONOMER__c + MG_180_MONOMER__c + 2 MG_181_MONOMER__m => MG_179_180_181_TETRAMER__m; min2(min2(MG_179_MONOMER__c*1^(-1), MG_180_MONOMER__c*1^(-1)), MG_181_MONOMER__m*2^(-1)); Complexation_MG_179_180_181_TETRAMER is "Complexation (metal ion (cobalt) ABC transporter)";
  Complexation_MG_182_DIMER: 2 MG_182_MONOMER__c => MG_182_DIMER__c; MG_182_MONOMER__c*2^(-1); Complexation_MG_182_DIMER is "Complexation (Pseudouridylate synthase)";
  Complexation_MG_184_DIMER: 2 MG_184_MONOMER__c => MG_184_DIMER__c; MG_184_MONOMER__c*2^(-1); Complexation_MG_184_DIMER is "Complexation (adenine-specific DNA modification methylase)";
  Complexation_MG_186_187_188_189_PENTAMER: 2 MG_186_MONOMER__e + MG_187_MONOMER__c + MG_188_MONOMER__m + MG_189_MONOMER__m => MG_186_187_188_189_PENTAMER__m; min2(min2(min2(MG_186_MONOMER__e*2^(-1), MG_187_MONOMER__c*1^(-1)), MG_188_MONOMER__m*1^(-1)), MG_189_MONOMER__m*1^(-1)); Complexation_MG_186_187_188_189_PENTAMER is "Complexation (Oligosaccharide or polyol ABC transporter)";
  Complexation_MG_194_195_TETRAMER: 2 MG_194_MONOMER__c + 2 MG_195_MONOMER__c => MG_194_195_TETRAMER__c; min2(MG_194_MONOMER__c*2^(-1), MG_195_MONOMER__c*2^(-1)); Complexation_MG_194_195_TETRAMER is "Complexation (phenylalanyl-tRNA synthetase)";
  Complexation_MG_201_DIMER: 2 MG_201_MONOMER__c => MG_201_DIMER__c; MG_201_MONOMER__c*2^(-1); Complexation_MG_201_DIMER is "Complexation (co-chaperone GrpE)";
  Complexation_MG_203_204_TETRAMER: 2 MG_203_MONOMER__c + 2 MG_204_MONOMER__c => MG_203_204_TETRAMER__c; min2(MG_203_MONOMER__c*2^(-1), MG_204_MONOMER__c*2^(-1)); Complexation_MG_203_204_TETRAMER is "Complexation (topoisomerase IV)";
  Complexation_MG_205_DIMER: 2 MG_205_MONOMER__c => MG_205_DIMER__c; MG_205_MONOMER__c*2^(-1); Complexation_MG_205_DIMER is "Complexation (heat-inducible transcription repressor HrcA, putative)";
  Complexation_MG_208_DIMER: 2 MG_208_MONOMER__c => MG_208_DIMER__c; MG_208_MONOMER__c*2^(-1); Complexation_MG_208_DIMER is "Complexation (glycoprotease family protein)";
  Complexation_MG_213_214_298_6MER: 2 MG_213_MONOMER__c + 2 MG_214_MONOMER__c + 2 MG_298_MONOMER__c => MG_213_214_298_6MER__c; min2(min2(MG_213_MONOMER__c*2^(-1), MG_214_MONOMER__c*2^(-1)), MG_298_MONOMER__c*2^(-1)); Complexation_MG_213_214_298_6MER is "Complexation (chromosome segregation protein SMC)";
  Complexation_MG_213_214_298_6MER_ADP: 2 MG_213_MONOMER__c + 2 MG_214_MONOMER__c + 2 MG_298_MONOMER__c => MG_213_214_298_6MER_ADP__c; min2(min2(MG_213_MONOMER__c*2^(-1), MG_214_MONOMER__c*2^(-1)), MG_298_MONOMER__c*2^(-1)); Complexation_MG_213_214_298_6MER_ADP is "Complexation (Chromosome Segregation Protein SMC with SCP Proteins-ADP)";
  Complexation_MG_215_TETRAMER: 4 MG_215_MONOMER__c => MG_215_TETRAMER__c; MG_215_MONOMER__c*4^(-1); Complexation_MG_215_TETRAMER is "Complexation (6-phosphofructokinase)";
  Complexation_MG_216_TETRAMER: 4 MG_216_MONOMER__c => MG_216_TETRAMER__c; MG_216_MONOMER__c*4^(-1); Complexation_MG_216_TETRAMER is "Complexation (pyruvate kinase)";
  Complexation_MG_221_OCTAMER: 8 MG_221_MONOMER__c => MG_221_OCTAMER__c; MG_221_MONOMER__c*8^(-1); Complexation_MG_221_OCTAMER is "Complexation (mraZ protein)";
  Complexation_MG_224_2MER_GTP: 2 MG_224_MONOMER__c => MG_224_2MER_GTP__c; MG_224_MONOMER__c*2^(-1); Complexation_MG_224_2MER_GTP is "Complexation (cell division protein ftsZ activated 2mer)";
  Complexation_MG_224_3MER_GTP: 3 MG_224_MONOMER__c => MG_224_3MER_GTP__c; MG_224_MONOMER__c*3^(-1); Complexation_MG_224_3MER_GTP is "Complexation (cell division protein ftsZ activated 3mer)";
  Complexation_MG_224_4MER_GTP: 4 MG_224_MONOMER__c => MG_224_4MER_GTP__c; MG_224_MONOMER__c*4^(-1); Complexation_MG_224_4MER_GTP is "Complexation (cell division protein ftsZ activated 4mer)";
  Complexation_MG_224_5MER_GTP: 5 MG_224_MONOMER__c => MG_224_5MER_GTP__c; MG_224_MONOMER__c*5^(-1); Complexation_MG_224_5MER_GTP is "Complexation (cell division protein ftsZ activated 5mer)";
  Complexation_MG_224_6MER_GTP: 6 MG_224_MONOMER__c => MG_224_6MER_GTP__c; MG_224_MONOMER__c*6^(-1); Complexation_MG_224_6MER_GTP is "Complexation (cell division protein ftsZ activated 6mer)";
  Complexation_MG_224_7MER_GTP: 7 MG_224_MONOMER__c => MG_224_7MER_GTP__c; MG_224_MONOMER__c*7^(-1); Complexation_MG_224_7MER_GTP is "Complexation (cell division protein ftsZ activated 7mer)";
  Complexation_MG_224_8MER_GTP: 8 MG_224_MONOMER__c => MG_224_8MER_GTP__c; MG_224_MONOMER__c*8^(-1); Complexation_MG_224_8MER_GTP is "Complexation (cell division protein ftsZ activated 8mer)";
  Complexation_MG_224_9MER_GDP: 9 MG_224_MONOMER__c => MG_224_9MER_GDP__c; MG_224_MONOMER__c*9^(-1); Complexation_MG_224_9MER_GDP is "Complexation (cell division protein ftsZ deactivated 9mer)";
  Complexation_MG_224_9MER_GTP: 9 MG_224_MONOMER__c => MG_224_9MER_GTP__c; MG_224_MONOMER__c*9^(-1); Complexation_MG_224_9MER_GTP is "Complexation (cell division protein ftsZ activated 9mer)";
  Complexation_MG_224_MONOMER_GDP: MG_224_MONOMER__c => MG_224_MONOMER_GDP__c; MG_224_MONOMER__c*1^(-1); Complexation_MG_224_MONOMER_GDP is "Complexation (cell division protein ftsZ hydrolysed)";
  Complexation_MG_224_MONOMER_GTP: MG_224_MONOMER__c => MG_224_MONOMER_GTP__c; MG_224_MONOMER__c*1^(-1); Complexation_MG_224_MONOMER_GTP is "Complexation (cell division protein ftsZ activated)";
  Complexation_MG_225_DIMER: 2 MG_225_MONOMER__m => MG_225_DIMER__m; MG_225_MONOMER__m*2^(-1); Complexation_MG_225_DIMER is "Complexation (amino acid transporter)";
  Complexation_MG_226_DIMER: 2 MG_226_MONOMER__m => MG_226_DIMER__m; MG_226_MONOMER__m*2^(-1); Complexation_MG_226_DIMER is "Complexation (amino acid transporter)";
  Complexation_MG_227_DIMER: 2 MG_227_MONOMER__c => MG_227_DIMER__c; MG_227_MONOMER__c*2^(-1); Complexation_MG_227_DIMER is "Complexation (thymidylate synthase)";
  Complexation_MG_228_TETRAMER: 4 MG_228_MONOMER__c => MG_228_TETRAMER__c; MG_228_MONOMER__c*4^(-1); Complexation_MG_228_TETRAMER is "Complexation (dihydrofolate reductase)";
  Complexation_MG_229_231_TETRAMER: 2 MG_229_MONOMER__c + 2 MG_231_MONOMER__c => MG_229_231_TETRAMER__c; min2(MG_229_MONOMER__c*2^(-1), MG_231_MONOMER__c*2^(-1)); Complexation_MG_229_231_TETRAMER is "Complexation (ribonucleoside-diphosphate reductase)";
  Complexation_MG_229_231_TETRAMER_ox: 2 MG_229_MONOMER__c + 2 MG_231_MONOMER__c => MG_229_231_TETRAMER_ox__c; min2(MG_229_MONOMER__c*2^(-1), MG_231_MONOMER__c*2^(-1)); Complexation_MG_229_231_TETRAMER_ox is "Complexation (oxidized ribonucleoside-diphosphate reductase)";
  Complexation_MG_239_HEXAMER: 6 MG_239_MONOMER__c => MG_239_HEXAMER__c; MG_239_MONOMER__c*6^(-1); Complexation_MG_239_HEXAMER is "Complexation (ATP-dependent protease La)";
  Complexation_MG_240_HEXAMER: 6 MG_240_MONOMER__c => MG_240_HEXAMER__c; MG_240_MONOMER__c*6^(-1); Complexation_MG_240_HEXAMER is "Complexation (nicotinamide-nucleotide adenylyltransferase/conserved hypothetical protein)";
  Complexation_MG_244_DIMER: 2 MG_244_MONOMER__c => MG_244_DIMER__c; MG_244_MONOMER__c*2^(-1); Complexation_MG_244_DIMER is "Complexation (3-5' helicase)";
  Complexation_MG_251_DIMER: 2 MG_251_MONOMER__c => MG_251_DIMER__c; MG_251_MONOMER__c*2^(-1); Complexation_MG_251_DIMER is "Complexation (glycyl-tRNA synthetase)";
  Complexation_MG_252_DIMER: 2 MG_252_MONOMER__c => MG_252_DIMER__c; MG_252_MONOMER__c*2^(-1); Complexation_MG_252_DIMER is "Complexation (23S rRNA methyltransferase)";
  Complexation_MG_259_TETRAMER: 4 MG_259_MONOMER__c => MG_259_TETRAMER__c; MG_259_MONOMER__c*4^(-1); Complexation_MG_259_TETRAMER is "Complexation (modification methylase)";
  Complexation_MG_265_DIMER: 2 MG_265_MONOMER__c => MG_265_DIMER__c; MG_265_MONOMER__c*2^(-1); Complexation_MG_265_DIMER is "Complexation (sugar phosphatase)";
  Complexation_MG_271_272_273_274_192MER: 12 MG_271_MONOMER__c + 60 MG_272_MONOMER__c + 60 MG_273_MONOMER__c + 60 MG_274_MONOMER__c => MG_271_272_273_274_192MER__c; min2(min2(min2(MG_271_MONOMER__c*12^(-1), MG_272_MONOMER__c*60^(-1)), MG_273_MONOMER__c*60^(-1)), MG_274_MONOMER__c*60^(-1)); Complexation_MG_271_272_273_274_192MER is "Complexation (pyruvate dehydrogenase)";
  Complexation_MG_271_272_273_274_192MER_ox: 12 MG_271_MONOMER__c + 60 MG_272_MONOMER__c + 60 MG_273_MONOMER__c + 60 MG_274_MONOMER__c => MG_271_272_273_274_192MER_ox__c; min2(min2(min2(MG_271_MONOMER__c*12^(-1), MG_272_MONOMER__c*60^(-1)), MG_273_MONOMER__c*60^(-1)), MG_274_MONOMER__c*60^(-1)); Complexation_MG_271_272_273_274_192MER_ox is "Complexation (oxidized dihydrolipoamide dehydrogenase)";
  Complexation_MG_275_TETRAMER: 4 MG_275_MONOMER__m => MG_275_TETRAMER__m; MG_275_MONOMER__m*4^(-1); Complexation_MG_275_TETRAMER is "Complexation (NADH oxidase)";
  Complexation_MG_276_DIMER: 2 MG_276_MONOMER__c => MG_276_DIMER__c; MG_276_MONOMER__c*2^(-1); Complexation_MG_276_DIMER is "Complexation (adenine phosphoribosyltransferase)";
  Complexation_MG_278_DIMER: 2 MG_278_MONOMER__c => MG_278_DIMER__c; MG_278_MONOMER__c*2^(-1); Complexation_MG_278_DIMER is "Complexation (GTP pyrophosphokinase)";
  Complexation_MG_283_DIMER: 2 MG_283_MONOMER__c => MG_283_DIMER__c; MG_283_MONOMER__c*2^(-1); Complexation_MG_283_DIMER is "Complexation (prolyl-tRNA synthetase)";
  Complexation_MG_287_MONOMER_ACP: MG_287_MONOMER__c => MG_287_MONOMER_ACP__c; MG_287_MONOMER__c*1^(-1); Complexation_MG_287_MONOMER_ACP is "Complexation (holo acyl carrier protein)";
  Complexation_MG_287_MONOMER_ddcaACP: MG_287_MONOMER__c => MG_287_MONOMER_ddcaACP__c; MG_287_MONOMER__c*1^(-1); Complexation_MG_287_MONOMER_ddcaACP is "Complexation (Dodecanoyl-ACP (n-C12:0ACP))";
  Complexation_MG_287_MONOMER_hdeACP: MG_287_MONOMER__c => MG_287_MONOMER_hdeACP__c; MG_287_MONOMER__c*1^(-1); Complexation_MG_287_MONOMER_hdeACP is "Complexation (cis-hexadec-9-enoyl-[acyl-carrier protein] (n-C16:1))";
  Complexation_MG_287_MONOMER_myrsACP: MG_287_MONOMER__c => MG_287_MONOMER_myrsACP__c; MG_287_MONOMER__c*1^(-1); Complexation_MG_287_MONOMER_myrsACP is "Complexation (Myristoyl-ACP (n-C14:0ACP))";
  Complexation_MG_287_MONOMER_ocdcaACP: MG_287_MONOMER__c => MG_287_MONOMER_ocdcaACP__c; MG_287_MONOMER__c*1^(-1); Complexation_MG_287_MONOMER_ocdcaACP is "Complexation (Octadecanoyl-ACP (n-C18:0ACP))";
  Complexation_MG_287_MONOMER_octeACP: MG_287_MONOMER__c => MG_287_MONOMER_octeACP__c; MG_287_MONOMER__c*1^(-1); Complexation_MG_287_MONOMER_octeACP is "Complexation (cis-octadec-11-enoyl-[acyl-carrier protein] (n-C18:1))";
  Complexation_MG_287_MONOMER_palmACP: MG_287_MONOMER__c => MG_287_MONOMER_palmACP__c; MG_287_MONOMER__c*1^(-1); Complexation_MG_287_MONOMER_palmACP is "Complexation (Palmitoyl-ACP (n-C16:0ACP))";
  Complexation_MG_287_MONOMER_tdeACP: MG_287_MONOMER__c => MG_287_MONOMER_tdeACP__c; MG_287_MONOMER__c*1^(-1); Complexation_MG_287_MONOMER_tdeACP is "Complexation (cis-tetradec-7-enoyl-[acyl-carrier protein] (n-C14:1))";
  Complexation_MG_289_290_291_PENTAMER: MG_289_MONOMER__e + 2 MG_290_MONOMER__c + 2 MG_291_MONOMER__m => MG_289_290_291_PENTAMER__m; min2(min2(MG_289_MONOMER__e*1^(-1), MG_290_MONOMER__c*2^(-1)), MG_291_MONOMER__m*2^(-1)); Complexation_MG_289_290_291_PENTAMER is "Complexation (phosphonate ABC transporter)";
  Complexation_MG_292_TETRAMER: 4 MG_292_MONOMER__c => MG_292_TETRAMER__c; MG_292_MONOMER__c*4^(-1); Complexation_MG_292_TETRAMER is "Complexation (alanyl-tRNA synthetase)";
  Complexation_MG_293_DIMER: 2 MG_293_MONOMER__c => MG_293_DIMER__c; MG_293_MONOMER__c*2^(-1); Complexation_MG_293_DIMER is "Complexation (glycerophosphoryl diester phosphodiesterase family protein)";
  Complexation_MG_295_MONOMER_ox: MG_295_MONOMER__c => MG_295_MONOMER_ox__c; MG_295_MONOMER__c*1^(-1); Complexation_MG_295_MONOMER_ox is "Complexation (oxidized tRNA U34 sulfurtransferase)";
  Complexation_MG_299_DIMER: 2 MG_299_MONOMER__c => MG_299_DIMER__c; MG_299_MONOMER__c*2^(-1); Complexation_MG_299_DIMER is "Complexation (phosphate acetyltransferase)";
  Complexation_MG_301_TETRAMER: 4 MG_301_MONOMER__c => MG_301_TETRAMER__c; MG_301_MONOMER__c*4^(-1); Complexation_MG_301_TETRAMER is "Complexation (glyceraldehyde-3-phosphate dehydrogenase, type I)";
  Complexation_MG_302_303_304_TETRAMER: 2 MG_302_MONOMER__m + MG_303_MONOMER__c + MG_304_MONOMER__c => MG_302_303_304_TETRAMER__m; min2(min2(MG_302_MONOMER__m*2^(-1), MG_303_MONOMER__c*1^(-1)), MG_304_MONOMER__c*1^(-1)); Complexation_MG_302_303_304_TETRAMER is "Complexation (metal ion (cobalt) ABC transporter)";
  Complexation_MG_316_DIMER: 2 MG_316_MONOMER__m => MG_316_DIMER__m; MG_316_MONOMER__m*2^(-1); Complexation_MG_316_DIMER is "Complexation (DNA internalization-related competence protein ComEC/Rec2)";
  Complexation_MG_322_323_TETRAMER: 2 MG_322_MONOMER__m + 2 MG_323_MONOMER__c => MG_322_323_TETRAMER__m; min2(MG_322_MONOMER__m*2^(-1), MG_323_MONOMER__c*2^(-1)); Complexation_MG_322_323_TETRAMER is "Complexation (potassium uptake protein, TrkH family, putative)";
  Complexation_MG_333_DIMER: 2 MG_333_MONOMER__c => MG_333_DIMER__c; MG_333_MONOMER__c*2^(-1); Complexation_MG_333_DIMER is "Complexation (FMN-dependent NADH-azoreductase, putative)";
  Complexation_MG_336_DIMER: 2 MG_336_MONOMER__c => MG_336_DIMER__c; MG_336_MONOMER__c*2^(-1); Complexation_MG_336_DIMER is "Complexation (cysteine desulfurase)";
  Complexation_MG_346_DIMER: 2 MG_346_MONOMER__c => MG_346_DIMER__c; MG_346_MONOMER__c*2^(-1); Complexation_MG_346_DIMER is "Complexation (23S rRNA methyltransferase)";
  Complexation_MG_347_DIMER: 2 MG_347_MONOMER__c => MG_347_DIMER__c; MG_347_MONOMER__c*2^(-1); Complexation_MG_347_DIMER is "Complexation (tRNA (guanine-N(7)-)-methyltransferase)";
  Complexation_MG_349_HEXAMER: 6 MG_349_MONOMER__c => MG_349_HEXAMER__c; MG_349_MONOMER__c*6^(-1); Complexation_MG_349_HEXAMER is "Complexation (Replication initiation/membrane attachment protein)";
  Complexation_MG_351_HEXAMER: 6 MG_351_MONOMER__c => MG_351_HEXAMER__c; MG_351_MONOMER__c*6^(-1); Complexation_MG_351_HEXAMER is "Complexation (inorganic pyrophosphatase)";
  Complexation_MG_352_DIMER: 2 MG_352_MONOMER__c => MG_352_DIMER__c; MG_352_MONOMER__c*2^(-1); Complexation_MG_352_DIMER is "Complexation (Holliday junction endonuclease)";
  Complexation_MG_353_DIMER: 2 MG_353_MONOMER__c => MG_353_DIMER__c; MG_353_MONOMER__c*2^(-1); Complexation_MG_353_DIMER is "Complexation (DNA-binding protein HU, putative)";
  Complexation_MG_355_HEXAMER: 6 MG_355_MONOMER__c => MG_355_HEXAMER__c; MG_355_MONOMER__c*6^(-1); Complexation_MG_355_HEXAMER is "Complexation (ATP-dependent Clp protease, ATPase subunit)";
  Complexation_MG_357_DIMER: 2 MG_357_MONOMER__c => MG_357_DIMER__c; MG_357_MONOMER__c*2^(-1); Complexation_MG_357_DIMER is "Complexation (acetate kinase)";
  Complexation_MG_358_359_10MER: 4 MG_358_MONOMER__c + 6 MG_359_MONOMER__c => MG_358_359_10MER__c; min2(MG_358_MONOMER__c*4^(-1), MG_359_MONOMER__c*6^(-1)); Complexation_MG_358_359_10MER is "Complexation (Holliday junction DNA helicase)";
  Complexation_MG_367_DIMER: 2 MG_367_MONOMER__c => MG_367_DIMER__c; MG_367_MONOMER__c*2^(-1); Complexation_MG_367_DIMER is "Complexation (ribonuclease III)";
  Complexation_MG_368_DIMER: 2 MG_368_MONOMER__c => MG_368_DIMER__c; MG_368_MONOMER__c*2^(-1); Complexation_MG_368_DIMER is "Complexation (fatty acid/phospholipid synthesis protein PlsX)";
  Complexation_MG_369_DIMER: 2 MG_369_MONOMER__c => MG_369_DIMER__c; MG_369_MONOMER__c*2^(-1); Complexation_MG_369_DIMER is "Complexation (DAK2 phosphatase domain protein)";
  Complexation_MG_372_DIMER: 2 MG_372_MONOMER__c => MG_372_DIMER__c; MG_372_MONOMER__c*2^(-1); Complexation_MG_372_DIMER is "Complexation (thiamine biosynthesis/tRNA modification protein ThiI)";
  Complexation_MG_375_DIMER: 2 MG_375_MONOMER__c => MG_375_DIMER__c; MG_375_MONOMER__c*2^(-1); Complexation_MG_375_DIMER is "Complexation (threonyl-tRNA synthetase)";
  Complexation_MG_376_HEXAMER: 6 MG_376_MONOMER__c => MG_376_HEXAMER__c; MG_376_MONOMER__c*6^(-1); Complexation_MG_376_HEXAMER is "Complexation ()";
  Complexation_MG_382_TETRAMER: 4 MG_382_MONOMER__c => MG_382_TETRAMER__c; MG_382_MONOMER__c*4^(-1); Complexation_MG_382_TETRAMER is "Complexation (uridine kinase)";
  Complexation_MG_383_DIMER: 2 MG_383_MONOMER__c => MG_383_DIMER__c; MG_383_MONOMER__c*2^(-1); Complexation_MG_383_DIMER is "Complexation (NH(3)-dependent NAD+ synthetase, putative)";
  Complexation_MG_385_DIMER: 2 MG_385_MONOMER__c => MG_385_DIMER__c; MG_385_MONOMER__c*2^(-1); Complexation_MG_385_DIMER is "Complexation (glycerophosphoryl diester phosphodiesterase family protein)";
  Complexation_MG_390_DIMER: 2 MG_390_MONOMER__m => MG_390_DIMER__m; MG_390_MONOMER__m*2^(-1); Complexation_MG_390_DIMER is "Complexation (toxin ABC transporter, ATP-binding/permease protein)";
  Complexation_MG_391_HEXAMER: 6 MG_391_MONOMER__c => MG_391_HEXAMER__c; MG_391_MONOMER__c*6^(-1); Complexation_MG_391_HEXAMER is "Complexation (cytosol aminopeptidase)";
  Complexation_MG_392_393_21MER: 14 MG_392_MONOMER__c + 7 MG_393_MONOMER__c => MG_392_393_21MER__c; min2(MG_392_MONOMER__c*14^(-1), MG_393_MONOMER__c*7^(-1)); Complexation_MG_392_393_21MER is "Complexation (GroEL-GroES chaperonin complex)";
  Complexation_MG_394_TETRAMER: 4 MG_394_MONOMER__c => MG_394_TETRAMER__c; MG_394_MONOMER__c*4^(-1); Complexation_MG_394_TETRAMER is "Complexation (serine hydroxymethyltransferase)";
  Complexation_MG_396_DIMER: 2 MG_396_MONOMER__c => MG_396_DIMER__c; MG_396_MONOMER__c*2^(-1); Complexation_MG_396_DIMER is "Complexation (ribose 5-phosphate isomerase B)";
  Complexation_MG_398_399_400_401_402_403_404_405_22MER: MG_398_MONOMER__c + 3 MG_399_MONOMER__c + MG_400_MONOMER__c + 3 MG_401_MONOMER__c + MG_402_MONOMER__c + 2 MG_403_MONOMER__m + 10 MG_404_MONOMER__m + MG_405_MONOMER__m => MG_398_399_400_401_402_403_404_405_22MER__m; min2(min2(min2(min2(MG_398_MONOMER__c*1^(-1), min4(MG_399_MONOMER__c*3^(-1), MG_400_MONOMER__c*1^(-1), MG_401_MONOMER__c*3^(-1), MG_402_MONOMER__c*1^(-1))), MG_403_MONOMER__m*2^(-1)), MG_404_MONOMER__m*10^(-1)), MG_405_MONOMER__m*1^(-1)); Complexation_MG_398_399_400_401_402_403_404_405_22MER is "Complexation (H(+)-transporting two-sector ATPase)";
  Complexation_MG_407_DIMER: 2 MG_407_MONOMER__c => MG_407_DIMER__c; MG_407_MONOMER__c*2^(-1); Complexation_MG_407_DIMER is "Complexation (enolase)";
  Complexation_MG_409_DIMER: 2 MG_409_MONOMER__c => MG_409_DIMER__c; MG_409_MONOMER__c*2^(-1); Complexation_MG_409_DIMER is "Complexation (phosphate transport system regulatory protein PhoU, putative)";
  Complexation_MG_410_411_412_PENTAMER: 2 MG_410_MONOMER__c + 2 MG_411_MONOMER__m + MG_412_MONOMER__e => MG_410_411_412_PENTAMER__m; min2(min2(MG_410_MONOMER__c*2^(-1), MG_411_MONOMER__m*2^(-1)), MG_412_MONOMER__e*1^(-1)); Complexation_MG_410_411_412_PENTAMER is "Complexation (phosphate ABC transporter)";
  Complexation_MG_425_DIMER: 2 MG_425_MONOMER__c => MG_425_DIMER__c; MG_425_MONOMER__c*2^(-1); Complexation_MG_425_DIMER is "Complexation (ATP-dependent RNA helicase)";
  Complexation_MG_427_DIMER: 2 MG_427_MONOMER__c => MG_427_DIMER__c; MG_427_MONOMER__c*2^(-1); Complexation_MG_427_DIMER is "Complexation (osmotically inducible peroxidase)";
  Complexation_MG_427_DIMER_ox: 2 MG_427_MONOMER__c => MG_427_DIMER_ox__c; MG_427_MONOMER__c*2^(-1); Complexation_MG_427_DIMER_ox is "Complexation (oxidized osmotically inducible peroxidase)";
  Complexation_MG_428_DIMER: 2 MG_428_MONOMER__c => MG_428_DIMER__c; MG_428_MONOMER__c*2^(-1); Complexation_MG_428_DIMER is "Complexation (LuxR bacterial regulatory protein, putative)";
  Complexation_MG_431_DIMER: 2 MG_431_MONOMER__c => MG_431_DIMER__c; MG_431_MONOMER__c*2^(-1); Complexation_MG_431_DIMER is "Complexation (triosephosphate isomerase)";
  Complexation_MG_433_DIMER: 2 MG_433_MONOMER__c => MG_433_DIMER__c; MG_433_MONOMER__c*2^(-1); Complexation_MG_433_DIMER is "Complexation (translation elongation factor Ts)";
  Complexation_MG_434_HEXAMER: 6 MG_434_MONOMER__c => MG_434_HEXAMER__c; MG_434_MONOMER__c*6^(-1); Complexation_MG_434_HEXAMER is "Complexation (uridylate kinase)";
  Complexation_MG_437_DIMER: 2 MG_437_MONOMER__m => MG_437_DIMER__m; MG_437_MONOMER__m*2^(-1); Complexation_MG_437_DIMER is "Complexation (phosphatidate cytidylyltransferase)";
  Complexation_MG_445_DIMER: 2 MG_445_MONOMER__c => MG_445_DIMER__c; MG_445_MONOMER__c*2^(-1); Complexation_MG_445_DIMER is "Complexation (tRNA (guanine-N1)-methyltransferase)";
  Complexation_MG_451_DIMER: 2 MG_451_MONOMER__c => MG_451_DIMER__c; MG_451_MONOMER__c*2^(-1); Complexation_MG_451_DIMER is "Complexation (translation elongation factor Tu)";
  Complexation_MG_453_TETRAMER: 4 MG_453_MONOMER__c => MG_453_TETRAMER__c; MG_453_MONOMER__c*4^(-1); Complexation_MG_453_TETRAMER is "Complexation (UTP-glucose-1-phosphate uridylyltransferase)";
  Complexation_MG_454_DIMER: 2 MG_454_MONOMER__c => MG_454_DIMER__c; MG_454_MONOMER__c*2^(-1); Complexation_MG_454_DIMER is "Complexation (thiol-dependent peroxidase)";
  Complexation_MG_454_DIMER_ox: 2 MG_454_MONOMER__c => MG_454_DIMER_ox__c; MG_454_MONOMER__c*2^(-1); Complexation_MG_454_DIMER_ox is "Complexation (oxidized thiol-dependent peroxidase)";
  Complexation_MG_455_DIMER: 2 MG_455_MONOMER__c => MG_455_DIMER__c; MG_455_MONOMER__c*2^(-1); Complexation_MG_455_DIMER is "Complexation (tyrosyl-tRNA synthetase)";
  Complexation_MG_457_HEXAMER: 6 MG_457_MONOMER__m => MG_457_HEXAMER__m; MG_457_MONOMER__m*6^(-1); Complexation_MG_457_HEXAMER is "Complexation (ATP-dependent metalloprotease FtsH)";
  Complexation_MG_458_TETRAMER: 4 MG_458_MONOMER__c => MG_458_TETRAMER__c; MG_458_MONOMER__c*4^(-1); Complexation_MG_458_TETRAMER is "Complexation (hypoxanthine phosphoribosyltransferase)";
  Complexation_MG_460_TETRAMER: 4 MG_460_MONOMER__c => MG_460_TETRAMER__c; MG_460_MONOMER__c*4^(-1); Complexation_MG_460_TETRAMER is "Complexation (L-lactate dehydrogenase/malate dehydrogenase)";
  Complexation_MG_467_468_526_TETRAMER: MG_467_MONOMER__c + 2 MG_468_MONOMER__m + MG_526_MONOMER__c => MG_467_468_526_TETRAMER__m; min2(min2(MG_467_MONOMER__c*1^(-1), MG_468_MONOMER__m*2^(-1)), MG_526_MONOMER__c*1^(-1)); Complexation_MG_467_468_526_TETRAMER is "Complexation (salivaricin A ABC transporter)";
  Complexation_MG_469_1MER_ADP: MG_469_MONOMER__c => MG_469_1MER_ADP__c; MG_469_MONOMER__c*1^(-1); Complexation_MG_469_1MER_ADP is "Complexation (DnaA-ADP)";
  Complexation_MG_469_1MER_ATP: MG_469_MONOMER__c => MG_469_1MER_ATP__c; MG_469_MONOMER__c*1^(-1); Complexation_MG_469_1MER_ATP is "Complexation (DnaA-ATP)";
  Complexation_MG_469_2MER_1ATP_ADP: 2 MG_469_MONOMER__c => MG_469_2MER_1ATP_ADP__c; MG_469_MONOMER__c*2^(-1); Complexation_MG_469_2MER_1ATP_ADP is "Complexation (DnaA 2mer-(1)ATP-(1)ADP)";
  Complexation_MG_469_2MER_ATP: 2 MG_469_MONOMER__c => MG_469_2MER_ATP__c; MG_469_MONOMER__c*2^(-1); Complexation_MG_469_2MER_ATP is "Complexation (DnaA-ATP 2mer)";
  Complexation_MG_469_3MER_2ATP_ADP: 3 MG_469_MONOMER__c => MG_469_3MER_2ATP_ADP__c; MG_469_MONOMER__c*3^(-1); Complexation_MG_469_3MER_2ATP_ADP is "Complexation (DnaA 3mer-(2)ATP-(1)ADP)";
  Complexation_MG_469_3MER_ATP: 3 MG_469_MONOMER__c => MG_469_3MER_ATP__c; MG_469_MONOMER__c*3^(-1); Complexation_MG_469_3MER_ATP is "Complexation (DnaA-ATP 3mer)";
  Complexation_MG_469_4MER_3ATP_ADP: 4 MG_469_MONOMER__c => MG_469_4MER_3ATP_ADP__c; MG_469_MONOMER__c*4^(-1); Complexation_MG_469_4MER_3ATP_ADP is "Complexation (DnaA 4mer-(3)ATP-(1)ADP)";
  Complexation_MG_469_4MER_ATP: 4 MG_469_MONOMER__c => MG_469_4MER_ATP__c; MG_469_MONOMER__c*4^(-1); Complexation_MG_469_4MER_ATP is "Complexation (DnaA-ATP 4mer)";
  Complexation_MG_469_5MER_4ATP_ADP: 5 MG_469_MONOMER__c => MG_469_5MER_4ATP_ADP__c; MG_469_MONOMER__c*5^(-1); Complexation_MG_469_5MER_4ATP_ADP is "Complexation (DnaA 5mer-(4)ATP-(1)ADP)";
  Complexation_MG_469_5MER_ATP: 5 MG_469_MONOMER__c => MG_469_5MER_ATP__c; MG_469_MONOMER__c*5^(-1); Complexation_MG_469_5MER_ATP is "Complexation (DnaA-ATP 5mer)";
  Complexation_MG_469_6MER_5ATP_ADP: 6 MG_469_MONOMER__c => MG_469_6MER_5ATP_ADP__c; MG_469_MONOMER__c*6^(-1); Complexation_MG_469_6MER_5ATP_ADP is "Complexation (DnaA 6mer-(5)ATP-(1)ADP)";
  Complexation_MG_469_6MER_ATP: 6 MG_469_MONOMER__c => MG_469_6MER_ATP__c; MG_469_MONOMER__c*6^(-1); Complexation_MG_469_6MER_ATP is "Complexation (DnaA-ATP 6mer)";
  Complexation_MG_469_7MER_6ATP_ADP: 7 MG_469_MONOMER__c => MG_469_7MER_6ATP_ADP__c; MG_469_MONOMER__c*7^(-1); Complexation_MG_469_7MER_6ATP_ADP is "Complexation (DnaA 7mer-(6)ATP-(1)ADP)";
  Complexation_MG_469_7MER_ATP: 7 MG_469_MONOMER__c => MG_469_7MER_ATP__c; MG_469_MONOMER__c*7^(-1); Complexation_MG_469_7MER_ATP is "Complexation (DnaA-ATP 7mer)";
  Complexation_MG_482_DIMER: 2 MG_482_MONOMER__c => MG_482_DIMER__c; MG_482_MONOMER__c*2^(-1); Complexation_MG_482_DIMER is "Complexation (holo-(acyl-carrier-protein) synthase)";
  Complexation_REPLISOME: 4 MG_001_MONOMER__c + MG_007_MONOMER__c + 2 MG_031_MONOMER__c + 6 MG_094_MONOMER__c + MG_250_MONOMER__c + 2 MG_261_MONOMER__c + MG_315_MONOMER__c + 4 MG_419_MONOMER__c => REPLISOME__c; min2(min2(min2(min2(MG_001_MONOMER__c*4^(-1), min4(MG_007_MONOMER__c*1^(-1), MG_031_MONOMER__c*2^(-1), MG_094_MONOMER__c*6^(-1), MG_250_MONOMER__c*1^(-1))), MG_261_MONOMER__c*2^(-1)), MG_315_MONOMER__c*1^(-1)), MG_419_MONOMER__c*4^(-1)); Complexation_REPLISOME is "Complexation (Replisome)";
  Complexation_RIBOSOME_30S: MG_070_MONOMER__c + MG_087_MONOMER__c + MG_088_MONOMER__c + MG_090_MONOMER__c + MG_092_MONOMER__c + MG_150_MONOMER__c + MG_155_MONOMER__c + MG_157_MONOMER__c + MG_160_MONOMER__c + MG_164_MONOMER__c + MG_165_MONOMER__c + MG_168_MONOMER__c + MG_175_MONOMER__c + MG_176_MONOMER__c + MG_481_MONOMER__c + MG_311_MONOMER__c + MG_522_MONOMER__c + MG_417_MONOMER__c + MG_424_MONOMER__c + MG_446_MONOMER__c + MGrrnA16S__c => RIBOSOME_30S__c; min2(MG_070_MONOMER__c*1^(-1), min4(MG_087_MONOMER__c*1^(-1), MG_088_MONOMER__c*1^(-1), MG_090_MONOMER__c*1^(-1), MG_092_MONOMER__c*1^(-1))); Complexation_RIBOSOME_30S is "Complexation (30S ribosomal subunit)";
  Complexation_RIBOSOME_30S_IF3: MG_070_MONOMER__c + MG_087_MONOMER__c + MG_088_MONOMER__c + MG_090_MONOMER__c + MG_092_MONOMER__c + MG_150_MONOMER__c + MG_155_MONOMER__c + MG_157_MONOMER__c + MG_160_MONOMER__c + MG_164_MONOMER__c + MG_165_MONOMER__c + MG_168_MONOMER__c + MG_175_MONOMER__c + MG_176_MONOMER__c + MG_196_MONOMER__c + MG_481_MONOMER__c + MG_311_MONOMER__c + MG_522_MONOMER__c + MG_417_MONOMER__c + MG_424_MONOMER__c + MG_446_MONOMER__c + MGrrnA16S__c => RIBOSOME_30S_IF3__c; min2(MG_070_MONOMER__c*1^(-1), min4(MG_087_MONOMER__c*1^(-1), MG_088_MONOMER__c*1^(-1), MG_090_MONOMER__c*1^(-1), MG_092_MONOMER__c*1^(-1))); Complexation_RIBOSOME_30S_IF3 is "Complexation (30S ribosomal subunit - translation initiation factor IF-3 complex)";
  Complexation_RIBOSOME_50S: MG_473_MONOMER__c + MG_081_MONOMER__c + MG_082_MONOMER__c + MG_093_MONOMER__c + MG_151_MONOMER__c + MG_152_MONOMER__c + MG_153_MONOMER__c + MG_154_MONOMER__c + MG_156_MONOMER__c + MG_158_MONOMER__c + MG_159_MONOMER__c + MG_161_MONOMER__c + MG_162_MONOMER__c + MG_163_MONOMER__c + MG_166_MONOMER__c + MG_167_MONOMER__c + MG_169_MONOMER__c + MG_174_MONOMER__c + MG_178_MONOMER__c + MG_197_MONOMER__c + MG_198_MONOMER__c + MG_232_MONOMER__c + MG_234_MONOMER__c + MG_257_MONOMER__c + MG_325_MONOMER__c + MG_361_MONOMER__c + MG_362_MONOMER__c + MG_363_MONOMER__c + MG_418_MONOMER__c + MG_426_MONOMER__c + MG_444_MONOMER__c + MG_466_MONOMER__c + MGrrnA23S__c + MGrrnA5S__c => RIBOSOME_50S__c; min2(MG_473_MONOMER__c*1^(-1), min4(MG_081_MONOMER__c*1^(-1), MG_082_MONOMER__c*1^(-1), MG_093_MONOMER__c*1^(-1), MG_151_MONOMER__c*1^(-1))); Complexation_RIBOSOME_50S is "Complexation (50S ribosomal subunit)";
  Complexation_RIBOSOME_70S: MG_473_MONOMER__c + MG_070_MONOMER__c + MG_081_MONOMER__c + MG_082_MONOMER__c + MG_087_MONOMER__c + MG_088_MONOMER__c + MG_090_MONOMER__c + MG_092_MONOMER__c + MG_093_MONOMER__c + MG_150_MONOMER__c + MG_151_MONOMER__c + MG_152_MONOMER__c + MG_153_MONOMER__c + MG_154_MONOMER__c + MG_155_MONOMER__c + MG_156_MONOMER__c + MG_157_MONOMER__c + MG_158_MONOMER__c + MG_159_MONOMER__c + MG_160_MONOMER__c + MG_161_MONOMER__c + MG_162_MONOMER__c + MG_163_MONOMER__c + MG_164_MONOMER__c + MG_165_MONOMER__c + MG_166_MONOMER__c + MG_167_MONOMER__c + MG_168_MONOMER__c + MG_169_MONOMER__c + MG_174_MONOMER__c + MG_175_MONOMER__c + MG_176_MONOMER__c + MG_178_MONOMER__c + MG_197_MONOMER__c + MG_198_MONOMER__c + MG_481_MONOMER__c + MG_232_MONOMER__c + MG_234_MONOMER__c + MG_257_MONOMER__c + MG_311_MONOMER__c + MG_325_MONOMER__c + MG_361_MONOMER__c + MG_362_MONOMER__c + MG_363_MONOMER__c + MG_522_MONOMER__c + MG_417_MONOMER__c + MG_418_MONOMER__c + MG_424_MONOMER__c + MG_426_MONOMER__c + MG_444_MONOMER__c + MG_446_MONOMER__c + MG_466_MONOMER__c + MGrrnA16S__c + MGrrnA23S__c + MGrrnA5S__c => RIBOSOME_70S__c; min2(min2(MG_473_MONOMER__c*1^(-1), min4(MG_070_MONOMER__c*1^(-1), MG_081_MONOMER__c*1^(-1), MG_082_MONOMER__c*1^(-1), MG_087_MONOMER__c*1^(-1))), min4(MG_088_MONOMER__c*1^(-1), MG_090_MONOMER__c*1^(-1), MG_092_MONOMER__c*1^(-1), MG_093_MONOMER__c*1^(-1))); Complexation_RIBOSOME_70S is "Complexation (70S ribosome)";
  Complexation_RNA_POLYMERASE: MG_022_MONOMER__c + 2 MG_177_MONOMER__c + MG_340_MONOMER__c + MG_341_MONOMER__c => RNA_POLYMERASE__c; min2(min2(min2(MG_022_MONOMER__c*1^(-1), MG_177_MONOMER__c*2^(-1)), MG_340_MONOMER__c*1^(-1)), MG_341_MONOMER__c*1^(-1)); Complexation_RNA_POLYMERASE is "Complexation (DNA-directed RNA polymerase)";
  Complexation_RNA_POLYMERASE_HOLOENZYME: MG_022_MONOMER__c + 2 MG_177_MONOMER__c + MG_249_MONOMER__c + MG_340_MONOMER__c + MG_341_MONOMER__c => RNA_POLYMERASE_HOLOENZYME__c; min2(min2(min2(min2(MG_022_MONOMER__c*1^(-1), MG_177_MONOMER__c*2^(-1)), MG_249_MONOMER__c*1^(-1)), MG_340_MONOMER__c*1^(-1)), MG_341_MONOMER__c*1^(-1)); Complexation_RNA_POLYMERASE_HOLOENZYME is "Complexation (DNA-directed RNA polymerase holoenzyme)";
end
