// SBML level 3 version 1

model toy_ode_update()
  // ODE metabolite update submodel

  // Compartments:
  compartment extern = 1; extern is "external compartment";
  compartment cell = 1;

  // Species:
  species A in extern = 10/extern;
  species C in extern = 0;
  species B1 in cell = 0;
  species B2 in cell = 0;

  // Parameters:
  ub_R1 = 1;
  lb = 0; lb is "lower bound";
  ub = 1000; ub is "upper bound";
  v_R1 = 0; v_R1 is "R1 flux";
  v_R2 = 0; v_R2 is "R2 flux";
  v_R3 = 0; v_R3 is "R3 flux";

  // Reactions:
  A_import_R1: A -> B1; v_R1; A_import_R1 is "A import (R1)";
  B1_B2_R2: B1 -> B2; v_R2; B1_B2_R2 is "B1 <-> B2 (R2)";
  B2_export_R3: B2 -> C; v_R3; B2_export_R3 is "B2 export (R3)";
end
