// SBML level 3 version 1

model main()
  // model units - substance: item, time: second, extent: item

  // Compartments:
  compartment c = 1 litre;
  compartment m = 1 litre;
  compartment e = 1 litre;

  // Species:
  substanceOnly species ASP__c in c = 9407; ASP__c is "L-Aspartate";
  substanceOnly species GLY__c in c = 7679; GLY__c is "glycine";
  substanceOnly species ALA__c in c = 8303; ALA__c is "L-alanine";
  substanceOnly species TYR__c in c = 5375; TYR__c is "L-tyrosine";
  substanceOnly species CYS__c in c = 2181; CYS__c is "L-Cysteine";
  substanceOnly species HIS__c in c = 2933; HIS__c is "L-Histidine";
  substanceOnly species H2O__c in c = 309737899; H2O__c is "water";
  substanceOnly species MG_453_MONOMER__c in c = 1; MG_453_MONOMER__c is "UTP-glucose-1-phosphate uridylyltransferase";
  substanceOnly species LEU__c in c = 17971; LEU__c is "L-Leucine";
  substanceOnly species FMET__c in c = 0; FMET__c is "N-Formyl-L-methionine";
  substanceOnly species PHE__c in c = 7681; PHE__c is "L-phenylalanine";
  substanceOnly species TRP__c in c = 1084; TRP__c is "L-tryptophan";
  substanceOnly species MG_391_HEXAMER__c in c = 35; MG_391_HEXAMER__c is "cytosol aminopeptidase";
  substanceOnly species ARG__c in c = 5991; ARG__c is "L-Arginine";
  substanceOnly species VAL__c in c = 9500; VAL__c is "L-Valine";
  substanceOnly species SER__c in c = 8749; SER__c is "L-Serine";
  substanceOnly species MG_061_MONOMER__c in c = 22; MG_061_MONOMER__c is "Mycoplasma MFS transporter";
  substanceOnly species MG_041_MONOMER__c in c = 51; MG_041_MONOMER__c is "PTS system, HPr";
  substanceOnly species MG_053_MONOMER__c in c = 0; MG_053_MONOMER__c is "phosphoglucomutase/phosphomannomutase, putative";
  substanceOnly species MG_324_MONOMER__c in c = 208; MG_324_MONOMER__c is "aminopeptidase";
  substanceOnly species GLU__c in c = 9518; GLU__c is "L-Glutamate";
  substanceOnly species MG_111_MONOMER__c in c = 0; MG_111_MONOMER__c is "glucose-6-phosphate isomerase";
  substanceOnly species ILE__c in c = 14247; ILE__c is "L-Isoleucine";
  substanceOnly species THR__c in c = 4460; THR__c is "L-Threonine";
  substanceOnly species GLN__c in c = 7920; GLN__c is "L-glutamine";
  substanceOnly species MET__c in c = 2792; MET__c is "L-Methionine";
  substanceOnly species MG_069_MONOMER__c in c = 31; MG_069_MONOMER__c is "PTS system, glucose-specific IIABC component";
  substanceOnly species MG_183_MONOMER__c in c = 58; MG_183_MONOMER__c is "oligoendopeptidase F";
  substanceOnly species MG_429_MONOMER__c in c = 0; MG_429_MONOMER__c is "PTS system, E1";
  substanceOnly species ASN__c in c = 11161; ASN__c is "L-Asparagine";
  substanceOnly species LYS__c in c = 15094; LYS__c is "L-Lysine";
  substanceOnly species MG_020_MONOMER__c in c = 34; MG_020_MONOMER__c is "proline iminopeptidase";
  substanceOnly species PRO__c in c = 4140; PRO__c is "L-Proline";

  // Reactions:
  Protein_decay_MG_453_MONOMER_c: MG_453_MONOMER__c + 291 H2O__c => 23 ALA__c + 7 ARG__c + 16 ASN__c + 17 ASP__c + 4 CYS__c + 10 GLN__c + 20 GLU__c + 18 GLY__c + 4 HIS__c + 23 ILE__c + 34 LEU__c + 33 LYS__c + 2 MET__c + 14 PHE__c + 12 PRO__c + 10 SER__c + 13 THR__c + 9 TYR__c + 22 VAL__c + FMET__c; Protein_decay_MG_453_MONOMER_c_kcat*MG_183_MONOMER__c*MG_324_MONOMER__c*MG_391_HEXAMER__c*MG_020_MONOMER__c*MG_453_MONOMER__c/(1 + MG_453_MONOMER__c/Protein_decay_MG_453_MONOMER_c_k_1); Protein_decay_MG_453_MONOMER_c is "Protein decay (UTP-glucose-1-phosphate uridylyltransferase, cytosol)";  // modifiers: MG_183_MONOMER__c, MG_324_MONOMER__c, MG_391_HEXAMER__c, MG_020_MONOMER__c
    Protein_decay_MG_453_MONOMER_c_kcat = 1; Protein_decay_MG_453_MONOMER_c_k_1 = 1;
  Protein_decay_MG_111_MONOMER_c: MG_111_MONOMER__c + 432 H2O__c => 20 ALA__c + 10 ARG__c + 20 ASN__c + 27 ASP__c + CYS__c + 20 GLN__c + 17 GLU__c + 26 GLY__c + 16 HIS__c + 28 ILE__c + 52 LEU__c + 45 LYS__c + 7 MET__c + 29 PHE__c + 11 PRO__c + 30 SER__c + 23 THR__c + 4 TRP__c + 18 TYR__c + 28 VAL__c + FMET__c; Protein_decay_MG_111_MONOMER_c_kcat*MG_183_MONOMER__c*MG_324_MONOMER__c*MG_391_HEXAMER__c*MG_020_MONOMER__c*MG_111_MONOMER__c/(1 + MG_111_MONOMER__c/Protein_decay_MG_111_MONOMER_c_k_1); Protein_decay_MG_111_MONOMER_c is "Protein decay (glucose-6-phosphate isomerase, cytosol)";  // modifiers: MG_183_MONOMER__c, MG_324_MONOMER__c, MG_391_HEXAMER__c, MG_020_MONOMER__c
    Protein_decay_MG_111_MONOMER_c_kcat = 1; Protein_decay_MG_111_MONOMER_c_k_1 = 1;
  Protein_decay_MG_041_MONOMER_c: MG_041_MONOMER__c + 87 H2O__c => 12 ALA__c + 2 ARG__c + 5 ASN__c + 4 ASP__c + CYS__c + GLN__c + 7 GLU__c + 5 GLY__c + 2 HIS__c + 11 ILE__c + 7 LEU__c + 11 LYS__c + MET__c + 2 PHE__c + 3 PRO__c + 7 SER__c + THR__c + 5 VAL__c + FMET__c; Protein_decay_MG_041_MONOMER_c_kcat*MG_183_MONOMER__c*MG_324_MONOMER__c*MG_391_HEXAMER__c*MG_020_MONOMER__c*MG_041_MONOMER__c/(1 + MG_041_MONOMER__c/Protein_decay_MG_041_MONOMER_c_k_1); Protein_decay_MG_041_MONOMER_c is "Protein decay (PTS system, HPr, cytosol)";  // modifiers: MG_183_MONOMER__c, MG_324_MONOMER__c, MG_391_HEXAMER__c, MG_020_MONOMER__c
    Protein_decay_MG_041_MONOMER_c_kcat = 1; Protein_decay_MG_041_MONOMER_c_k_1 = 1;
  Protein_decay_MG_069_MONOMER_c: MG_069_MONOMER__c + 907 H2O__c => 78 ALA__c + 24 ARG__c + 45 ASN__c + 34 ASP__c + 2 CYS__c + 29 GLN__c + 28 GLU__c + 88 GLY__c + 8 HIS__c + 76 ILE__c + 89 LEU__c + 60 LYS__c + 16 MET__c + 59 PHE__c + 44 PRO__c + 58 SER__c + 64 THR__c + 15 TRP__c + 25 TYR__c + 65 VAL__c + FMET__c; Protein_decay_MG_069_MONOMER_c_kcat*MG_183_MONOMER__c*MG_324_MONOMER__c*MG_391_HEXAMER__c*MG_020_MONOMER__c*MG_069_MONOMER__c/(1 + MG_069_MONOMER__c/Protein_decay_MG_069_MONOMER_c_k_1); Protein_decay_MG_069_MONOMER_c is "Protein decay (PTS system, glucose-specific IIABC component, cytosol)";  // modifiers: MG_183_MONOMER__c, MG_324_MONOMER__c, MG_391_HEXAMER__c, MG_020_MONOMER__c
    Protein_decay_MG_069_MONOMER_c_kcat = 1; Protein_decay_MG_069_MONOMER_c_k_1 = 1;
  Protein_decay_MG_429_MONOMER_c: MG_429_MONOMER__c + 571 H2O__c => 40 ALA__c + 15 ARG__c + 33 ASN__c + 34 ASP__c + 3 CYS__c + 30 GLN__c + 30 GLU__c + 32 GLY__c + 6 HIS__c + 47 ILE__c + 61 LEU__c + 58 LYS__c + 17 MET__c + 28 PHE__c + 14 PRO__c + 33 SER__c + 33 THR__c + 3 TRP__c + 16 TYR__c + 38 VAL__c + FMET__c; Protein_decay_MG_429_MONOMER_c_kcat*MG_183_MONOMER__c*MG_324_MONOMER__c*MG_391_HEXAMER__c*MG_020_MONOMER__c*MG_429_MONOMER__c/(1 + MG_429_MONOMER__c/Protein_decay_MG_429_MONOMER_c_k_1); Protein_decay_MG_429_MONOMER_c is "Protein decay (PTS system, E1, cytosol)";  // modifiers: MG_183_MONOMER__c, MG_324_MONOMER__c, MG_391_HEXAMER__c, MG_020_MONOMER__c
    Protein_decay_MG_429_MONOMER_c_kcat = 1; Protein_decay_MG_429_MONOMER_c_k_1 = 1;
  Protein_decay_MG_053_MONOMER_c: MG_053_MONOMER__c + 549 H2O__c => 34 ALA__c + 17 ARG__c + 49 ASN__c + 24 ASP__c + 4 CYS__c + 21 GLN__c + 38 GLU__c + 29 GLY__c + 13 HIS__c + 31 ILE__c + 58 LEU__c + 49 LYS__c + 6 MET__c + 37 PHE__c + 16 PRO__c + 24 SER__c + 30 THR__c + 7 TRP__c + 26 TYR__c + 36 VAL__c + FMET__c; Protein_decay_MG_053_MONOMER_c_kcat*MG_183_MONOMER__c*MG_324_MONOMER__c*MG_391_HEXAMER__c*MG_020_MONOMER__c*MG_053_MONOMER__c/(1 + MG_053_MONOMER__c/Protein_decay_MG_053_MONOMER_c_k_1); Protein_decay_MG_053_MONOMER_c is "Protein decay (phosphoglucomutase/phosphomannomutase, putative, cytosol)";  // modifiers: MG_183_MONOMER__c, MG_324_MONOMER__c, MG_391_HEXAMER__c, MG_020_MONOMER__c
    Protein_decay_MG_053_MONOMER_c_kcat = 1; Protein_decay_MG_053_MONOMER_c_k_1 = 1;
  Protein_decay_MG_061_MONOMER_c: MG_061_MONOMER__c + 566 H2O__c => 33 ALA__c + 9 ARG__c + 26 ASN__c + 13 ASP__c + 6 CYS__c + 24 GLN__c + 12 GLU__c + 44 GLY__c + 3 HIS__c + 61 ILE__c + 71 LEU__c + 32 LYS__c + 11 MET__c + 40 PHE__c + 19 PRO__c + 45 SER__c + 41 THR__c + 16 TRP__c + 17 TYR__c + 43 VAL__c + FMET__c; Protein_decay_MG_061_MONOMER_c_kcat*MG_183_MONOMER__c*MG_324_MONOMER__c*MG_391_HEXAMER__c*MG_020_MONOMER__c*MG_061_MONOMER__c/(1 + MG_061_MONOMER__c/Protein_decay_MG_061_MONOMER_c_k_1); Protein_decay_MG_061_MONOMER_c is "Protein decay (Mycoplasma MFS transporter, cytosol)";  // modifiers: MG_183_MONOMER__c, MG_324_MONOMER__c, MG_391_HEXAMER__c, MG_020_MONOMER__c
    Protein_decay_MG_061_MONOMER_c_kcat = 1; Protein_decay_MG_061_MONOMER_c_k_1 = 1;
end
