// SBML level 2 version 4

function TranslocationRate(k_cat, en1, en2, monomer, atp, Km1, Km2)
  k_cat*en1*en2*monomer*atp/((1 + monomer/Km1)*(1 + atp/Km2));
end

model ProteinTranslocation()

  // Compartments:
  compartment c = 1;
  compartment e = 1;
  compartment m = 1;

  // Species:
  species ADP__c in c = 3623/c;
  species ATP__c in c = 36234/c;
  species H2O__c in c = 3.09737899e8/c; H2O__c is "water";
  species H__c in c = 13042/c; H__c is "hydrogen ion";
  species MG_014_MONOMER__c in c = 0; MG_014_MONOMER__c is "multidrug ABC transporter, ATP-binding/permease protein";
  species MG_015_MONOMER__c in c = 0; MG_015_MONOMER__c is "multidrug ABC transporter, ATP-binding/permease protein";
  species MG_028_MONOMER__c in c = 0; MG_028_MONOMER__c is "protein-monomer, MG_028_MONOMER";
  species MG_032_MONOMER__c in c = 0; MG_032_MONOMER__c is "protein-monomer, MG_032_MONOMER";
  species MG_033_MONOMER__c in c = 0; MG_033_MONOMER__c is "glycerol uptake facilitator";
  species MG_040_MONOMER__c in c = 0; MG_040_MONOMER__c is "Monosaccharide (riboside/galactoside) ABC transporter, substrate binding protein";
  species MG_043_MONOMER__c in c = 0; MG_043_MONOMER__c is "spermidine/putrescine (polyamine) ABC transporter, permease protein, putative";
  species MG_044_MONOMER__c in c = 0; MG_044_MONOMER__c is "spermidine/putrescine (polyamine) ABC transporter, permease protein, putative";
  species MG_045_MONOMER__c in c = 0; MG_045_MONOMER__c is "spermidine/putrescine (polyamine) ABC transporter, spermidine/putrescine binding protein, putative";
  species MG_055_MONOMER__c in c = 0; MG_055_MONOMER__c is "preprotein translocase, SecE subunit";
  species MG_061_MONOMER__c in c = 0; MG_061_MONOMER__c is "Mycoplasma MFS transporter";
  species MG_062_MONOMER__c in c = 0; MG_062_MONOMER__c is "PTS system, fructose-specific IIABC component";
  species MG_064_MONOMER__c in c = 0; MG_064_MONOMER__c is "ABC transporter, permease protein, putative";
  species MG_067_MONOMER__c in c = 0; MG_067_MONOMER__c is "lipoprotein, putative";
  species MG_068_MONOMER__c in c = 0; MG_068_MONOMER__c is "lipoprotein, putative";
  species MG_069_MONOMER__c in c = 0; MG_069_MONOMER__c is "PTS system, glucose-specific IIABC component";
  species MG_071_MONOMER__c in c = 0; MG_071_MONOMER__c is "ATPase, P-type (transporting), HAD superfamily, subfamily IC";
  species MG_072_DIMER__c in c = 13/c; MG_072_DIMER__c is "preprotein translocase, SecA subunit";
  species MG_074_MONOMER__c in c = 0; MG_074_MONOMER__c is "protein-monomer, MG_074_MONOMER";
  species MG_075_MONOMER__c in c = 0; MG_075_MONOMER__c is "116 kDa surface antigen";
  species MG_076_MONOMER__c in c = 0; MG_076_MONOMER__c is "protein-monomer, MG_076_MONOMER";
  species MG_077_MONOMER__c in c = 0; MG_077_MONOMER__c is "oligopeptide ABC transporter, permease protein";
  species MG_078_MONOMER__c in c = 0; MG_078_MONOMER__c is "oligopeptide ABC transporter, permease protein";
  species MG_086_MONOMER__c in c = 0; MG_086_MONOMER__c is "prolipoprotein diacylglyceryl transferase";
  species MG_095_MONOMER__c in c = 0; MG_095_MONOMER__c is "lipoprotein, putative";
  species MG_096_MONOMER__c in c = 0; MG_096_MONOMER__c is "protein-monomer, MG_096_MONOMER";
  species MG_109_MONOMER__c in c = 0; MG_109_MONOMER__c is "serine/threonine protein kinase, putative";
  species MG_114_MONOMER__c in c = 0; MG_114_MONOMER__c is "CDP-diacylglycerol--glycerol-3-phosphate 3-phosphatidyltransferase";
  species MG_120_MONOMER__c in c = 0; MG_120_MONOMER__c is "Monosaccharide (riboside/galactoside) ABC transporter, permease protein";
  species MG_121_MONOMER__c in c = 0; MG_121_MONOMER__c is "Monosaccharide (riboside/galactoside) ABC transporter, permease protein";
  species MG_123_MONOMER__c in c = 0; MG_123_MONOMER__c is "arginine deaminasse";
  species MG_129_MONOMER__c in c = 0; MG_129_MONOMER__c is "Putative phosphotransferase enzyme glucose-specific IIB component";
  species MG_130_MONOMER__c in c = 0; MG_130_MONOMER__c is "protein-monomer, MG_130_MONOMER";
  species MG_131_MONOMER__c in c = 0; MG_131_MONOMER__c is "hypothetical protein";
  species MG_133_MONOMER__c in c = 0; MG_133_MONOMER__c is "membrane protein, putative";
  species MG_135_MONOMER__c in c = 0; MG_135_MONOMER__c is "membrane protein, putative";
  species MG_144_MONOMER__c in c = 0; MG_144_MONOMER__c is "protein-monomer, MG_144_MONOMER";
  species MG_146_MONOMER__c in c = 0; MG_146_MONOMER__c is "UPF0053 protein";
  species MG_147_MONOMER__c in c = 0; MG_147_MONOMER__c is "membrane protein, putative";
  species MG_148_MONOMER__c in c = 0; MG_148_MONOMER__c is "protein-monomer, MG_148_MONOMER";
  species MG_149_MONOMER__c in c = 0; MG_149_MONOMER__c is "lipoprotein, putative";
  species MG_170_MONOMER__c in c = 0; MG_170_MONOMER__c is "preprotein translocase, SecY subunit";
  species MG_181_MONOMER__c in c = 0; MG_181_MONOMER__c is "metal ion (cobalt) ABC transporter, permease protein";
  species MG_185_MONOMER__c in c = 0; MG_185_MONOMER__c is "lipoprotein, putative";
  species MG_186_MONOMER__c in c = 0; MG_186_MONOMER__c is "Oligosaccharide or polyol ABC transporter, substrate binding protein";
  species MG_188_MONOMER__c in c = 0; MG_188_MONOMER__c is "Oligosaccharide or polyol ABC transporter, permease protein";
  species MG_189_MONOMER__c in c = 0; MG_189_MONOMER__c is "Oligosaccharide or polyol ABC transporter, permease protein";
  species MG_191_MONOMER__c in c = 0; MG_191_MONOMER__c is "MgPa adhesin";
  species MG_192_MONOMER__c in c = 0; MG_192_MONOMER__c is "P110 protein";
  species MG_210_MONOMER__c in c = 0; MG_210_MONOMER__c is "prolipoprotein signal peptidase, signal peptidase II";
  species MG_212_MONOMER__c in c = 0; MG_212_MONOMER__c is "1-acyl-sn-glycerol-3-phosphate acyltransferase, putative";
  species MG_220_MONOMER__c in c = 0; MG_220_MONOMER__c is "protein-monomer, MG_220_MONOMER";
  species MG_225_MONOMER__c in c = 0; MG_225_MONOMER__c is "amino acid-polyamine-organocation (APC) permease";
  species MG_226_MONOMER__c in c = 0; MG_226_MONOMER__c is "amino acid-polyamine-organocation (APC) permease";
  species MG_241_MONOMER__c in c = 0; MG_241_MONOMER__c is "protein-monomer, MG_241_MONOMER";
  species MG_242_MONOMER__c in c = 0; MG_242_MONOMER__c is "protein-monomer, MG_242_MONOMER";
  species MG_243_MONOMER__c in c = 0; MG_243_MONOMER__c is "conserved hypothetical protein, authentic frameshift";
  species MG_247_MONOMER__c in c = 0; MG_247_MONOMER__c is "membrane protein, putative";
  species MG_255_MONOMER__c in c = 0; MG_255_MONOMER__c is "protein-monomer, MG_255_MONOMER";
  species MG_256_MONOMER__c in c = 0; MG_256_MONOMER__c is "protein-monomer, MG_256_MONOMER";
  species MG_260_MONOMER__c in c = 0; MG_260_MONOMER__c is "lipoprotein, putative";
  species MG_267_MONOMER__c in c = 0; MG_267_MONOMER__c is "protein-monomer, MG_267_MONOMER";
  species MG_275_MONOMER__c in c = 0; MG_275_MONOMER__c is "NADH oxidase";
  species MG_277_MONOMER__c in c = 0; MG_277_MONOMER__c is "Protein-export membrane protein secDF";
  species MG_279_MONOMER__c in c = 0; MG_279_MONOMER__c is "protein-monomer, MG_279_MONOMER";
  species MG_280_MONOMER__c in c = 0; MG_280_MONOMER__c is "sensory rhodopsin II transducer motif";
  species MG_281_MONOMER__c in c = 0; MG_281_MONOMER__c is "protein-monomer, MG_281_MONOMER";
  species MG_286_MONOMER__c in c = 0; MG_286_MONOMER__c is "protein-monomer, MG_286_MONOMER";
  species MG_289_MONOMER__c in c = 0; MG_289_MONOMER__c is "phosphonate ABC transporter, substrate binding protein (P37), putative";
  species MG_291_MONOMER__c in c = 0; MG_291_MONOMER__c is "phosphonate ABC transporter, permease protein (P69), putative";
  species MG_294_MONOMER__c in c = 0; MG_294_MONOMER__c is "major facilitator superfamily (MFS) protein";
  species MG_302_MONOMER__c in c = 0; MG_302_MONOMER__c is "metal ion (cobalt) ABC transporter, permease protein, putative";
  species MG_306_MONOMER__c in c = 0; MG_306_MONOMER__c is "membrane protein, putative";
  species MG_307_MONOMER__c in c = 0; MG_307_MONOMER__c is "lipoprotein, putative";
  species MG_309_MONOMER__c in c = 0; MG_309_MONOMER__c is "lipoprotein, putative";
  species MG_310_MONOMER__c in c = 0; MG_310_MONOMER__c is "hydrolase, Putative esterase/lipase 1";
  species MG_313_MONOMER__c in c = 0; MG_313_MONOMER__c is "membrane protein, putative";
  species MG_314_MONOMER__c in c = 0; MG_314_MONOMER__c is "protein-monomer, MG_314_MONOMER";
  species MG_316_MONOMER__c in c = 0; MG_316_MONOMER__c is "DNA internalization-related competence protein ComEC/Rec2";
  species MG_318_MONOMER__c in c = 0; MG_318_MONOMER__c is "P32 adhesin";
  species MG_319_MONOMER__c in c = 0; MG_319_MONOMER__c is "protein-monomer, MG_319_MONOMER";
  species MG_320_MONOMER__c in c = 0; MG_320_MONOMER__c is "membrane protein, putative";
  species MG_321_MONOMER__c in c = 0; MG_321_MONOMER__c is "oligopeptide ABC transporter, substrate binding protein";
  species MG_322_MONOMER__c in c = 0; MG_322_MONOMER__c is "potassium uptake protein";
  species MG_327_MONOMER__c in c = 0; MG_327_MONOMER__c is "hydrolase, Putative esterase/lipase 2";
  species MG_331_MONOMER__c in c = 0; MG_331_MONOMER__c is "protein-monomer, MG_331_MONOMER";
  species MG_338_MONOMER__c in c = 0; MG_338_MONOMER__c is "lipoprotein, putative";
  species MG_344_MONOMER__c in c = 0; MG_344_MONOMER__c is "hydrolase, Putative esterase/lipase 3";
  species MG_348_MONOMER__c in c = 0; MG_348_MONOMER__c is "lipoprotein, putative";
  species MG_354_MONOMER__c in c = 0; MG_354_MONOMER__c is "protein-monomer, MG_354_MONOMER";
  species MG_364_MONOMER__c in c = 0; MG_364_MONOMER__c is "Replication initiation/membrane attachment protein";
  species MG_389_MONOMER__c in c = 0; MG_389_MONOMER__c is "protein-monomer, MG_389_MONOMER";
  species MG_390_MONOMER__c in c = 0; MG_390_MONOMER__c is "toxin ABC transporter, ATP-binding/permease protein";
  species MG_395_MONOMER__c in c = 0; MG_395_MONOMER__c is "lipoprotein, putative";
  species MG_397_MONOMER__c in c = 0; MG_397_MONOMER__c is "protein-monomer, MG_397_MONOMER";
  species MG_403_MONOMER__c in c = 0; MG_403_MONOMER__c is "ATP synthase F0, B subunit";
  species MG_404_MONOMER__c in c = 0; MG_404_MONOMER__c is "ATP synthase F0, C subunit";
  species MG_405_MONOMER__c in c = 0; MG_405_MONOMER__c is "ATP synthase F0, A subunit";
  species MG_406_MONOMER__c in c = 0; MG_406_MONOMER__c is "protein-monomer, MG_406_MONOMER";
  species MG_411_MONOMER__c in c = 0; MG_411_MONOMER__c is "phosphate ABC transporter, permease protein PstA";
  species MG_412_MONOMER__c in c = 0; MG_412_MONOMER__c is "phosphate ABC transporter, substrate-binding protein";
  species MG_414_MONOMER__c in c = 0; MG_414_MONOMER__c is "protein-monomer, MG_414_MONOMER";
  species MG_426_MONOMER__c in c = 152/c; MG_426_MONOMER__c is "ribosomal protein L28";
  species MG_427_MONOMER__c in c = 0; MG_427_MONOMER__c is "osmotically inducible peroxidase";
  species MG_428_MONOMER__c in c = 1/c; MG_428_MONOMER__c is "LuxR bacterial regulatory protein, putative";
  species MG_429_MONOMER__c in c = 0; MG_429_MONOMER__c is "PTS system, E1";
  species MG_431_MONOMER__c in c = 1/c; MG_431_MONOMER__c is "triosephosphate isomerase";
  species MG_432_MONOMER__c in c = 0; MG_432_MONOMER__c is "membrane protein, putative";
  species MG_433_MONOMER__c in c = 0; MG_433_MONOMER__c is "translation elongation factor Ts";
  species MG_434_MONOMER__c in c = 3/c; MG_434_MONOMER__c is "uridylate kinase";
  species MG_437_MONOMER__c in c = 0; MG_437_MONOMER__c is "phosphatidate cytidylyltransferase";
  species MG_439_MONOMER__c in c = 0; MG_439_MONOMER__c is "lipoprotein, putative";
  species MG_440_MONOMER__c in c = 0; MG_440_MONOMER__c is "lipoprotein, putative";
  species MG_441_MONOMER__c in c = 0; MG_441_MONOMER__c is "protein-monomer, MG_441_MONOMER";
  species MG_443_MONOMER__c in c = 0; MG_443_MONOMER__c is "membrane protein, putative";
  species MG_444_MONOMER__c in c = 140/c; MG_444_MONOMER__c is "ribosomal protein L19";
  species MG_445_MONOMER__c in c = 1/c; MG_445_MONOMER__c is "tRNA (guanine-N1)-methyltransferase";
  species MG_446_MONOMER__c in c = 109/c; MG_446_MONOMER__c is "ribosomal protein S16";
  species MG_447_MONOMER__c in c = 0; MG_447_MONOMER__c is "multidrug efflux pump";
  species MG_451_MONOMER__c in c = 0; MG_451_MONOMER__c is "translation elongation factor Tu";
  species MG_452_MONOMER__c in c = 0; MG_452_MONOMER__c is "membrane protein, putative";
  species MG_453_MONOMER__c in c = 1/c; MG_453_MONOMER__c is "UTP-glucose-1-phosphate uridylyltransferase";
  species MG_454_MONOMER__c in c = 0; MG_454_MONOMER__c is "thiol-dependent peroxidase";
  species MG_455_MONOMER__c in c = 1/c; MG_455_MONOMER__c is "tyrosyl-tRNA synthetase";
  species MG_456_MONOMER__c in c = 0; MG_456_MONOMER__c is "protein-monomer, MG_456_MONOMER";
  species MG_457_MONOMER__c in c = 0; MG_457_MONOMER__c is "ATP-dependent metalloprotease FtsH";
  species MG_458_MONOMER__c in c = 2/c; MG_458_MONOMER__c is "hypoxanthine phosphoribosyltransferase";
  species MG_460_MONOMER__c in c = 0; MG_460_MONOMER__c is "L-lactate dehydrogenase/malate dehydrogenase";
  species MG_464_MONOMER__c in c = 0; MG_464_MONOMER__c is "inner-membrane protein insertion factor";
  species MG_465_MONOMER__c in c = 11/c; MG_465_MONOMER__c is "ribonuclease P protein component";
  species MG_466_MONOMER__c in c = 134/c; MG_466_MONOMER__c is "ribosomal protein L34";
  species MG_467_MONOMER__c in c = 13/c; MG_467_MONOMER__c is "salivaricin A ABC transporter, ATP-binding protein";
  species MG_468_MONOMER__c in c = 0; MG_468_MONOMER__c is "salivaricin A ABC transporter, permease protein";
  species MG_469_MONOMER__c in c = 0; MG_469_MONOMER__c is "chromosomal replication initiator protein DnaA";
  species MG_474_MONOMER__c in c = 0; MG_474_MONOMER__c is "protein-monomer, MG_474_MONOMER";
  species MG_476_MONOMER__c in c = 0; MG_476_MONOMER__c is "preprotein translocase, SecG subunit";
  species MG_478_MONOMER__c in c = 0; MG_478_MONOMER__c is "protein-monomer, MG_478_MONOMER";
  species MG_515_MONOMER__c in c = 0; MG_515_MONOMER__c is "protein-monomer, MG_515_MONOMER";
  species MG_521_MONOMER__c in c = 0; MG_521_MONOMER__c is "membrane protein, putative";
  species MG_524_MONOMER__c in c = 0; MG_524_MONOMER__c is "protein-monomer, MG_524_MONOMER";
  species MG_526_MONOMER__c in c = 6/c; MG_526_MONOMER__c is "salivaricin A ABC transporter, ATP-binding protein";
  species PI__c in c = 7246/c; PI__c is "phosphate";
  species MG_032_MONOMER__e in e = 10/e; MG_032_MONOMER__e is "protein-monomer, MG_032_MONOMER";
  species MG_040_MONOMER__e in e = 0; MG_040_MONOMER__e is "Monosaccharide (riboside/galactoside) ABC transporter, substrate binding protein";
  species MG_045_MONOMER__e in e = 3/e; MG_045_MONOMER__e is "spermidine/putrescine (polyamine) ABC transporter, spermidine/putrescine binding protein, putative";
  species MG_074_MONOMER__e in e = 49/e; MG_074_MONOMER__e is "protein-monomer, MG_074_MONOMER";
  species MG_096_MONOMER__e in e = 5/e; MG_096_MONOMER__e is "protein-monomer, MG_096_MONOMER";
  species MG_129_MONOMER__e in e = 14/e; MG_129_MONOMER__e is "Putative phosphotransferase enzyme glucose-specific IIB component";
  species MG_146_MONOMER__e in e = 21/e; MG_146_MONOMER__e is "UPF0053 protein";
  species MG_186_MONOMER__e in e = 6/e; MG_186_MONOMER__e is "Oligosaccharide or polyol ABC transporter, substrate binding protein";
  species MG_220_MONOMER__e in e = 11/e; MG_220_MONOMER__e is "protein-monomer, MG_220_MONOMER";
  species MG_281_MONOMER__e in e = 53/e; MG_281_MONOMER__e is "protein-monomer, MG_281_MONOMER";
  species MG_286_MONOMER__e in e = 16/e; MG_286_MONOMER__e is "protein-monomer, MG_286_MONOMER";
  species MG_289_MONOMER__e in e = 38/e; MG_289_MONOMER__e is "phosphonate ABC transporter, substrate binding protein (P37), putative";
  species MG_310_MONOMER__e in e = 37/e; MG_310_MONOMER__e is "hydrolase, Putative esterase/lipase 1";
  species MG_321_MONOMER__e in e = 0; MG_321_MONOMER__e is "oligopeptide ABC transporter, substrate binding protein";
  species MG_327_MONOMER__e in e = 17/e; MG_327_MONOMER__e is "hydrolase, Putative esterase/lipase 2";
  species MG_344_MONOMER__e in e = 15/e; MG_344_MONOMER__e is "hydrolase, Putative esterase/lipase 3";
  species MG_389_MONOMER__e in e = 28/e; MG_389_MONOMER__e is "protein-monomer, MG_389_MONOMER";
  species MG_397_MONOMER__e in e = 79/e; MG_397_MONOMER__e is "protein-monomer, MG_397_MONOMER";
  species MG_412_MONOMER__e in e = 28/e; MG_412_MONOMER__e is "phosphate ABC transporter, substrate-binding protein";
  species MG_414_MONOMER__e in e = 3/e; MG_414_MONOMER__e is "protein-monomer, MG_414_MONOMER";
  species MG_014_MONOMER__m in m = 1/m; MG_014_MONOMER__m is "multidrug ABC transporter, ATP-binding/permease protein";
  species MG_015_MONOMER__m in m = 0; MG_015_MONOMER__m is "multidrug ABC transporter, ATP-binding/permease protein";
  species MG_028_MONOMER__m in m = 200/m; MG_028_MONOMER__m is "protein-monomer, MG_028_MONOMER";
  species MG_033_MONOMER__m in m = 0; MG_033_MONOMER__m is "glycerol uptake facilitator";
  species MG_043_MONOMER__m in m = 23/m; MG_043_MONOMER__m is "spermidine/putrescine (polyamine) ABC transporter, permease protein, putative";
  species MG_044_MONOMER__m in m = 31/m; MG_044_MONOMER__m is "spermidine/putrescine (polyamine) ABC transporter, permease protein, putative";
  species MG_055_170_277_464_476_20MER__m in m = 13/m; MG_055_170_277_464_476_20MER__m is "preprotein translocase";
  species MG_055_MONOMER__m in m = 255/m; MG_055_MONOMER__m is "preprotein translocase, SecE subunit";
  species MG_061_MONOMER__m in m = 22/m; MG_061_MONOMER__m is "Mycoplasma MFS transporter";
  species MG_062_MONOMER__m in m = 34/m; MG_062_MONOMER__m is "PTS system, fructose-specific IIABC component";
  species MG_064_MONOMER__m in m = 26/m; MG_064_MONOMER__m is "ABC transporter, permease protein, putative";
  species MG_067_MONOMER__m in m = 41/m; MG_067_MONOMER__m is "lipoprotein, putative";
  species MG_068_MONOMER__m in m = 43/m; MG_068_MONOMER__m is "lipoprotein, putative";
  species MG_069_MONOMER__m in m = 31/m; MG_069_MONOMER__m is "PTS system, glucose-specific IIABC component";
  species MG_071_MONOMER__m in m = 2/m; MG_071_MONOMER__m is "ATPase, P-type (transporting), HAD superfamily, subfamily IC";
  species MG_075_MONOMER__m in m = 27/m; MG_075_MONOMER__m is "116 kDa surface antigen";
  species MG_076_MONOMER__m in m = 22/m; MG_076_MONOMER__m is "protein-monomer, MG_076_MONOMER";
  species MG_077_MONOMER__m in m = 29/m; MG_077_MONOMER__m is "oligopeptide ABC transporter, permease protein";
  species MG_078_MONOMER__m in m = 30/m; MG_078_MONOMER__m is "oligopeptide ABC transporter, permease protein";
  species MG_086_MONOMER__m in m = 372/m; MG_086_MONOMER__m is "prolipoprotein diacylglyceryl transferase";
  species MG_095_MONOMER__m in m = 326/m; MG_095_MONOMER__m is "lipoprotein, putative";
  species MG_109_MONOMER__m in m = 0; MG_109_MONOMER__m is "serine/threonine protein kinase, putative";
  species MG_114_MONOMER__m in m = 1/m; MG_114_MONOMER__m is "CDP-diacylglycerol--glycerol-3-phosphate 3-phosphatidyltransferase";
  species MG_120_MONOMER__m in m = 139/m; MG_120_MONOMER__m is "Monosaccharide (riboside/galactoside) ABC transporter, permease protein";
  species MG_121_MONOMER__m in m = 155/m; MG_121_MONOMER__m is "Monosaccharide (riboside/galactoside) ABC transporter, permease protein";
  species MG_123_MONOMER__m in m = 1/m; MG_123_MONOMER__m is "arginine deaminasse";
  species MG_130_MONOMER__m in m = 46/m; MG_130_MONOMER__m is "protein-monomer, MG_130_MONOMER";
  species MG_131_MONOMER__m in m = 4/m; MG_131_MONOMER__m is "hypothetical protein";
  species MG_133_MONOMER__m in m = 13/m; MG_133_MONOMER__m is "membrane protein, putative";
  species MG_135_MONOMER__m in m = 8/m; MG_135_MONOMER__m is "membrane protein, putative";
  species MG_144_MONOMER__m in m = 33/m; MG_144_MONOMER__m is "protein-monomer, MG_144_MONOMER";
  species MG_147_MONOMER__m in m = 5/m; MG_147_MONOMER__m is "membrane protein, putative";
  species MG_148_MONOMER__m in m = 25/m; MG_148_MONOMER__m is "protein-monomer, MG_148_MONOMER";
  species MG_149_MONOMER__m in m = 11/m; MG_149_MONOMER__m is "lipoprotein, putative";
  species MG_170_MONOMER__m in m = 3/m; MG_170_MONOMER__m is "preprotein translocase, SecY subunit";
  species MG_181_MONOMER__m in m = 1/m; MG_181_MONOMER__m is "metal ion (cobalt) ABC transporter, permease protein";
  species MG_185_MONOMER__m in m = 22/m; MG_185_MONOMER__m is "lipoprotein, putative";
  species MG_188_MONOMER__m in m = 15/m; MG_188_MONOMER__m is "Oligosaccharide or polyol ABC transporter, permease protein";
  species MG_189_MONOMER__m in m = 17/m; MG_189_MONOMER__m is "Oligosaccharide or polyol ABC transporter, permease protein";
  species MG_191_MONOMER__m in m = 31/m; MG_191_MONOMER__m is "MgPa adhesin";
  species MG_192_MONOMER__m in m = 31/m; MG_192_MONOMER__m is "P110 protein";
  species MG_210_MONOMER__m in m = 58/m; MG_210_MONOMER__m is "prolipoprotein signal peptidase, signal peptidase II";
  species MG_212_MONOMER__m in m = 33/m; MG_212_MONOMER__m is "1-acyl-sn-glycerol-3-phosphate acyltransferase, putative";
  species MG_225_MONOMER__m in m = 1/m; MG_225_MONOMER__m is "amino acid-polyamine-organocation (APC) permease";
  species MG_226_MONOMER__m in m = 1/m; MG_226_MONOMER__m is "amino acid-polyamine-organocation (APC) permease";
  species MG_241_MONOMER__m in m = 3/m; MG_241_MONOMER__m is "protein-monomer, MG_241_MONOMER";
  species MG_242_MONOMER__m in m = 2/m; MG_242_MONOMER__m is "protein-monomer, MG_242_MONOMER";
  species MG_243_MONOMER__m in m = 18/m; MG_243_MONOMER__m is "conserved hypothetical protein, authentic frameshift";
  species MG_247_MONOMER__m in m = 4/m; MG_247_MONOMER__m is "membrane protein, putative";
  species MG_255_MONOMER__m in m = 20/m; MG_255_MONOMER__m is "protein-monomer, MG_255_MONOMER";
  species MG_256_MONOMER__m in m = 17/m; MG_256_MONOMER__m is "protein-monomer, MG_256_MONOMER";
  species MG_260_MONOMER__m in m = 11/m; MG_260_MONOMER__m is "lipoprotein, putative";
  species MG_267_MONOMER__m in m = 100/m; MG_267_MONOMER__m is "protein-monomer, MG_267_MONOMER";
  species MG_275_MONOMER__m in m = 3/m; MG_275_MONOMER__m is "NADH oxidase";
  species MG_277_MONOMER__m in m = 43/m; MG_277_MONOMER__m is "Protein-export membrane protein secDF";
  species MG_279_MONOMER__m in m = 55/m; MG_279_MONOMER__m is "protein-monomer, MG_279_MONOMER";
  species MG_280_MONOMER__m in m = 47/m; MG_280_MONOMER__m is "sensory rhodopsin II transducer motif";
  species MG_291_MONOMER__m in m = 25/m; MG_291_MONOMER__m is "phosphonate ABC transporter, permease protein (P69), putative";
  species MG_294_MONOMER__m in m = 102/m; MG_294_MONOMER__m is "major facilitator superfamily (MFS) protein";
  species MG_302_MONOMER__m in m = 1/m; MG_302_MONOMER__m is "metal ion (cobalt) ABC transporter, permease protein, putative";
  species MG_306_MONOMER__m in m = 7/m; MG_306_MONOMER__m is "membrane protein, putative";
  species MG_307_MONOMER__m in m = 25/m; MG_307_MONOMER__m is "lipoprotein, putative";
  species MG_309_MONOMER__m in m = 17/m; MG_309_MONOMER__m is "lipoprotein, putative";
  species MG_313_MONOMER__m in m = 26/m; MG_313_MONOMER__m is "membrane protein, putative";
  species MG_314_MONOMER__m in m = 30/m; MG_314_MONOMER__m is "protein-monomer, MG_314_MONOMER";
  species MG_316_MONOMER__m in m = 0; MG_316_MONOMER__m is "DNA internalization-related competence protein ComEC/Rec2";
  species MG_318_MONOMER__m in m = 24/m; MG_318_MONOMER__m is "P32 adhesin";
  species MG_319_MONOMER__m in m = 62/m; MG_319_MONOMER__m is "protein-monomer, MG_319_MONOMER";
  species MG_320_MONOMER__m in m = 19/m; MG_320_MONOMER__m is "membrane protein, putative";
  species MG_322_MONOMER__m in m = 2/m; MG_322_MONOMER__m is "potassium uptake protein";
  species MG_331_MONOMER__m in m = 42/m; MG_331_MONOMER__m is "protein-monomer, MG_331_MONOMER";
  species MG_338_MONOMER__m in m = 13/m; MG_338_MONOMER__m is "lipoprotein, putative";
  species MG_348_MONOMER__m in m = 33/m; MG_348_MONOMER__m is "lipoprotein, putative";
  species MG_354_MONOMER__m in m = 40/m; MG_354_MONOMER__m is "protein-monomer, MG_354_MONOMER";
  species MG_364_MONOMER__m in m = 18/m; MG_364_MONOMER__m is "Replication initiation/membrane attachment protein";
  species MG_390_MONOMER__m in m = 1/m; MG_390_MONOMER__m is "toxin ABC transporter, ATP-binding/permease protein";
  species MG_395_MONOMER__m in m = 31/m; MG_395_MONOMER__m is "lipoprotein, putative";
  species MG_403_MONOMER__m in m = 124/m; MG_403_MONOMER__m is "ATP synthase F0, B subunit";
  species MG_404_MONOMER__m in m = 26/m; MG_404_MONOMER__m is "ATP synthase F0, C subunit";
  species MG_405_MONOMER__m in m = 124/m; MG_405_MONOMER__m is "ATP synthase F0, A subunit";
  species MG_406_MONOMER__m in m = 27/m; MG_406_MONOMER__m is "protein-monomer, MG_406_MONOMER";
  species MG_411_MONOMER__m in m = 15/m; MG_411_MONOMER__m is "phosphate ABC transporter, permease protein PstA";
  species MG_432_MONOMER__m in m = 6/m; MG_432_MONOMER__m is "membrane protein, putative";
  species MG_437_MONOMER__m in m = 1/m; MG_437_MONOMER__m is "phosphatidate cytidylyltransferase";
  species MG_439_MONOMER__m in m = 21/m; MG_439_MONOMER__m is "lipoprotein, putative";
  species MG_440_MONOMER__m in m = 8/m; MG_440_MONOMER__m is "lipoprotein, putative";
  species MG_441_MONOMER__m in m = 13/m; MG_441_MONOMER__m is "protein-monomer, MG_441_MONOMER";
  species MG_443_MONOMER__m in m = 21/m; MG_443_MONOMER__m is "membrane protein, putative";
  species MG_447_MONOMER__m in m = 25/m; MG_447_MONOMER__m is "multidrug efflux pump";
  species MG_452_MONOMER__m in m = 48/m; MG_452_MONOMER__m is "membrane protein, putative";
  species MG_456_MONOMER__m in m = 26/m; MG_456_MONOMER__m is "protein-monomer, MG_456_MONOMER";
  species MG_457_MONOMER__m in m = 4/m; MG_457_MONOMER__m is "ATP-dependent metalloprotease FtsH";
  species MG_464_MONOMER__m in m = 0; MG_464_MONOMER__m is "inner-membrane protein insertion factor";
  species MG_468_MONOMER__m in m = 1/m; MG_468_MONOMER__m is "salivaricin A ABC transporter, permease protein";
  species MG_474_MONOMER__m in m = 18/m; MG_474_MONOMER__m is "protein-monomer, MG_474_MONOMER";
  species MG_476_MONOMER__m in m = 0; MG_476_MONOMER__m is "preprotein translocase, SecG subunit";
  species MG_478_MONOMER__m in m = 13/m; MG_478_MONOMER__m is "protein-monomer, MG_478_MONOMER";
  species MG_515_MONOMER__m in m = 280/m; MG_515_MONOMER__m is "protein-monomer, MG_515_MONOMER";
  species MG_521_MONOMER__m in m = 14/m; MG_521_MONOMER__m is "membrane protein, putative";
  species MG_524_MONOMER__m in m = 31/m; MG_524_MONOMER__m is "protein-monomer, MG_524_MONOMER";

  // Parameters:
  Km1 = 0;
  Km1_MG_014_MONOMER = 1;
  Km1_MG_015_MONOMER = 1;
  Km1_MG_028_MONOMER = 1;
  Km1_MG_032_MONOMER = 1;
  Km1_MG_033_MONOMER = 1;
  Km1_MG_040_MONOMER = 1;
  Km1_MG_043_MONOMER = 1;
  Km1_MG_044_MONOMER = 1;
  Km1_MG_045_MONOMER = 1;
  Km1_MG_055_MONOMER = 1;
  Km1_MG_061_MONOMER = 1;
  Km1_MG_062_MONOMER = 1;
  Km1_MG_064_MONOMER = 1;
  Km1_MG_067_MONOMER = 1;
  Km1_MG_068_MONOMER = 1;
  Km1_MG_069_MONOMER = 1;
  Km1_MG_071_MONOMER = 1;
  Km1_MG_074_MONOMER = 1;
  Km1_MG_075_MONOMER = 1;
  Km1_MG_076_MONOMER = 1;
  Km1_MG_077_MONOMER = 1;
  Km1_MG_078_MONOMER = 1;
  Km1_MG_086_MONOMER = 1;
  Km1_MG_095_MONOMER = 1;
  Km1_MG_096_MONOMER = 1;
  Km1_MG_109_MONOMER = 1;
  Km1_MG_114_MONOMER = 1;
  Km1_MG_120_MONOMER = 1;
  Km1_MG_121_MONOMER = 1;
  Km1_MG_123_MONOMER = 1;
  Km1_MG_129_MONOMER = 1;
  Km1_MG_130_MONOMER = 1;
  Km1_MG_131_MONOMER = 1;
  Km1_MG_133_MONOMER = 1;
  Km1_MG_135_MONOMER = 1;
  Km1_MG_144_MONOMER = 1;
  Km1_MG_146_MONOMER = 1;
  Km1_MG_147_MONOMER = 1;
  Km1_MG_148_MONOMER = 1;
  Km1_MG_149_MONOMER = 1;
  Km1_MG_170_MONOMER = 1;
  Km1_MG_181_MONOMER = 1;
  Km1_MG_185_MONOMER = 1;
  Km1_MG_186_MONOMER = 1;
  Km1_MG_188_MONOMER = 1;
  Km1_MG_189_MONOMER = 1;
  Km1_MG_191_MONOMER = 1;
  Km1_MG_192_MONOMER = 1;
  Km1_MG_210_MONOMER = 1;
  Km1_MG_212_MONOMER = 1;
  Km1_MG_220_MONOMER = 1;
  Km1_MG_225_MONOMER = 1;
  Km1_MG_226_MONOMER = 1;
  Km1_MG_241_MONOMER = 1;
  Km1_MG_242_MONOMER = 1;
  Km1_MG_243_MONOMER = 1;
  Km1_MG_247_MONOMER = 1;
  Km1_MG_255_MONOMER = 1;
  Km1_MG_256_MONOMER = 1;
  Km1_MG_260_MONOMER = 1;
  Km1_MG_267_MONOMER = 1;
  Km1_MG_275_MONOMER = 1;
  Km1_MG_277_MONOMER = 1;
  Km1_MG_279_MONOMER = 1;
  Km1_MG_280_MONOMER = 1;
  Km1_MG_281_MONOMER = 1;
  Km1_MG_286_MONOMER = 1;
  Km1_MG_289_MONOMER = 1;
  Km1_MG_291_MONOMER = 1;
  Km1_MG_294_MONOMER = 1;
  Km1_MG_302_MONOMER = 1;
  Km1_MG_306_MONOMER = 1;
  Km1_MG_307_MONOMER = 1;
  Km1_MG_309_MONOMER = 1;
  Km1_MG_310_MONOMER = 1;
  Km1_MG_313_MONOMER = 1;
  Km1_MG_314_MONOMER = 1;
  Km1_MG_316_MONOMER = 1;
  Km1_MG_318_MONOMER = 1;
  Km1_MG_319_MONOMER = 1;
  Km1_MG_320_MONOMER = 1;
  Km1_MG_321_MONOMER = 1;
  Km1_MG_322_MONOMER = 1;
  Km1_MG_327_MONOMER = 1;
  Km1_MG_331_MONOMER = 1;
  Km1_MG_338_MONOMER = 1;
  Km1_MG_344_MONOMER = 1;
  Km1_MG_348_MONOMER = 1;
  Km1_MG_354_MONOMER = 1;
  Km1_MG_364_MONOMER = 1;
  Km1_MG_389_MONOMER = 1;
  Km1_MG_390_MONOMER = 1;
  Km1_MG_395_MONOMER = 1;
  Km1_MG_397_MONOMER = 1;
  Km1_MG_403_MONOMER = 1;
  Km1_MG_404_MONOMER = 1;
  Km1_MG_405_MONOMER = 1;
  Km1_MG_406_MONOMER = 1;
  Km1_MG_411_MONOMER = 1;
  Km1_MG_412_MONOMER = 1;
  Km1_MG_414_MONOMER = 1;
  Km1_MG_432_MONOMER = 1;
  Km1_MG_437_MONOMER = 1;
  Km1_MG_439_MONOMER = 1;
  Km1_MG_440_MONOMER = 1;
  Km1_MG_441_MONOMER = 1;
  Km1_MG_443_MONOMER = 1;
  Km1_MG_447_MONOMER = 1;
  Km1_MG_452_MONOMER = 1;
  Km1_MG_456_MONOMER = 1;
  Km1_MG_457_MONOMER = 1;
  Km1_MG_464_MONOMER = 1;
  Km1_MG_468_MONOMER = 1;
  Km1_MG_474_MONOMER = 1;
  Km1_MG_476_MONOMER = 1;
  Km1_MG_478_MONOMER = 1;
  Km1_MG_515_MONOMER = 1;
  Km1_MG_521_MONOMER = 1;
  Km1_MG_524_MONOMER = 1;
  Km2 = 0;
  Km2_ATP = 1;
  atp = 0;
  en1 = 0;
  en2 = 0;
  k_cat = 0;
  k_trans_MG_014_MONOMER = 5.938521e12;
  k_trans_MG_015_MONOMER = 6.281321e12;
  k_trans_MG_028_MONOMER = 1.840646e13;
  k_trans_MG_032_MONOMER = 5.555103e12;
  k_trans_MG_033_MONOMER = 1.433992e13;
  k_trans_MG_040_MONOMER = 6.260065e12;
  k_trans_MG_043_MONOMER = 1.29814e13;
  k_trans_MG_044_MONOMER = 1.302711e13;
  k_trans_MG_045_MONOMER = 7.659831e12;
  k_trans_MG_055_MONOMER = 3.007885e13;
  k_trans_MG_061_MONOMER = 6.525041e12;
  k_trans_MG_062_MONOMER = 5.440733e12;
  k_trans_MG_064_MONOMER = 2.779638e12;
  k_trans_MG_067_MONOMER = 7.169958e12;
  k_trans_MG_068_MONOMER = 7.805271e12;
  k_trans_MG_069_MONOMER = 4.074558e12;
  k_trans_MG_071_MONOMER = 4.233064e12;
  k_trans_MG_074_MONOMER = 2.70051e13;
  k_trans_MG_075_MONOMER = 3.612987e12;
  k_trans_MG_076_MONOMER = 2.680941e13;
  k_trans_MG_077_MONOMER = 9.090168e12;
  k_trans_MG_078_MONOMER = 9.839623e12;
  k_trans_MG_086_MONOMER = 9.685074e12;
  k_trans_MG_095_MONOMER = 9.295724e12;
  k_trans_MG_096_MONOMER = 5.691844e12;
  k_trans_MG_109_MONOMER = 9.559944e12;
  k_trans_MG_114_MONOMER = 1.567669e13;
  k_trans_MG_120_MONOMER = 7.114804e12;
  k_trans_MG_121_MONOMER = 1.209052e13;
  k_trans_MG_123_MONOMER = 7.854986e12;
  k_trans_MG_129_MONOMER = 3.162135e13;
  k_trans_MG_130_MONOMER = 7.644005e12;
  k_trans_MG_131_MONOMER = 4.999592e13;
  k_trans_MG_133_MONOMER = 1.401401e13;
  k_trans_MG_135_MONOMER = 1.321321e13;
  k_trans_MG_144_MONOMER = 1.326057e13;
  k_trans_MG_146_MONOMER = 8.725704e12;
  k_trans_MG_147_MONOMER = 9.865862e12;
  k_trans_MG_148_MONOMER = 9.045717e12;
  k_trans_MG_149_MONOMER = 1.316619e13;
  k_trans_MG_170_MONOMER = 7.788839e12;
  k_trans_MG_181_MONOMER = 8.808805e12;
  k_trans_MG_185_MONOMER = 5.277744e12;
  k_trans_MG_186_MONOMER = 1.479879e13;
  k_trans_MG_188_MONOMER = 1.124528e13;
  k_trans_MG_189_MONOMER = 1.163427e13;
  k_trans_MG_191_MONOMER = 2.562118e12;
  k_trans_MG_192_MONOMER = 3.513484e12;
  k_trans_MG_210_MONOMER = 2.044032e13;
  k_trans_MG_212_MONOMER = 1.380484e13;
  k_trans_MG_220_MONOMER = 3.97817e13;
  k_trans_MG_225_MONOMER = 7.565845e12;
  k_trans_MG_226_MONOMER = 7.519712e12;
  k_trans_MG_241_MONOMER = 5.967255e12;
  k_trans_MG_242_MONOMER = 5.872537e12;
  k_trans_MG_243_MONOMER = 1.637035e13;
  k_trans_MG_247_MONOMER = 1.547991e13;
  k_trans_MG_255_MONOMER = 1.013616e13;
  k_trans_MG_256_MONOMER = 1.445195e13;
  k_trans_MG_260_MONOMER = 4.836207e12;
  k_trans_MG_267_MONOMER = 3.217129e13;
  k_trans_MG_275_MONOMER = 7.739955e12;
  k_trans_MG_277_MONOMER = 3.814122e12;
  k_trans_MG_279_MONOMER = 1.697109e13;
  k_trans_MG_280_MONOMER = 1.396113e13;
  k_trans_MG_281_MONOMER = 6.654134e12;
  k_trans_MG_286_MONOMER = 1.887601e13;
  k_trans_MG_289_MONOMER = 1.005353e13;
  k_trans_MG_291_MONOMER = 6.813441e12;
  k_trans_MG_294_MONOMER = 7.805271e12;
  k_trans_MG_302_MONOMER = 1.167097e13;
  k_trans_MG_306_MONOMER = 9.413991e12;
  k_trans_MG_307_MONOMER = 3.143329e12;
  k_trans_MG_309_MONOMER = 3.020162e12;
  k_trans_MG_310_MONOMER = 1.380484e13;
  k_trans_MG_313_MONOMER = 1.289093e13;
  k_trans_MG_314_MONOMER = 8.351463e12;
  k_trans_MG_316_MONOMER = 1.002628e13;
  k_trans_MG_318_MONOMER = 1.321321e13;
  k_trans_MG_319_MONOMER = 2.078482e13;
  k_trans_MG_320_MONOMER = 1.293601e13;
  k_trans_MG_321_MONOMER = 3.961133e12;
  k_trans_MG_322_MONOMER = 6.630284e12;
  k_trans_MG_327_MONOMER = 1.380484e13;
  k_trans_MG_331_MONOMER = 1.745141e13;
  k_trans_MG_338_MONOMER = 2.913148e12;
  k_trans_MG_344_MONOMER = 1.355201e13;
  k_trans_MG_348_MONOMER = 1.148975e13;
  k_trans_MG_354_MONOMER = 2.70051e13;
  k_trans_MG_364_MONOMER = 1.651651e13;
  k_trans_MG_389_MONOMER = 2.913148e13;
  k_trans_MG_390_MONOMER = 5.605603e12;
  k_trans_MG_395_MONOMER = 7.060493e12;
  k_trans_MG_397_MONOMER = 6.536569e12;
  k_trans_MG_403_MONOMER = 1.778701e13;
  k_trans_MG_404_MONOMER = 3.627155e13;
  k_trans_MG_405_MONOMER = 1.26702e13;
  k_trans_MG_406_MONOMER = 2.341581e13;
  k_trans_MG_411_MONOMER = 5.657031e12;
  k_trans_MG_412_MONOMER = 9.813523e12;
  k_trans_MG_414_MONOMER = 3.571137e12;
  k_trans_MG_432_MONOMER = 9.295724e12;
  k_trans_MG_437_MONOMER = 9.319139e12;
  k_trans_MG_439_MONOMER = 1.360183e13;
  k_trans_MG_440_MONOMER = 1.433992e13;
  k_trans_MG_441_MONOMER = 2.720366e13;
  k_trans_MG_443_MONOMER = 9.366325e12;
  k_trans_MG_447_MONOMER = 6.763617e12;
  k_trans_MG_452_MONOMER = 1.417509e13;
  k_trans_MG_456_MONOMER = 1.107694e13;
  k_trans_MG_457_MONOMER = 5.270225e12;
  k_trans_MG_464_MONOMER = 9.609606e12;
  k_trans_MG_468_MONOMER = 2.074985e12;
  k_trans_MG_474_MONOMER = 2.913148e13;
  k_trans_MG_476_MONOMER = 4.804803e13;
  k_trans_MG_478_MONOMER = 2.402401e13;
  k_trans_MG_515_MONOMER = 1.375353e13;
  k_trans_MG_521_MONOMER = 1.651651e13;
  k_trans_MG_524_MONOMER = 2.483019e13;
  monomer = 0;

  // Reactions:
  Translocation_MG_014_MONOMER: 18 ATP__c + 18 H2O__c + MG_014_MONOMER__c => 18 ADP__c + 18 H__c + MG_014_MONOMER__m + 18 PI__c; TranslocationRate(k_trans_MG_014_MONOMER, MG_055_170_277_464_476_20MER__m, MG_072_DIMER__c, MG_014_MONOMER__c, ATP__c, Km1_MG_014_MONOMER, Km2_ATP); Translocation_MG_014_MONOMER is "ATP__c + H2O__c + MG_014_MONOMER__c -MG_055_170_277_464_476_20MER__m, MG_072_DIMER__c-> ADP__c + H__c + MG_014_MONOMER__m + PI__c";  // modifiers: MG_055_170_277_464_476_20MER__m, MG_072_DIMER__c
  Translocation_MG_015_MONOMER: 17 ATP__c + 17 H2O__c + MG_015_MONOMER__c => 17 ADP__c + 17 H__c + MG_015_MONOMER__m + 17 PI__c; TranslocationRate(k_trans_MG_015_MONOMER, MG_055_170_277_464_476_20MER__m, MG_072_DIMER__c, MG_015_MONOMER__c, ATP__c, Km1_MG_015_MONOMER, Km2_ATP); Translocation_MG_015_MONOMER is "ATP__c + H2O__c + MG_015_MONOMER__c -MG_055_170_277_464_476_20MER__m, MG_072_DIMER__c-> ADP__c + H__c + MG_015_MONOMER__m + PI__c";  // modifiers: MG_055_170_277_464_476_20MER__m, MG_072_DIMER__c
  Translocation_MG_028_MONOMER: 6 ATP__c + 6 H2O__c + MG_028_MONOMER__c => 6 ADP__c + 6 H__c + MG_028_MONOMER__m + 6 PI__c; TranslocationRate(k_trans_MG_028_MONOMER, MG_055_170_277_464_476_20MER__m, MG_072_DIMER__c, MG_028_MONOMER__c, ATP__c, Km1_MG_028_MONOMER, Km2_ATP); Translocation_MG_028_MONOMER is "ATP__c + H2O__c + MG_028_MONOMER__c -MG_055_170_277_464_476_20MER__m, MG_072_DIMER__c-> ADP__c + H__c + MG_028_MONOMER__m + PI__c";  // modifiers: MG_055_170_277_464_476_20MER__m, MG_072_DIMER__c
  Translocation_MG_032_MONOMER: 19 ATP__c + 19 H2O__c + MG_032_MONOMER__c => 19 ADP__c + 19 H__c + MG_032_MONOMER__e + 19 PI__c; TranslocationRate(k_trans_MG_032_MONOMER, MG_055_170_277_464_476_20MER__m, MG_072_DIMER__c, MG_032_MONOMER__c, ATP__c, Km1_MG_032_MONOMER, Km2_ATP); Translocation_MG_032_MONOMER is "ATP__c + H2O__c + MG_032_MONOMER__c -MG_055_170_277_464_476_20MER__m, MG_072_DIMER__c-> ADP__c + H__c + MG_032_MONOMER__e + PI__c";  // modifiers: MG_055_170_277_464_476_20MER__m, MG_072_DIMER__c
  Translocation_MG_033_MONOMER: 7 ATP__c + 7 H2O__c + MG_033_MONOMER__c => 7 ADP__c + 7 H__c + MG_033_MONOMER__m + 7 PI__c; TranslocationRate(k_trans_MG_033_MONOMER, MG_055_170_277_464_476_20MER__m, MG_072_DIMER__c, MG_033_MONOMER__c, ATP__c, Km1_MG_033_MONOMER, Km2_ATP); Translocation_MG_033_MONOMER is "ATP__c + H2O__c + MG_033_MONOMER__c -MG_055_170_277_464_476_20MER__m, MG_072_DIMER__c-> ADP__c + H__c + MG_033_MONOMER__m + PI__c";  // modifiers: MG_055_170_277_464_476_20MER__m, MG_072_DIMER__c
  Translocation_MG_040_MONOMER: 17 ATP__c + 17 H2O__c + MG_040_MONOMER__c => 17 ADP__c + 17 H__c + MG_040_MONOMER__e + 17 PI__c; TranslocationRate(k_trans_MG_040_MONOMER, MG_055_170_277_464_476_20MER__m, MG_072_DIMER__c, MG_040_MONOMER__c, ATP__c, Km1_MG_040_MONOMER, Km2_ATP); Translocation_MG_040_MONOMER is "ATP__c + H2O__c + MG_040_MONOMER__c -MG_055_170_277_464_476_20MER__m, MG_072_DIMER__c-> ADP__c + H__c + MG_040_MONOMER__e + PI__c";  // modifiers: MG_055_170_277_464_476_20MER__m, MG_072_DIMER__c
  Translocation_MG_043_MONOMER: 8 ATP__c + 8 H2O__c + MG_043_MONOMER__c => 8 ADP__c + 8 H__c + MG_043_MONOMER__m + 8 PI__c; TranslocationRate(k_trans_MG_043_MONOMER, MG_055_170_277_464_476_20MER__m, MG_072_DIMER__c, MG_043_MONOMER__c, ATP__c, Km1_MG_043_MONOMER, Km2_ATP); Translocation_MG_043_MONOMER is "ATP__c + H2O__c + MG_043_MONOMER__c -MG_055_170_277_464_476_20MER__m, MG_072_DIMER__c-> ADP__c + H__c + MG_043_MONOMER__m + PI__c";  // modifiers: MG_055_170_277_464_476_20MER__m, MG_072_DIMER__c
  Translocation_MG_044_MONOMER: 8 ATP__c + 8 H2O__c + MG_044_MONOMER__c => 8 ADP__c + 8 H__c + MG_044_MONOMER__m + 8 PI__c; TranslocationRate(k_trans_MG_044_MONOMER, MG_055_170_277_464_476_20MER__m, MG_072_DIMER__c, MG_044_MONOMER__c, ATP__c, Km1_MG_044_MONOMER, Km2_ATP); Translocation_MG_044_MONOMER is "ATP__c + H2O__c + MG_044_MONOMER__c -MG_055_170_277_464_476_20MER__m, MG_072_DIMER__c-> ADP__c + H__c + MG_044_MONOMER__m + PI__c";  // modifiers: MG_055_170_277_464_476_20MER__m, MG_072_DIMER__c
  Translocation_MG_045_MONOMER: 14 ATP__c + 14 H2O__c + MG_045_MONOMER__c => 14 ADP__c + 14 H__c + MG_045_MONOMER__e + 14 PI__c; TranslocationRate(k_trans_MG_045_MONOMER, MG_055_170_277_464_476_20MER__m, MG_072_DIMER__c, MG_045_MONOMER__c, ATP__c, Km1_MG_045_MONOMER, Km2_ATP); Translocation_MG_045_MONOMER is "ATP__c + H2O__c + MG_045_MONOMER__c -MG_055_170_277_464_476_20MER__m, MG_072_DIMER__c-> ADP__c + H__c + MG_045_MONOMER__e + PI__c";  // modifiers: MG_055_170_277_464_476_20MER__m, MG_072_DIMER__c
  Translocation_MG_055_MONOMER: 4 ATP__c + 4 H2O__c + MG_055_MONOMER__c => 4 ADP__c + 4 H__c + MG_055_MONOMER__m + 4 PI__c; TranslocationRate(k_trans_MG_055_MONOMER, MG_055_170_277_464_476_20MER__m, MG_072_DIMER__c, MG_055_MONOMER__c, ATP__c, Km1_MG_055_MONOMER, Km2_ATP); Translocation_MG_055_MONOMER is "ATP__c + H2O__c + MG_055_MONOMER__c -MG_055_170_277_464_476_20MER__m, MG_072_DIMER__c-> ADP__c + H__c + MG_055_MONOMER__m + PI__c";  // modifiers: MG_055_170_277_464_476_20MER__m, MG_072_DIMER__c
  Translocation_MG_061_MONOMER: 16 ATP__c + 16 H2O__c + MG_061_MONOMER__c => 16 ADP__c + 16 H__c + MG_061_MONOMER__m + 16 PI__c; TranslocationRate(k_trans_MG_061_MONOMER, MG_055_170_277_464_476_20MER__m, MG_072_DIMER__c, MG_061_MONOMER__c, ATP__c, Km1_MG_061_MONOMER, Km2_ATP); Translocation_MG_061_MONOMER is "ATP__c + H2O__c + MG_061_MONOMER__c -MG_055_170_277_464_476_20MER__m, MG_072_DIMER__c-> ADP__c + H__c + MG_061_MONOMER__m + PI__c";  // modifiers: MG_055_170_277_464_476_20MER__m, MG_072_DIMER__c
  Translocation_MG_062_MONOMER: 19 ATP__c + 19 H2O__c + MG_062_MONOMER__c => 19 ADP__c + 19 H__c + MG_062_MONOMER__m + 19 PI__c; TranslocationRate(k_trans_MG_062_MONOMER, MG_055_170_277_464_476_20MER__m, MG_072_DIMER__c, MG_062_MONOMER__c, ATP__c, Km1_MG_062_MONOMER, Km2_ATP); Translocation_MG_062_MONOMER is "ATP__c + H2O__c + MG_062_MONOMER__c -MG_055_170_277_464_476_20MER__m, MG_072_DIMER__c-> ADP__c + H__c + MG_062_MONOMER__m + PI__c";  // modifiers: MG_055_170_277_464_476_20MER__m, MG_072_DIMER__c
  Translocation_MG_064_MONOMER: 38 ATP__c + 38 H2O__c + MG_064_MONOMER__c => 38 ADP__c + 38 H__c + MG_064_MONOMER__m + 38 PI__c; TranslocationRate(k_trans_MG_064_MONOMER, MG_055_170_277_464_476_20MER__m, MG_072_DIMER__c, MG_064_MONOMER__c, ATP__c, Km1_MG_064_MONOMER, Km2_ATP); Translocation_MG_064_MONOMER is "ATP__c + H2O__c + MG_064_MONOMER__c -MG_055_170_277_464_476_20MER__m, MG_072_DIMER__c-> ADP__c + H__c + MG_064_MONOMER__m + PI__c";  // modifiers: MG_055_170_277_464_476_20MER__m, MG_072_DIMER__c
  Translocation_MG_067_MONOMER: 15 ATP__c + 15 H2O__c + MG_067_MONOMER__c => 15 ADP__c + 15 H__c + MG_067_MONOMER__m + 15 PI__c; TranslocationRate(k_trans_MG_067_MONOMER, MG_055_170_277_464_476_20MER__m, MG_072_DIMER__c, MG_067_MONOMER__c, ATP__c, Km1_MG_067_MONOMER, Km2_ATP); Translocation_MG_067_MONOMER is "ATP__c + H2O__c + MG_067_MONOMER__c -MG_055_170_277_464_476_20MER__m, MG_072_DIMER__c-> ADP__c + H__c + MG_067_MONOMER__m + PI__c";  // modifiers: MG_055_170_277_464_476_20MER__m, MG_072_DIMER__c
  Translocation_MG_068_MONOMER: 14 ATP__c + 14 H2O__c + MG_068_MONOMER__c => 14 ADP__c + 14 H__c + MG_068_MONOMER__m + 14 PI__c; TranslocationRate(k_trans_MG_068_MONOMER, MG_055_170_277_464_476_20MER__m, MG_072_DIMER__c, MG_068_MONOMER__c, ATP__c, Km1_MG_068_MONOMER, Km2_ATP); Translocation_MG_068_MONOMER is "ATP__c + H2O__c + MG_068_MONOMER__c -MG_055_170_277_464_476_20MER__m, MG_072_DIMER__c-> ADP__c + H__c + MG_068_MONOMER__m + PI__c";  // modifiers: MG_055_170_277_464_476_20MER__m, MG_072_DIMER__c
  Translocation_MG_069_MONOMER: 26 ATP__c + 26 H2O__c + MG_069_MONOMER__c => 26 ADP__c + 26 H__c + MG_069_MONOMER__m + 26 PI__c; TranslocationRate(k_trans_MG_069_MONOMER, MG_055_170_277_464_476_20MER__m, MG_072_DIMER__c, MG_069_MONOMER__c, ATP__c, Km1_MG_069_MONOMER, Km2_ATP); Translocation_MG_069_MONOMER is "ATP__c + H2O__c + MG_069_MONOMER__c -MG_055_170_277_464_476_20MER__m, MG_072_DIMER__c-> ADP__c + H__c + MG_069_MONOMER__m + PI__c";  // modifiers: MG_055_170_277_464_476_20MER__m, MG_072_DIMER__c
  Translocation_MG_071_MONOMER: 25 ATP__c + 25 H2O__c + MG_071_MONOMER__c => 25 ADP__c + 25 H__c + MG_071_MONOMER__m + 25 PI__c; TranslocationRate(k_trans_MG_071_MONOMER, MG_055_170_277_464_476_20MER__m, MG_072_DIMER__c, MG_071_MONOMER__c, ATP__c, Km1_MG_071_MONOMER, Km2_ATP); Translocation_MG_071_MONOMER is "ATP__c + H2O__c + MG_071_MONOMER__c -MG_055_170_277_464_476_20MER__m, MG_072_DIMER__c-> ADP__c + H__c + MG_071_MONOMER__m + PI__c";  // modifiers: MG_055_170_277_464_476_20MER__m, MG_072_DIMER__c
  Translocation_MG_074_MONOMER: 4 ATP__c + 4 H2O__c + MG_074_MONOMER__c => 4 ADP__c + 4 H__c + MG_074_MONOMER__e + 4 PI__c; TranslocationRate(k_trans_MG_074_MONOMER, MG_055_170_277_464_476_20MER__m, MG_072_DIMER__c, MG_074_MONOMER__c, ATP__c, Km1_MG_074_MONOMER, Km2_ATP); Translocation_MG_074_MONOMER is "ATP__c + H2O__c + MG_074_MONOMER__c -MG_055_170_277_464_476_20MER__m, MG_072_DIMER__c-> ADP__c + H__c + MG_074_MONOMER__e + PI__c";  // modifiers: MG_055_170_277_464_476_20MER__m, MG_072_DIMER__c
  Translocation_MG_075_MONOMER: 29 ATP__c + 29 H2O__c + MG_075_MONOMER__c => 29 ADP__c + 29 H__c + MG_075_MONOMER__m + 29 PI__c; TranslocationRate(k_trans_MG_075_MONOMER, MG_055_170_277_464_476_20MER__m, MG_072_DIMER__c, MG_075_MONOMER__c, ATP__c, Km1_MG_075_MONOMER, Km2_ATP); Translocation_MG_075_MONOMER is "ATP__c + H2O__c + MG_075_MONOMER__c -MG_055_170_277_464_476_20MER__m, MG_072_DIMER__c-> ADP__c + H__c + MG_075_MONOMER__m + PI__c";  // modifiers: MG_055_170_277_464_476_20MER__m, MG_072_DIMER__c
  Translocation_MG_076_MONOMER: 4 ATP__c + 4 H2O__c + MG_076_MONOMER__c => 4 ADP__c + 4 H__c + MG_076_MONOMER__m + 4 PI__c; TranslocationRate(k_trans_MG_076_MONOMER, MG_055_170_277_464_476_20MER__m, MG_072_DIMER__c, MG_076_MONOMER__c, ATP__c, Km1_MG_076_MONOMER, Km2_ATP); Translocation_MG_076_MONOMER is "ATP__c + H2O__c + MG_076_MONOMER__c -MG_055_170_277_464_476_20MER__m, MG_072_DIMER__c-> ADP__c + H__c + MG_076_MONOMER__m + PI__c";  // modifiers: MG_055_170_277_464_476_20MER__m, MG_072_DIMER__c
  Translocation_MG_077_MONOMER: 12 ATP__c + 12 H2O__c + MG_077_MONOMER__c => 12 ADP__c + 12 H__c + MG_077_MONOMER__m + 12 PI__c; TranslocationRate(k_trans_MG_077_MONOMER, MG_055_170_277_464_476_20MER__m, MG_072_DIMER__c, MG_077_MONOMER__c, ATP__c, Km1_MG_077_MONOMER, Km2_ATP); Translocation_MG_077_MONOMER is "ATP__c + H2O__c + MG_077_MONOMER__c -MG_055_170_277_464_476_20MER__m, MG_072_DIMER__c-> ADP__c + H__c + MG_077_MONOMER__m + PI__c";  // modifiers: MG_055_170_277_464_476_20MER__m, MG_072_DIMER__c
  Translocation_MG_078_MONOMER: 11 ATP__c + 11 H2O__c + MG_078_MONOMER__c => 11 ADP__c + 11 H__c + MG_078_MONOMER__m + 11 PI__c; TranslocationRate(k_trans_MG_078_MONOMER, MG_055_170_277_464_476_20MER__m, MG_072_DIMER__c, MG_078_MONOMER__c, ATP__c, Km1_MG_078_MONOMER, Km2_ATP); Translocation_MG_078_MONOMER is "ATP__c + H2O__c + MG_078_MONOMER__c -MG_055_170_277_464_476_20MER__m, MG_072_DIMER__c-> ADP__c + H__c + MG_078_MONOMER__m + PI__c";  // modifiers: MG_055_170_277_464_476_20MER__m, MG_072_DIMER__c
  Translocation_MG_086_MONOMER: 11 ATP__c + 11 H2O__c + MG_086_MONOMER__c => 11 ADP__c + 11 H__c + MG_086_MONOMER__m + 11 PI__c; TranslocationRate(k_trans_MG_086_MONOMER, MG_055_170_277_464_476_20MER__m, MG_072_DIMER__c, MG_086_MONOMER__c, ATP__c, Km1_MG_086_MONOMER, Km2_ATP); Translocation_MG_086_MONOMER is "ATP__c + H2O__c + MG_086_MONOMER__c -MG_055_170_277_464_476_20MER__m, MG_072_DIMER__c-> ADP__c + H__c + MG_086_MONOMER__m + PI__c";  // modifiers: MG_055_170_277_464_476_20MER__m, MG_072_DIMER__c
  Translocation_MG_095_MONOMER: 11 ATP__c + 11 H2O__c + MG_095_MONOMER__c => 11 ADP__c + 11 H__c + MG_095_MONOMER__m + 11 PI__c; TranslocationRate(k_trans_MG_095_MONOMER, MG_055_170_277_464_476_20MER__m, MG_072_DIMER__c, MG_095_MONOMER__c, ATP__c, Km1_MG_095_MONOMER, Km2_ATP); Translocation_MG_095_MONOMER is "ATP__c + H2O__c + MG_095_MONOMER__c -MG_055_170_277_464_476_20MER__m, MG_072_DIMER__c-> ADP__c + H__c + MG_095_MONOMER__m + PI__c";  // modifiers: MG_055_170_277_464_476_20MER__m, MG_072_DIMER__c
  Translocation_MG_096_MONOMER: 19 ATP__c + 19 H2O__c + MG_096_MONOMER__c => 19 ADP__c + 19 H__c + MG_096_MONOMER__e + 19 PI__c; TranslocationRate(k_trans_MG_096_MONOMER, MG_055_170_277_464_476_20MER__m, MG_072_DIMER__c, MG_096_MONOMER__c, ATP__c, Km1_MG_096_MONOMER, Km2_ATP); Translocation_MG_096_MONOMER is "ATP__c + H2O__c + MG_096_MONOMER__c -MG_055_170_277_464_476_20MER__m, MG_072_DIMER__c-> ADP__c + H__c + MG_096_MONOMER__e + PI__c";  // modifiers: MG_055_170_277_464_476_20MER__m, MG_072_DIMER__c
  Translocation_MG_109_MONOMER: 11 ATP__c + 11 H2O__c + MG_109_MONOMER__c => 11 ADP__c + 11 H__c + MG_109_MONOMER__m + 11 PI__c; TranslocationRate(k_trans_MG_109_MONOMER, MG_055_170_277_464_476_20MER__m, MG_072_DIMER__c, MG_109_MONOMER__c, ATP__c, Km1_MG_109_MONOMER, Km2_ATP); Translocation_MG_109_MONOMER is "ATP__c + H2O__c + MG_109_MONOMER__c -MG_055_170_277_464_476_20MER__m, MG_072_DIMER__c-> ADP__c + H__c + MG_109_MONOMER__m + PI__c";  // modifiers: MG_055_170_277_464_476_20MER__m, MG_072_DIMER__c
  Translocation_MG_114_MONOMER: 7 ATP__c + 7 H2O__c + MG_114_MONOMER__c => 7 ADP__c + 7 H__c + MG_114_MONOMER__m + 7 PI__c; TranslocationRate(k_trans_MG_114_MONOMER, MG_055_170_277_464_476_20MER__m, MG_072_DIMER__c, MG_114_MONOMER__c, ATP__c, Km1_MG_114_MONOMER, Km2_ATP); Translocation_MG_114_MONOMER is "ATP__c + H2O__c + MG_114_MONOMER__c -MG_055_170_277_464_476_20MER__m, MG_072_DIMER__c-> ADP__c + H__c + MG_114_MONOMER__m + PI__c";  // modifiers: MG_055_170_277_464_476_20MER__m, MG_072_DIMER__c
  Translocation_MG_120_MONOMER: 15 ATP__c + 15 H2O__c + MG_120_MONOMER__c => 15 ADP__c + 15 H__c + MG_120_MONOMER__m + 15 PI__c; TranslocationRate(k_trans_MG_120_MONOMER, MG_055_170_277_464_476_20MER__m, MG_072_DIMER__c, MG_120_MONOMER__c, ATP__c, Km1_MG_120_MONOMER, Km2_ATP); Translocation_MG_120_MONOMER is "ATP__c + H2O__c + MG_120_MONOMER__c -MG_055_170_277_464_476_20MER__m, MG_072_DIMER__c-> ADP__c + H__c + MG_120_MONOMER__m + PI__c";  // modifiers: MG_055_170_277_464_476_20MER__m, MG_072_DIMER__c
  Translocation_MG_121_MONOMER: 9 ATP__c + 9 H2O__c + MG_121_MONOMER__c => 9 ADP__c + 9 H__c + MG_121_MONOMER__m + 9 PI__c; TranslocationRate(k_trans_MG_121_MONOMER, MG_055_170_277_464_476_20MER__m, MG_072_DIMER__c, MG_121_MONOMER__c, ATP__c, Km1_MG_121_MONOMER, Km2_ATP); Translocation_MG_121_MONOMER is "ATP__c + H2O__c + MG_121_MONOMER__c -MG_055_170_277_464_476_20MER__m, MG_072_DIMER__c-> ADP__c + H__c + MG_121_MONOMER__m + PI__c";  // modifiers: MG_055_170_277_464_476_20MER__m, MG_072_DIMER__c
  Translocation_MG_123_MONOMER: 13 ATP__c + 13 H2O__c + MG_123_MONOMER__c => 13 ADP__c + 13 H__c + MG_123_MONOMER__m + 13 PI__c; TranslocationRate(k_trans_MG_123_MONOMER, MG_055_170_277_464_476_20MER__m, MG_072_DIMER__c, MG_123_MONOMER__c, ATP__c, Km1_MG_123_MONOMER, Km2_ATP); Translocation_MG_123_MONOMER is "ATP__c + H2O__c + MG_123_MONOMER__c -MG_055_170_277_464_476_20MER__m, MG_072_DIMER__c-> ADP__c + H__c + MG_123_MONOMER__m + PI__c";  // modifiers: MG_055_170_277_464_476_20MER__m, MG_072_DIMER__c
  Translocation_MG_129_MONOMER: 3 ATP__c + 3 H2O__c + MG_129_MONOMER__c => 3 ADP__c + 3 H__c + MG_129_MONOMER__e + 3 PI__c; TranslocationRate(k_trans_MG_129_MONOMER, MG_055_170_277_464_476_20MER__m, MG_072_DIMER__c, MG_129_MONOMER__c, ATP__c, Km1_MG_129_MONOMER, Km2_ATP); Translocation_MG_129_MONOMER is "ATP__c + H2O__c + MG_129_MONOMER__c -MG_055_170_277_464_476_20MER__m, MG_072_DIMER__c-> ADP__c + H__c + MG_129_MONOMER__e + PI__c";  // modifiers: MG_055_170_277_464_476_20MER__m, MG_072_DIMER__c
  Translocation_MG_130_MONOMER: 14 ATP__c + 14 H2O__c + MG_130_MONOMER__c => 14 ADP__c + 14 H__c + MG_130_MONOMER__m + 14 PI__c; TranslocationRate(k_trans_MG_130_MONOMER, MG_055_170_277_464_476_20MER__m, MG_072_DIMER__c, MG_130_MONOMER__c, ATP__c, Km1_MG_130_MONOMER, Km2_ATP); Translocation_MG_130_MONOMER is "ATP__c + H2O__c + MG_130_MONOMER__c -MG_055_170_277_464_476_20MER__m, MG_072_DIMER__c-> ADP__c + H__c + MG_130_MONOMER__m + PI__c";  // modifiers: MG_055_170_277_464_476_20MER__m, MG_072_DIMER__c
  Translocation_MG_131_MONOMER: 2 ATP__c + 2 H2O__c + MG_131_MONOMER__c => 2 ADP__c + 2 H__c + MG_131_MONOMER__m + 2 PI__c; TranslocationRate(k_trans_MG_131_MONOMER, MG_055_170_277_464_476_20MER__m, MG_072_DIMER__c, MG_131_MONOMER__c, ATP__c, Km1_MG_131_MONOMER, Km2_ATP); Translocation_MG_131_MONOMER is "ATP__c + H2O__c + MG_131_MONOMER__c -MG_055_170_277_464_476_20MER__m, MG_072_DIMER__c-> ADP__c + H__c + MG_131_MONOMER__m + PI__c";  // modifiers: MG_055_170_277_464_476_20MER__m, MG_072_DIMER__c
  Translocation_MG_133_MONOMER: 8 ATP__c + 8 H2O__c + MG_133_MONOMER__c => 8 ADP__c + 8 H__c + MG_133_MONOMER__m + 8 PI__c; TranslocationRate(k_trans_MG_133_MONOMER, MG_055_170_277_464_476_20MER__m, MG_072_DIMER__c, MG_133_MONOMER__c, ATP__c, Km1_MG_133_MONOMER, Km2_ATP); Translocation_MG_133_MONOMER is "ATP__c + H2O__c + MG_133_MONOMER__c -MG_055_170_277_464_476_20MER__m, MG_072_DIMER__c-> ADP__c + H__c + MG_133_MONOMER__m + PI__c";  // modifiers: MG_055_170_277_464_476_20MER__m, MG_072_DIMER__c
  Translocation_MG_135_MONOMER: 8 ATP__c + 8 H2O__c + MG_135_MONOMER__c => 8 ADP__c + 8 H__c + MG_135_MONOMER__m + 8 PI__c; TranslocationRate(k_trans_MG_135_MONOMER, MG_055_170_277_464_476_20MER__m, MG_072_DIMER__c, MG_135_MONOMER__c, ATP__c, Km1_MG_135_MONOMER, Km2_ATP); Translocation_MG_135_MONOMER is "ATP__c + H2O__c + MG_135_MONOMER__c -MG_055_170_277_464_476_20MER__m, MG_072_DIMER__c-> ADP__c + H__c + MG_135_MONOMER__m + PI__c";  // modifiers: MG_055_170_277_464_476_20MER__m, MG_072_DIMER__c
  Translocation_MG_144_MONOMER: 8 ATP__c + 8 H2O__c + MG_144_MONOMER__c => 8 ADP__c + 8 H__c + MG_144_MONOMER__m + 8 PI__c; TranslocationRate(k_trans_MG_144_MONOMER, MG_055_170_277_464_476_20MER__m, MG_072_DIMER__c, MG_144_MONOMER__c, ATP__c, Km1_MG_144_MONOMER, Km2_ATP); Translocation_MG_144_MONOMER is "ATP__c + H2O__c + MG_144_MONOMER__c -MG_055_170_277_464_476_20MER__m, MG_072_DIMER__c-> ADP__c + H__c + MG_144_MONOMER__m + PI__c";  // modifiers: MG_055_170_277_464_476_20MER__m, MG_072_DIMER__c
  Translocation_MG_146_MONOMER: 12 ATP__c + 12 H2O__c + MG_146_MONOMER__c => 12 ADP__c + 12 H__c + MG_146_MONOMER__e + 12 PI__c; TranslocationRate(k_trans_MG_146_MONOMER, MG_055_170_277_464_476_20MER__m, MG_072_DIMER__c, MG_146_MONOMER__c, ATP__c, Km1_MG_146_MONOMER, Km2_ATP); Translocation_MG_146_MONOMER is "ATP__c + H2O__c + MG_146_MONOMER__c -MG_055_170_277_464_476_20MER__m, MG_072_DIMER__c-> ADP__c + H__c + MG_146_MONOMER__e + PI__c";  // modifiers: MG_055_170_277_464_476_20MER__m, MG_072_DIMER__c
  Translocation_MG_147_MONOMER: 11 ATP__c + 11 H2O__c + MG_147_MONOMER__c => 11 ADP__c + 11 H__c + MG_147_MONOMER__m + 11 PI__c; TranslocationRate(k_trans_MG_147_MONOMER, MG_055_170_277_464_476_20MER__m, MG_072_DIMER__c, MG_147_MONOMER__c, ATP__c, Km1_MG_147_MONOMER, Km2_ATP); Translocation_MG_147_MONOMER is "ATP__c + H2O__c + MG_147_MONOMER__c -MG_055_170_277_464_476_20MER__m, MG_072_DIMER__c-> ADP__c + H__c + MG_147_MONOMER__m + PI__c";  // modifiers: MG_055_170_277_464_476_20MER__m, MG_072_DIMER__c
  Translocation_MG_148_MONOMER: 12 ATP__c + 12 H2O__c + MG_148_MONOMER__c => 12 ADP__c + 12 H__c + MG_148_MONOMER__m + 12 PI__c; TranslocationRate(k_trans_MG_148_MONOMER, MG_055_170_277_464_476_20MER__m, MG_072_DIMER__c, MG_148_MONOMER__c, ATP__c, Km1_MG_148_MONOMER, Km2_ATP); Translocation_MG_148_MONOMER is "ATP__c + H2O__c + MG_148_MONOMER__c -MG_055_170_277_464_476_20MER__m, MG_072_DIMER__c-> ADP__c + H__c + MG_148_MONOMER__m + PI__c";  // modifiers: MG_055_170_277_464_476_20MER__m, MG_072_DIMER__c
  Translocation_MG_149_MONOMER: 8 ATP__c + 8 H2O__c + MG_149_MONOMER__c => 8 ADP__c + 8 H__c + MG_149_MONOMER__m + 8 PI__c; TranslocationRate(k_trans_MG_149_MONOMER, MG_055_170_277_464_476_20MER__m, MG_072_DIMER__c, MG_149_MONOMER__c, ATP__c, Km1_MG_149_MONOMER, Km2_ATP); Translocation_MG_149_MONOMER is "ATP__c + H2O__c + MG_149_MONOMER__c -MG_055_170_277_464_476_20MER__m, MG_072_DIMER__c-> ADP__c + H__c + MG_149_MONOMER__m + PI__c";  // modifiers: MG_055_170_277_464_476_20MER__m, MG_072_DIMER__c
  Translocation_MG_170_MONOMER: 14 ATP__c + 14 H2O__c + MG_170_MONOMER__c => 14 ADP__c + 14 H__c + MG_170_MONOMER__m + 14 PI__c; TranslocationRate(k_trans_MG_170_MONOMER, MG_055_170_277_464_476_20MER__m, MG_072_DIMER__c, MG_170_MONOMER__c, ATP__c, Km1_MG_170_MONOMER, Km2_ATP); Translocation_MG_170_MONOMER is "ATP__c + H2O__c + MG_170_MONOMER__c -MG_055_170_277_464_476_20MER__m, MG_072_DIMER__c-> ADP__c + H__c + MG_170_MONOMER__m + PI__c";  // modifiers: MG_055_170_277_464_476_20MER__m, MG_072_DIMER__c
  Translocation_MG_181_MONOMER: 12 ATP__c + 12 H2O__c + MG_181_MONOMER__c => 12 ADP__c + 12 H__c + MG_181_MONOMER__m + 12 PI__c; TranslocationRate(k_trans_MG_181_MONOMER, MG_055_170_277_464_476_20MER__m, MG_072_DIMER__c, MG_181_MONOMER__c, ATP__c, Km1_MG_181_MONOMER, Km2_ATP); Translocation_MG_181_MONOMER is "ATP__c + H2O__c + MG_181_MONOMER__c -MG_055_170_277_464_476_20MER__m, MG_072_DIMER__c-> ADP__c + H__c + MG_181_MONOMER__m + PI__c";  // modifiers: MG_055_170_277_464_476_20MER__m, MG_072_DIMER__c
  Translocation_MG_185_MONOMER: 20 ATP__c + 20 H2O__c + MG_185_MONOMER__c => 20 ADP__c + 20 H__c + MG_185_MONOMER__m + 20 PI__c; TranslocationRate(k_trans_MG_185_MONOMER, MG_055_170_277_464_476_20MER__m, MG_072_DIMER__c, MG_185_MONOMER__c, ATP__c, Km1_MG_185_MONOMER, Km2_ATP); Translocation_MG_185_MONOMER is "ATP__c + H2O__c + MG_185_MONOMER__c -MG_055_170_277_464_476_20MER__m, MG_072_DIMER__c-> ADP__c + H__c + MG_185_MONOMER__m + PI__c";  // modifiers: MG_055_170_277_464_476_20MER__m, MG_072_DIMER__c
  Translocation_MG_186_MONOMER: 7 ATP__c + 7 H2O__c + MG_186_MONOMER__c => 7 ADP__c + 7 H__c + MG_186_MONOMER__e + 7 PI__c; TranslocationRate(k_trans_MG_186_MONOMER, MG_055_170_277_464_476_20MER__m, MG_072_DIMER__c, MG_186_MONOMER__c, ATP__c, Km1_MG_186_MONOMER, Km2_ATP); Translocation_MG_186_MONOMER is "ATP__c + H2O__c + MG_186_MONOMER__c -MG_055_170_277_464_476_20MER__m, MG_072_DIMER__c-> ADP__c + H__c + MG_186_MONOMER__e + PI__c";  // modifiers: MG_055_170_277_464_476_20MER__m, MG_072_DIMER__c
  Translocation_MG_188_MONOMER: 9 ATP__c + 9 H2O__c + MG_188_MONOMER__c => 9 ADP__c + 9 H__c + MG_188_MONOMER__m + 9 PI__c; TranslocationRate(k_trans_MG_188_MONOMER, MG_055_170_277_464_476_20MER__m, MG_072_DIMER__c, MG_188_MONOMER__c, ATP__c, Km1_MG_188_MONOMER, Km2_ATP); Translocation_MG_188_MONOMER is "ATP__c + H2O__c + MG_188_MONOMER__c -MG_055_170_277_464_476_20MER__m, MG_072_DIMER__c-> ADP__c + H__c + MG_188_MONOMER__m + PI__c";  // modifiers: MG_055_170_277_464_476_20MER__m, MG_072_DIMER__c
  Translocation_MG_189_MONOMER: 9 ATP__c + 9 H2O__c + MG_189_MONOMER__c => 9 ADP__c + 9 H__c + MG_189_MONOMER__m + 9 PI__c; TranslocationRate(k_trans_MG_189_MONOMER, MG_055_170_277_464_476_20MER__m, MG_072_DIMER__c, MG_189_MONOMER__c, ATP__c, Km1_MG_189_MONOMER, Km2_ATP); Translocation_MG_189_MONOMER is "ATP__c + H2O__c + MG_189_MONOMER__c -MG_055_170_277_464_476_20MER__m, MG_072_DIMER__c-> ADP__c + H__c + MG_189_MONOMER__m + PI__c";  // modifiers: MG_055_170_277_464_476_20MER__m, MG_072_DIMER__c
  Translocation_MG_191_MONOMER: 41 ATP__c + 41 H2O__c + MG_191_MONOMER__c => 41 ADP__c + 41 H__c + MG_191_MONOMER__m + 41 PI__c; TranslocationRate(k_trans_MG_191_MONOMER, MG_055_170_277_464_476_20MER__m, MG_072_DIMER__c, MG_191_MONOMER__c, ATP__c, Km1_MG_191_MONOMER, Km2_ATP); Translocation_MG_191_MONOMER is "ATP__c + H2O__c + MG_191_MONOMER__c -MG_055_170_277_464_476_20MER__m, MG_072_DIMER__c-> ADP__c + H__c + MG_191_MONOMER__m + PI__c";  // modifiers: MG_055_170_277_464_476_20MER__m, MG_072_DIMER__c
  Translocation_MG_192_MONOMER: 30 ATP__c + 30 H2O__c + MG_192_MONOMER__c => 30 ADP__c + 30 H__c + MG_192_MONOMER__m + 30 PI__c; TranslocationRate(k_trans_MG_192_MONOMER, MG_055_170_277_464_476_20MER__m, MG_072_DIMER__c, MG_192_MONOMER__c, ATP__c, Km1_MG_192_MONOMER, Km2_ATP); Translocation_MG_192_MONOMER is "ATP__c + H2O__c + MG_192_MONOMER__c -MG_055_170_277_464_476_20MER__m, MG_072_DIMER__c-> ADP__c + H__c + MG_192_MONOMER__m + PI__c";  // modifiers: MG_055_170_277_464_476_20MER__m, MG_072_DIMER__c
  Translocation_MG_210_MONOMER: 5 ATP__c + 5 H2O__c + MG_210_MONOMER__c => 5 ADP__c + 5 H__c + MG_210_MONOMER__m + 5 PI__c; TranslocationRate(k_trans_MG_210_MONOMER, MG_055_170_277_464_476_20MER__m, MG_072_DIMER__c, MG_210_MONOMER__c, ATP__c, Km1_MG_210_MONOMER, Km2_ATP); Translocation_MG_210_MONOMER is "ATP__c + H2O__c + MG_210_MONOMER__c -MG_055_170_277_464_476_20MER__m, MG_072_DIMER__c-> ADP__c + H__c + MG_210_MONOMER__m + PI__c";  // modifiers: MG_055_170_277_464_476_20MER__m, MG_072_DIMER__c
  Translocation_MG_212_MONOMER: 8 ATP__c + 8 H2O__c + MG_212_MONOMER__c => 8 ADP__c + 8 H__c + MG_212_MONOMER__m + 8 PI__c; TranslocationRate(k_trans_MG_212_MONOMER, MG_055_170_277_464_476_20MER__m, MG_072_DIMER__c, MG_212_MONOMER__c, ATP__c, Km1_MG_212_MONOMER, Km2_ATP); Translocation_MG_212_MONOMER is "ATP__c + H2O__c + MG_212_MONOMER__c -MG_055_170_277_464_476_20MER__m, MG_072_DIMER__c-> ADP__c + H__c + MG_212_MONOMER__m + PI__c";  // modifiers: MG_055_170_277_464_476_20MER__m, MG_072_DIMER__c
  Translocation_MG_220_MONOMER: 3 ATP__c + 3 H2O__c + MG_220_MONOMER__c => 3 ADP__c + 3 H__c + MG_220_MONOMER__e + 3 PI__c; TranslocationRate(k_trans_MG_220_MONOMER, MG_055_170_277_464_476_20MER__m, MG_072_DIMER__c, MG_220_MONOMER__c, ATP__c, Km1_MG_220_MONOMER, Km2_ATP); Translocation_MG_220_MONOMER is "ATP__c + H2O__c + MG_220_MONOMER__c -MG_055_170_277_464_476_20MER__m, MG_072_DIMER__c-> ADP__c + H__c + MG_220_MONOMER__e + PI__c";  // modifiers: MG_055_170_277_464_476_20MER__m, MG_072_DIMER__c
  Translocation_MG_225_MONOMER: 14 ATP__c + 14 H2O__c + MG_225_MONOMER__c => 14 ADP__c + 14 H__c + MG_225_MONOMER__m + 14 PI__c; TranslocationRate(k_trans_MG_225_MONOMER, MG_055_170_277_464_476_20MER__m, MG_072_DIMER__c, MG_225_MONOMER__c, ATP__c, Km1_MG_225_MONOMER, Km2_ATP); Translocation_MG_225_MONOMER is "ATP__c + H2O__c + MG_225_MONOMER__c -MG_055_170_277_464_476_20MER__m, MG_072_DIMER__c-> ADP__c + H__c + MG_225_MONOMER__m + PI__c";  // modifiers: MG_055_170_277_464_476_20MER__m, MG_072_DIMER__c
  Translocation_MG_226_MONOMER: 14 ATP__c + 14 H2O__c + MG_226_MONOMER__c => 14 ADP__c + 14 H__c + MG_226_MONOMER__m + 14 PI__c; TranslocationRate(k_trans_MG_226_MONOMER, MG_055_170_277_464_476_20MER__m, MG_072_DIMER__c, MG_226_MONOMER__c, ATP__c, Km1_MG_226_MONOMER, Km2_ATP); Translocation_MG_226_MONOMER is "ATP__c + H2O__c + MG_226_MONOMER__c -MG_055_170_277_464_476_20MER__m, MG_072_DIMER__c-> ADP__c + H__c + MG_226_MONOMER__m + PI__c";  // modifiers: MG_055_170_277_464_476_20MER__m, MG_072_DIMER__c
  Translocation_MG_241_MONOMER: 18 ATP__c + 18 H2O__c + MG_241_MONOMER__c => 18 ADP__c + 18 H__c + MG_241_MONOMER__m + 18 PI__c; TranslocationRate(k_trans_MG_241_MONOMER, MG_055_170_277_464_476_20MER__m, MG_072_DIMER__c, MG_241_MONOMER__c, ATP__c, Km1_MG_241_MONOMER, Km2_ATP); Translocation_MG_241_MONOMER is "ATP__c + H2O__c + MG_241_MONOMER__c -MG_055_170_277_464_476_20MER__m, MG_072_DIMER__c-> ADP__c + H__c + MG_241_MONOMER__m + PI__c";  // modifiers: MG_055_170_277_464_476_20MER__m, MG_072_DIMER__c
  Translocation_MG_242_MONOMER: 18 ATP__c + 18 H2O__c + MG_242_MONOMER__c => 18 ADP__c + 18 H__c + MG_242_MONOMER__m + 18 PI__c; TranslocationRate(k_trans_MG_242_MONOMER, MG_055_170_277_464_476_20MER__m, MG_072_DIMER__c, MG_242_MONOMER__c, ATP__c, Km1_MG_242_MONOMER, Km2_ATP); Translocation_MG_242_MONOMER is "ATP__c + H2O__c + MG_242_MONOMER__c -MG_055_170_277_464_476_20MER__m, MG_072_DIMER__c-> ADP__c + H__c + MG_242_MONOMER__m + PI__c";  // modifiers: MG_055_170_277_464_476_20MER__m, MG_072_DIMER__c
  Translocation_MG_243_MONOMER: 6 ATP__c + 6 H2O__c + MG_243_MONOMER__c => 6 ADP__c + 6 H__c + MG_243_MONOMER__m + 6 PI__c; TranslocationRate(k_trans_MG_243_MONOMER, MG_055_170_277_464_476_20MER__m, MG_072_DIMER__c, MG_243_MONOMER__c, ATP__c, Km1_MG_243_MONOMER, Km2_ATP); Translocation_MG_243_MONOMER is "ATP__c + H2O__c + MG_243_MONOMER__c -MG_055_170_277_464_476_20MER__m, MG_072_DIMER__c-> ADP__c + H__c + MG_243_MONOMER__m + PI__c";  // modifiers: MG_055_170_277_464_476_20MER__m, MG_072_DIMER__c
  Translocation_MG_247_MONOMER: 7 ATP__c + 7 H2O__c + MG_247_MONOMER__c => 7 ADP__c + 7 H__c + MG_247_MONOMER__m + 7 PI__c; TranslocationRate(k_trans_MG_247_MONOMER, MG_055_170_277_464_476_20MER__m, MG_072_DIMER__c, MG_247_MONOMER__c, ATP__c, Km1_MG_247_MONOMER, Km2_ATP); Translocation_MG_247_MONOMER is "ATP__c + H2O__c + MG_247_MONOMER__c -MG_055_170_277_464_476_20MER__m, MG_072_DIMER__c-> ADP__c + H__c + MG_247_MONOMER__m + PI__c";  // modifiers: MG_055_170_277_464_476_20MER__m, MG_072_DIMER__c
  Translocation_MG_255_MONOMER: 10 ATP__c + 10 H2O__c + MG_255_MONOMER__c => 10 ADP__c + 10 H__c + MG_255_MONOMER__m + 10 PI__c; TranslocationRate(k_trans_MG_255_MONOMER, MG_055_170_277_464_476_20MER__m, MG_072_DIMER__c, MG_255_MONOMER__c, ATP__c, Km1_MG_255_MONOMER, Km2_ATP); Translocation_MG_255_MONOMER is "ATP__c + H2O__c + MG_255_MONOMER__c -MG_055_170_277_464_476_20MER__m, MG_072_DIMER__c-> ADP__c + H__c + MG_255_MONOMER__m + PI__c";  // modifiers: MG_055_170_277_464_476_20MER__m, MG_072_DIMER__c
  Translocation_MG_256_MONOMER: 7 ATP__c + 7 H2O__c + MG_256_MONOMER__c => 7 ADP__c + 7 H__c + MG_256_MONOMER__m + 7 PI__c; TranslocationRate(k_trans_MG_256_MONOMER, MG_055_170_277_464_476_20MER__m, MG_072_DIMER__c, MG_256_MONOMER__c, ATP__c, Km1_MG_256_MONOMER, Km2_ATP); Translocation_MG_256_MONOMER is "ATP__c + H2O__c + MG_256_MONOMER__c -MG_055_170_277_464_476_20MER__m, MG_072_DIMER__c-> ADP__c + H__c + MG_256_MONOMER__m + PI__c";  // modifiers: MG_055_170_277_464_476_20MER__m, MG_072_DIMER__c
  Translocation_MG_260_MONOMER: 22 ATP__c + 22 H2O__c + MG_260_MONOMER__c => 22 ADP__c + 22 H__c + MG_260_MONOMER__m + 22 PI__c; TranslocationRate(k_trans_MG_260_MONOMER, MG_055_170_277_464_476_20MER__m, MG_072_DIMER__c, MG_260_MONOMER__c, ATP__c, Km1_MG_260_MONOMER, Km2_ATP); Translocation_MG_260_MONOMER is "ATP__c + H2O__c + MG_260_MONOMER__c -MG_055_170_277_464_476_20MER__m, MG_072_DIMER__c-> ADP__c + H__c + MG_260_MONOMER__m + PI__c";  // modifiers: MG_055_170_277_464_476_20MER__m, MG_072_DIMER__c
  Translocation_MG_267_MONOMER: 3 ATP__c + 3 H2O__c + MG_267_MONOMER__c => 3 ADP__c + 3 H__c + MG_267_MONOMER__m + 3 PI__c; TranslocationRate(k_trans_MG_267_MONOMER, MG_055_170_277_464_476_20MER__m, MG_072_DIMER__c, MG_267_MONOMER__c, ATP__c, Km1_MG_267_MONOMER, Km2_ATP); Translocation_MG_267_MONOMER is "ATP__c + H2O__c + MG_267_MONOMER__c -MG_055_170_277_464_476_20MER__m, MG_072_DIMER__c-> ADP__c + H__c + MG_267_MONOMER__m + PI__c";  // modifiers: MG_055_170_277_464_476_20MER__m, MG_072_DIMER__c
  Translocation_MG_275_MONOMER: 14 ATP__c + 14 H2O__c + MG_275_MONOMER__c => 14 ADP__c + 14 H__c + MG_275_MONOMER__m + 14 PI__c; TranslocationRate(k_trans_MG_275_MONOMER, MG_055_170_277_464_476_20MER__m, MG_072_DIMER__c, MG_275_MONOMER__c, ATP__c, Km1_MG_275_MONOMER, Km2_ATP); Translocation_MG_275_MONOMER is "ATP__c + H2O__c + MG_275_MONOMER__c -MG_055_170_277_464_476_20MER__m, MG_072_DIMER__c-> ADP__c + H__c + MG_275_MONOMER__m + PI__c";  // modifiers: MG_055_170_277_464_476_20MER__m, MG_072_DIMER__c
  Translocation_MG_277_MONOMER: 28 ATP__c + 28 H2O__c + MG_277_MONOMER__c => 28 ADP__c + 28 H__c + MG_277_MONOMER__m + 28 PI__c; TranslocationRate(k_trans_MG_277_MONOMER, MG_055_170_277_464_476_20MER__m, MG_072_DIMER__c, MG_277_MONOMER__c, ATP__c, Km1_MG_277_MONOMER, Km2_ATP); Translocation_MG_277_MONOMER is "ATP__c + H2O__c + MG_277_MONOMER__c -MG_055_170_277_464_476_20MER__m, MG_072_DIMER__c-> ADP__c + H__c + MG_277_MONOMER__m + PI__c";  // modifiers: MG_055_170_277_464_476_20MER__m, MG_072_DIMER__c
  Translocation_MG_279_MONOMER: 6 ATP__c + 6 H2O__c + MG_279_MONOMER__c => 6 ADP__c + 6 H__c + MG_279_MONOMER__m + 6 PI__c; TranslocationRate(k_trans_MG_279_MONOMER, MG_055_170_277_464_476_20MER__m, MG_072_DIMER__c, MG_279_MONOMER__c, ATP__c, Km1_MG_279_MONOMER, Km2_ATP); Translocation_MG_279_MONOMER is "ATP__c + H2O__c + MG_279_MONOMER__c -MG_055_170_277_464_476_20MER__m, MG_072_DIMER__c-> ADP__c + H__c + MG_279_MONOMER__m + PI__c";  // modifiers: MG_055_170_277_464_476_20MER__m, MG_072_DIMER__c
  Translocation_MG_280_MONOMER: 8 ATP__c + 8 H2O__c + MG_280_MONOMER__c => 8 ADP__c + 8 H__c + MG_280_MONOMER__m + 8 PI__c; TranslocationRate(k_trans_MG_280_MONOMER, MG_055_170_277_464_476_20MER__m, MG_072_DIMER__c, MG_280_MONOMER__c, ATP__c, Km1_MG_280_MONOMER, Km2_ATP); Translocation_MG_280_MONOMER is "ATP__c + H2O__c + MG_280_MONOMER__c -MG_055_170_277_464_476_20MER__m, MG_072_DIMER__c-> ADP__c + H__c + MG_280_MONOMER__m + PI__c";  // modifiers: MG_055_170_277_464_476_20MER__m, MG_072_DIMER__c
  Translocation_MG_281_MONOMER: 16 ATP__c + 16 H2O__c + MG_281_MONOMER__c => 16 ADP__c + 16 H__c + MG_281_MONOMER__e + 16 PI__c; TranslocationRate(k_trans_MG_281_MONOMER, MG_055_170_277_464_476_20MER__m, MG_072_DIMER__c, MG_281_MONOMER__c, ATP__c, Km1_MG_281_MONOMER, Km2_ATP); Translocation_MG_281_MONOMER is "ATP__c + H2O__c + MG_281_MONOMER__c -MG_055_170_277_464_476_20MER__m, MG_072_DIMER__c-> ADP__c + H__c + MG_281_MONOMER__e + PI__c";  // modifiers: MG_055_170_277_464_476_20MER__m, MG_072_DIMER__c
  Translocation_MG_286_MONOMER: 6 ATP__c + 6 H2O__c + MG_286_MONOMER__c => 6 ADP__c + 6 H__c + MG_286_MONOMER__e + 6 PI__c; TranslocationRate(k_trans_MG_286_MONOMER, MG_055_170_277_464_476_20MER__m, MG_072_DIMER__c, MG_286_MONOMER__c, ATP__c, Km1_MG_286_MONOMER, Km2_ATP); Translocation_MG_286_MONOMER is "ATP__c + H2O__c + MG_286_MONOMER__c -MG_055_170_277_464_476_20MER__m, MG_072_DIMER__c-> ADP__c + H__c + MG_286_MONOMER__e + PI__c";  // modifiers: MG_055_170_277_464_476_20MER__m, MG_072_DIMER__c
  Translocation_MG_289_MONOMER: 11 ATP__c + 11 H2O__c + MG_289_MONOMER__c => 11 ADP__c + 11 H__c + MG_289_MONOMER__e + 11 PI__c; TranslocationRate(k_trans_MG_289_MONOMER, MG_055_170_277_464_476_20MER__m, MG_072_DIMER__c, MG_289_MONOMER__c, ATP__c, Km1_MG_289_MONOMER, Km2_ATP); Translocation_MG_289_MONOMER is "ATP__c + H2O__c + MG_289_MONOMER__c -MG_055_170_277_464_476_20MER__m, MG_072_DIMER__c-> ADP__c + H__c + MG_289_MONOMER__e + PI__c";  // modifiers: MG_055_170_277_464_476_20MER__m, MG_072_DIMER__c
  Translocation_MG_291_MONOMER: 16 ATP__c + 16 H2O__c + MG_291_MONOMER__c => 16 ADP__c + 16 H__c + MG_291_MONOMER__m + 16 PI__c; TranslocationRate(k_trans_MG_291_MONOMER, MG_055_170_277_464_476_20MER__m, MG_072_DIMER__c, MG_291_MONOMER__c, ATP__c, Km1_MG_291_MONOMER, Km2_ATP); Translocation_MG_291_MONOMER is "ATP__c + H2O__c + MG_291_MONOMER__c -MG_055_170_277_464_476_20MER__m, MG_072_DIMER__c-> ADP__c + H__c + MG_291_MONOMER__m + PI__c";  // modifiers: MG_055_170_277_464_476_20MER__m, MG_072_DIMER__c
  Translocation_MG_294_MONOMER: 14 ATP__c + 14 H2O__c + MG_294_MONOMER__c => 14 ADP__c + 14 H__c + MG_294_MONOMER__m + 14 PI__c; TranslocationRate(k_trans_MG_294_MONOMER, MG_055_170_277_464_476_20MER__m, MG_072_DIMER__c, MG_294_MONOMER__c, ATP__c, Km1_MG_294_MONOMER, Km2_ATP); Translocation_MG_294_MONOMER is "ATP__c + H2O__c + MG_294_MONOMER__c -MG_055_170_277_464_476_20MER__m, MG_072_DIMER__c-> ADP__c + H__c + MG_294_MONOMER__m + PI__c";  // modifiers: MG_055_170_277_464_476_20MER__m, MG_072_DIMER__c
  Translocation_MG_302_MONOMER: 9 ATP__c + 9 H2O__c + MG_302_MONOMER__c => 9 ADP__c + 9 H__c + MG_302_MONOMER__m + 9 PI__c; TranslocationRate(k_trans_MG_302_MONOMER, MG_055_170_277_464_476_20MER__m, MG_072_DIMER__c, MG_302_MONOMER__c, ATP__c, Km1_MG_302_MONOMER, Km2_ATP); Translocation_MG_302_MONOMER is "ATP__c + H2O__c + MG_302_MONOMER__c -MG_055_170_277_464_476_20MER__m, MG_072_DIMER__c-> ADP__c + H__c + MG_302_MONOMER__m + PI__c";  // modifiers: MG_055_170_277_464_476_20MER__m, MG_072_DIMER__c
  Translocation_MG_306_MONOMER: 11 ATP__c + 11 H2O__c + MG_306_MONOMER__c => 11 ADP__c + 11 H__c + MG_306_MONOMER__m + 11 PI__c; TranslocationRate(k_trans_MG_306_MONOMER, MG_055_170_277_464_476_20MER__m, MG_072_DIMER__c, MG_306_MONOMER__c, ATP__c, Km1_MG_306_MONOMER, Km2_ATP); Translocation_MG_306_MONOMER is "ATP__c + H2O__c + MG_306_MONOMER__c -MG_055_170_277_464_476_20MER__m, MG_072_DIMER__c-> ADP__c + H__c + MG_306_MONOMER__m + PI__c";  // modifiers: MG_055_170_277_464_476_20MER__m, MG_072_DIMER__c
  Translocation_MG_307_MONOMER: 34 ATP__c + 34 H2O__c + MG_307_MONOMER__c => 34 ADP__c + 34 H__c + MG_307_MONOMER__m + 34 PI__c; TranslocationRate(k_trans_MG_307_MONOMER, MG_055_170_277_464_476_20MER__m, MG_072_DIMER__c, MG_307_MONOMER__c, ATP__c, Km1_MG_307_MONOMER, Km2_ATP); Translocation_MG_307_MONOMER is "ATP__c + H2O__c + MG_307_MONOMER__c -MG_055_170_277_464_476_20MER__m, MG_072_DIMER__c-> ADP__c + H__c + MG_307_MONOMER__m + PI__c";  // modifiers: MG_055_170_277_464_476_20MER__m, MG_072_DIMER__c
  Translocation_MG_309_MONOMER: 35 ATP__c + 35 H2O__c + MG_309_MONOMER__c => 35 ADP__c + 35 H__c + MG_309_MONOMER__m + 35 PI__c; TranslocationRate(k_trans_MG_309_MONOMER, MG_055_170_277_464_476_20MER__m, MG_072_DIMER__c, MG_309_MONOMER__c, ATP__c, Km1_MG_309_MONOMER, Km2_ATP); Translocation_MG_309_MONOMER is "ATP__c + H2O__c + MG_309_MONOMER__c -MG_055_170_277_464_476_20MER__m, MG_072_DIMER__c-> ADP__c + H__c + MG_309_MONOMER__m + PI__c";  // modifiers: MG_055_170_277_464_476_20MER__m, MG_072_DIMER__c
  Translocation_MG_310_MONOMER: 8 ATP__c + 8 H2O__c + MG_310_MONOMER__c => 8 ADP__c + 8 H__c + MG_310_MONOMER__e + 8 PI__c; TranslocationRate(k_trans_MG_310_MONOMER, MG_055_170_277_464_476_20MER__m, MG_072_DIMER__c, MG_310_MONOMER__c, ATP__c, Km1_MG_310_MONOMER, Km2_ATP); Translocation_MG_310_MONOMER is "ATP__c + H2O__c + MG_310_MONOMER__c -MG_055_170_277_464_476_20MER__m, MG_072_DIMER__c-> ADP__c + H__c + MG_310_MONOMER__e + PI__c";  // modifiers: MG_055_170_277_464_476_20MER__m, MG_072_DIMER__c
  Translocation_MG_313_MONOMER: 8 ATP__c + 8 H2O__c + MG_313_MONOMER__c => 8 ADP__c + 8 H__c + MG_313_MONOMER__m + 8 PI__c; TranslocationRate(k_trans_MG_313_MONOMER, MG_055_170_277_464_476_20MER__m, MG_072_DIMER__c, MG_313_MONOMER__c, ATP__c, Km1_MG_313_MONOMER, Km2_ATP); Translocation_MG_313_MONOMER is "ATP__c + H2O__c + MG_313_MONOMER__c -MG_055_170_277_464_476_20MER__m, MG_072_DIMER__c-> ADP__c + H__c + MG_313_MONOMER__m + PI__c";  // modifiers: MG_055_170_277_464_476_20MER__m, MG_072_DIMER__c
  Translocation_MG_314_MONOMER: 13 ATP__c + 13 H2O__c + MG_314_MONOMER__c => 13 ADP__c + 13 H__c + MG_314_MONOMER__m + 13 PI__c; TranslocationRate(k_trans_MG_314_MONOMER, MG_055_170_277_464_476_20MER__m, MG_072_DIMER__c, MG_314_MONOMER__c, ATP__c, Km1_MG_314_MONOMER, Km2_ATP); Translocation_MG_314_MONOMER is "ATP__c + H2O__c + MG_314_MONOMER__c -MG_055_170_277_464_476_20MER__m, MG_072_DIMER__c-> ADP__c + H__c + MG_314_MONOMER__m + PI__c";  // modifiers: MG_055_170_277_464_476_20MER__m, MG_072_DIMER__c
  Translocation_MG_316_MONOMER: 11 ATP__c + 11 H2O__c + MG_316_MONOMER__c => 11 ADP__c + 11 H__c + MG_316_MONOMER__m + 11 PI__c; TranslocationRate(k_trans_MG_316_MONOMER, MG_055_170_277_464_476_20MER__m, MG_072_DIMER__c, MG_316_MONOMER__c, ATP__c, Km1_MG_316_MONOMER, Km2_ATP); Translocation_MG_316_MONOMER is "ATP__c + H2O__c + MG_316_MONOMER__c -MG_055_170_277_464_476_20MER__m, MG_072_DIMER__c-> ADP__c + H__c + MG_316_MONOMER__m + PI__c";  // modifiers: MG_055_170_277_464_476_20MER__m, MG_072_DIMER__c
  Translocation_MG_318_MONOMER: 8 ATP__c + 8 H2O__c + MG_318_MONOMER__c => 8 ADP__c + 8 H__c + MG_318_MONOMER__m + 8 PI__c; TranslocationRate(k_trans_MG_318_MONOMER, MG_055_170_277_464_476_20MER__m, MG_072_DIMER__c, MG_318_MONOMER__c, ATP__c, Km1_MG_318_MONOMER, Km2_ATP); Translocation_MG_318_MONOMER is "ATP__c + H2O__c + MG_318_MONOMER__c -MG_055_170_277_464_476_20MER__m, MG_072_DIMER__c-> ADP__c + H__c + MG_318_MONOMER__m + PI__c";  // modifiers: MG_055_170_277_464_476_20MER__m, MG_072_DIMER__c
  Translocation_MG_319_MONOMER: 5 ATP__c + 5 H2O__c + MG_319_MONOMER__c => 5 ADP__c + 5 H__c + MG_319_MONOMER__m + 5 PI__c; TranslocationRate(k_trans_MG_319_MONOMER, MG_055_170_277_464_476_20MER__m, MG_072_DIMER__c, MG_319_MONOMER__c, ATP__c, Km1_MG_319_MONOMER, Km2_ATP); Translocation_MG_319_MONOMER is "ATP__c + H2O__c + MG_319_MONOMER__c -MG_055_170_277_464_476_20MER__m, MG_072_DIMER__c-> ADP__c + H__c + MG_319_MONOMER__m + PI__c";  // modifiers: MG_055_170_277_464_476_20MER__m, MG_072_DIMER__c
  Translocation_MG_320_MONOMER: 8 ATP__c + 8 H2O__c + MG_320_MONOMER__c => 8 ADP__c + 8 H__c + MG_320_MONOMER__m + 8 PI__c; TranslocationRate(k_trans_MG_320_MONOMER, MG_055_170_277_464_476_20MER__m, MG_072_DIMER__c, MG_320_MONOMER__c, ATP__c, Km1_MG_320_MONOMER, Km2_ATP); Translocation_MG_320_MONOMER is "ATP__c + H2O__c + MG_320_MONOMER__c -MG_055_170_277_464_476_20MER__m, MG_072_DIMER__c-> ADP__c + H__c + MG_320_MONOMER__m + PI__c";  // modifiers: MG_055_170_277_464_476_20MER__m, MG_072_DIMER__c
  Translocation_MG_321_MONOMER: 27 ATP__c + 27 H2O__c + MG_321_MONOMER__c => 27 ADP__c + 27 H__c + MG_321_MONOMER__e + 27 PI__c; TranslocationRate(k_trans_MG_321_MONOMER, MG_055_170_277_464_476_20MER__m, MG_072_DIMER__c, MG_321_MONOMER__c, ATP__c, Km1_MG_321_MONOMER, Km2_ATP); Translocation_MG_321_MONOMER is "ATP__c + H2O__c + MG_321_MONOMER__c -MG_055_170_277_464_476_20MER__m, MG_072_DIMER__c-> ADP__c + H__c + MG_321_MONOMER__e + PI__c";  // modifiers: MG_055_170_277_464_476_20MER__m, MG_072_DIMER__c
  Translocation_MG_322_MONOMER: 16 ATP__c + 16 H2O__c + MG_322_MONOMER__c => 16 ADP__c + 16 H__c + MG_322_MONOMER__m + 16 PI__c; TranslocationRate(k_trans_MG_322_MONOMER, MG_055_170_277_464_476_20MER__m, MG_072_DIMER__c, MG_322_MONOMER__c, ATP__c, Km1_MG_322_MONOMER, Km2_ATP); Translocation_MG_322_MONOMER is "ATP__c + H2O__c + MG_322_MONOMER__c -MG_055_170_277_464_476_20MER__m, MG_072_DIMER__c-> ADP__c + H__c + MG_322_MONOMER__m + PI__c";  // modifiers: MG_055_170_277_464_476_20MER__m, MG_072_DIMER__c
  Translocation_MG_327_MONOMER: 8 ATP__c + 8 H2O__c + MG_327_MONOMER__c => 8 ADP__c + 8 H__c + MG_327_MONOMER__e + 8 PI__c; TranslocationRate(k_trans_MG_327_MONOMER, MG_055_170_277_464_476_20MER__m, MG_072_DIMER__c, MG_327_MONOMER__c, ATP__c, Km1_MG_327_MONOMER, Km2_ATP); Translocation_MG_327_MONOMER is "ATP__c + H2O__c + MG_327_MONOMER__c -MG_055_170_277_464_476_20MER__m, MG_072_DIMER__c-> ADP__c + H__c + MG_327_MONOMER__e + PI__c";  // modifiers: MG_055_170_277_464_476_20MER__m, MG_072_DIMER__c
  Translocation_MG_331_MONOMER: 6 ATP__c + 6 H2O__c + MG_331_MONOMER__c => 6 ADP__c + 6 H__c + MG_331_MONOMER__m + 6 PI__c; TranslocationRate(k_trans_MG_331_MONOMER, MG_055_170_277_464_476_20MER__m, MG_072_DIMER__c, MG_331_MONOMER__c, ATP__c, Km1_MG_331_MONOMER, Km2_ATP); Translocation_MG_331_MONOMER is "ATP__c + H2O__c + MG_331_MONOMER__c -MG_055_170_277_464_476_20MER__m, MG_072_DIMER__c-> ADP__c + H__c + MG_331_MONOMER__m + PI__c";  // modifiers: MG_055_170_277_464_476_20MER__m, MG_072_DIMER__c
  Translocation_MG_338_MONOMER: 36 ATP__c + 36 H2O__c + MG_338_MONOMER__c => 36 ADP__c + 36 H__c + MG_338_MONOMER__m + 36 PI__c; TranslocationRate(k_trans_MG_338_MONOMER, MG_055_170_277_464_476_20MER__m, MG_072_DIMER__c, MG_338_MONOMER__c, ATP__c, Km1_MG_338_MONOMER, Km2_ATP); Translocation_MG_338_MONOMER is "ATP__c + H2O__c + MG_338_MONOMER__c -MG_055_170_277_464_476_20MER__m, MG_072_DIMER__c-> ADP__c + H__c + MG_338_MONOMER__m + PI__c";  // modifiers: MG_055_170_277_464_476_20MER__m, MG_072_DIMER__c
  Translocation_MG_344_MONOMER: 8 ATP__c + 8 H2O__c + MG_344_MONOMER__c => 8 ADP__c + 8 H__c + MG_344_MONOMER__e + 8 PI__c; TranslocationRate(k_trans_MG_344_MONOMER, MG_055_170_277_464_476_20MER__m, MG_072_DIMER__c, MG_344_MONOMER__c, ATP__c, Km1_MG_344_MONOMER, Km2_ATP); Translocation_MG_344_MONOMER is "ATP__c + H2O__c + MG_344_MONOMER__c -MG_055_170_277_464_476_20MER__m, MG_072_DIMER__c-> ADP__c + H__c + MG_344_MONOMER__e + PI__c";  // modifiers: MG_055_170_277_464_476_20MER__m, MG_072_DIMER__c
  Translocation_MG_348_MONOMER: 9 ATP__c + 9 H2O__c + MG_348_MONOMER__c => 9 ADP__c + 9 H__c + MG_348_MONOMER__m + 9 PI__c; TranslocationRate(k_trans_MG_348_MONOMER, MG_055_170_277_464_476_20MER__m, MG_072_DIMER__c, MG_348_MONOMER__c, ATP__c, Km1_MG_348_MONOMER, Km2_ATP); Translocation_MG_348_MONOMER is "ATP__c + H2O__c + MG_348_MONOMER__c -MG_055_170_277_464_476_20MER__m, MG_072_DIMER__c-> ADP__c + H__c + MG_348_MONOMER__m + PI__c";  // modifiers: MG_055_170_277_464_476_20MER__m, MG_072_DIMER__c
  Translocation_MG_354_MONOMER: 4 ATP__c + 4 H2O__c + MG_354_MONOMER__c => 4 ADP__c + 4 H__c + MG_354_MONOMER__m + 4 PI__c; TranslocationRate(k_trans_MG_354_MONOMER, MG_055_170_277_464_476_20MER__m, MG_072_DIMER__c, MG_354_MONOMER__c, ATP__c, Km1_MG_354_MONOMER, Km2_ATP); Translocation_MG_354_MONOMER is "ATP__c + H2O__c + MG_354_MONOMER__c -MG_055_170_277_464_476_20MER__m, MG_072_DIMER__c-> ADP__c + H__c + MG_354_MONOMER__m + PI__c";  // modifiers: MG_055_170_277_464_476_20MER__m, MG_072_DIMER__c
  Translocation_MG_364_MONOMER: 6 ATP__c + 6 H2O__c + MG_364_MONOMER__c => 6 ADP__c + 6 H__c + MG_364_MONOMER__m + 6 PI__c; TranslocationRate(k_trans_MG_364_MONOMER, MG_055_170_277_464_476_20MER__m, MG_072_DIMER__c, MG_364_MONOMER__c, ATP__c, Km1_MG_364_MONOMER, Km2_ATP); Translocation_MG_364_MONOMER is "ATP__c + H2O__c + MG_364_MONOMER__c -MG_055_170_277_464_476_20MER__m, MG_072_DIMER__c-> ADP__c + H__c + MG_364_MONOMER__m + PI__c";  // modifiers: MG_055_170_277_464_476_20MER__m, MG_072_DIMER__c
  Translocation_MG_389_MONOMER: 4 ATP__c + 4 H2O__c + MG_389_MONOMER__c => 4 ADP__c + 4 H__c + MG_389_MONOMER__e + 4 PI__c; TranslocationRate(k_trans_MG_389_MONOMER, MG_055_170_277_464_476_20MER__m, MG_072_DIMER__c, MG_389_MONOMER__c, ATP__c, Km1_MG_389_MONOMER, Km2_ATP); Translocation_MG_389_MONOMER is "ATP__c + H2O__c + MG_389_MONOMER__c -MG_055_170_277_464_476_20MER__m, MG_072_DIMER__c-> ADP__c + H__c + MG_389_MONOMER__e + PI__c";  // modifiers: MG_055_170_277_464_476_20MER__m, MG_072_DIMER__c
  Translocation_MG_390_MONOMER: 19 ATP__c + 19 H2O__c + MG_390_MONOMER__c => 19 ADP__c + 19 H__c + MG_390_MONOMER__m + 19 PI__c; TranslocationRate(k_trans_MG_390_MONOMER, MG_055_170_277_464_476_20MER__m, MG_072_DIMER__c, MG_390_MONOMER__c, ATP__c, Km1_MG_390_MONOMER, Km2_ATP); Translocation_MG_390_MONOMER is "ATP__c + H2O__c + MG_390_MONOMER__c -MG_055_170_277_464_476_20MER__m, MG_072_DIMER__c-> ADP__c + H__c + MG_390_MONOMER__m + PI__c";  // modifiers: MG_055_170_277_464_476_20MER__m, MG_072_DIMER__c
  Translocation_MG_395_MONOMER: 15 ATP__c + 15 H2O__c + MG_395_MONOMER__c => 15 ADP__c + 15 H__c + MG_395_MONOMER__m + 15 PI__c; TranslocationRate(k_trans_MG_395_MONOMER, MG_055_170_277_464_476_20MER__m, MG_072_DIMER__c, MG_395_MONOMER__c, ATP__c, Km1_MG_395_MONOMER, Km2_ATP); Translocation_MG_395_MONOMER is "ATP__c + H2O__c + MG_395_MONOMER__c -MG_055_170_277_464_476_20MER__m, MG_072_DIMER__c-> ADP__c + H__c + MG_395_MONOMER__m + PI__c";  // modifiers: MG_055_170_277_464_476_20MER__m, MG_072_DIMER__c
  Translocation_MG_397_MONOMER: 16 ATP__c + 16 H2O__c + MG_397_MONOMER__c => 16 ADP__c + 16 H__c + MG_397_MONOMER__e + 16 PI__c; TranslocationRate(k_trans_MG_397_MONOMER, MG_055_170_277_464_476_20MER__m, MG_072_DIMER__c, MG_397_MONOMER__c, ATP__c, Km1_MG_397_MONOMER, Km2_ATP); Translocation_MG_397_MONOMER is "ATP__c + H2O__c + MG_397_MONOMER__c -MG_055_170_277_464_476_20MER__m, MG_072_DIMER__c-> ADP__c + H__c + MG_397_MONOMER__e + PI__c";  // modifiers: MG_055_170_277_464_476_20MER__m, MG_072_DIMER__c
  Translocation_MG_403_MONOMER: 6 ATP__c + 6 H2O__c + MG_403_MONOMER__c => 6 ADP__c + 6 H__c + MG_403_MONOMER__m + 6 PI__c; TranslocationRate(k_trans_MG_403_MONOMER, MG_055_170_277_464_476_20MER__m, MG_072_DIMER__c, MG_403_MONOMER__c, ATP__c, Km1_MG_403_MONOMER, Km2_ATP); Translocation_MG_403_MONOMER is "ATP__c + H2O__c + MG_403_MONOMER__c -MG_055_170_277_464_476_20MER__m, MG_072_DIMER__c-> ADP__c + H__c + MG_403_MONOMER__m + PI__c";  // modifiers: MG_055_170_277_464_476_20MER__m, MG_072_DIMER__c
  Translocation_MG_404_MONOMER: 3 ATP__c + 3 H2O__c + MG_404_MONOMER__c => 3 ADP__c + 3 H__c + MG_404_MONOMER__m + 3 PI__c; TranslocationRate(k_trans_MG_404_MONOMER, MG_055_170_277_464_476_20MER__m, MG_072_DIMER__c, MG_404_MONOMER__c, ATP__c, Km1_MG_404_MONOMER, Km2_ATP); Translocation_MG_404_MONOMER is "ATP__c + H2O__c + MG_404_MONOMER__c -MG_055_170_277_464_476_20MER__m, MG_072_DIMER__c-> ADP__c + H__c + MG_404_MONOMER__m + PI__c";  // modifiers: MG_055_170_277_464_476_20MER__m, MG_072_DIMER__c
  Translocation_MG_405_MONOMER: 8 ATP__c + 8 H2O__c + MG_405_MONOMER__c => 8 ADP__c + 8 H__c + MG_405_MONOMER__m + 8 PI__c; TranslocationRate(k_trans_MG_405_MONOMER, MG_055_170_277_464_476_20MER__m, MG_072_DIMER__c, MG_405_MONOMER__c, ATP__c, Km1_MG_405_MONOMER, Km2_ATP); Translocation_MG_405_MONOMER is "ATP__c + H2O__c + MG_405_MONOMER__c -MG_055_170_277_464_476_20MER__m, MG_072_DIMER__c-> ADP__c + H__c + MG_405_MONOMER__m + PI__c";  // modifiers: MG_055_170_277_464_476_20MER__m, MG_072_DIMER__c
  Translocation_MG_406_MONOMER: 5 ATP__c + 5 H2O__c + MG_406_MONOMER__c => 5 ADP__c + 5 H__c + MG_406_MONOMER__m + 5 PI__c; TranslocationRate(k_trans_MG_406_MONOMER, MG_055_170_277_464_476_20MER__m, MG_072_DIMER__c, MG_406_MONOMER__c, ATP__c, Km1_MG_406_MONOMER, Km2_ATP); Translocation_MG_406_MONOMER is "ATP__c + H2O__c + MG_406_MONOMER__c -MG_055_170_277_464_476_20MER__m, MG_072_DIMER__c-> ADP__c + H__c + MG_406_MONOMER__m + PI__c";  // modifiers: MG_055_170_277_464_476_20MER__m, MG_072_DIMER__c
  Translocation_MG_411_MONOMER: 19 ATP__c + 19 H2O__c + MG_411_MONOMER__c => 19 ADP__c + 19 H__c + MG_411_MONOMER__m + 19 PI__c; TranslocationRate(k_trans_MG_411_MONOMER, MG_055_170_277_464_476_20MER__m, MG_072_DIMER__c, MG_411_MONOMER__c, ATP__c, Km1_MG_411_MONOMER, Km2_ATP); Translocation_MG_411_MONOMER is "ATP__c + H2O__c + MG_411_MONOMER__c -MG_055_170_277_464_476_20MER__m, MG_072_DIMER__c-> ADP__c + H__c + MG_411_MONOMER__m + PI__c";  // modifiers: MG_055_170_277_464_476_20MER__m, MG_072_DIMER__c
  Translocation_MG_412_MONOMER: 11 ATP__c + 11 H2O__c + MG_412_MONOMER__c => 11 ADP__c + 11 H__c + MG_412_MONOMER__e + 11 PI__c; TranslocationRate(k_trans_MG_412_MONOMER, MG_055_170_277_464_476_20MER__m, MG_072_DIMER__c, MG_412_MONOMER__c, ATP__c, Km1_MG_412_MONOMER, Km2_ATP); Translocation_MG_412_MONOMER is "ATP__c + H2O__c + MG_412_MONOMER__c -MG_055_170_277_464_476_20MER__m, MG_072_DIMER__c-> ADP__c + H__c + MG_412_MONOMER__e + PI__c";  // modifiers: MG_055_170_277_464_476_20MER__m, MG_072_DIMER__c
  Translocation_MG_414_MONOMER: 30 ATP__c + 30 H2O__c + MG_414_MONOMER__c => 30 ADP__c + 30 H__c + MG_414_MONOMER__e + 30 PI__c; TranslocationRate(k_trans_MG_414_MONOMER, MG_055_170_277_464_476_20MER__m, MG_072_DIMER__c, MG_414_MONOMER__c, ATP__c, Km1_MG_414_MONOMER, Km2_ATP); Translocation_MG_414_MONOMER is "ATP__c + H2O__c + MG_414_MONOMER__c -MG_055_170_277_464_476_20MER__m, MG_072_DIMER__c-> ADP__c + H__c + MG_414_MONOMER__e + PI__c";  // modifiers: MG_055_170_277_464_476_20MER__m, MG_072_DIMER__c
  Translocation_MG_432_MONOMER: 11 ATP__c + 11 H2O__c + MG_432_MONOMER__c => 11 ADP__c + 11 H__c + MG_432_MONOMER__m + 11 PI__c; TranslocationRate(k_trans_MG_432_MONOMER, MG_055_170_277_464_476_20MER__m, MG_072_DIMER__c, MG_432_MONOMER__c, ATP__c, Km1_MG_432_MONOMER, Km2_ATP); Translocation_MG_432_MONOMER is "ATP__c + H2O__c + MG_432_MONOMER__c -MG_055_170_277_464_476_20MER__m, MG_072_DIMER__c-> ADP__c + H__c + MG_432_MONOMER__m + PI__c";  // modifiers: MG_055_170_277_464_476_20MER__m, MG_072_DIMER__c
  Translocation_MG_437_MONOMER: 11 ATP__c + 11 H2O__c + MG_437_MONOMER__c => 11 ADP__c + 11 H__c + MG_437_MONOMER__m + 11 PI__c; TranslocationRate(k_trans_MG_437_MONOMER, MG_055_170_277_464_476_20MER__m, MG_072_DIMER__c, MG_437_MONOMER__c, ATP__c, Km1_MG_437_MONOMER, Km2_ATP); Translocation_MG_437_MONOMER is "ATP__c + H2O__c + MG_437_MONOMER__c -MG_055_170_277_464_476_20MER__m, MG_072_DIMER__c-> ADP__c + H__c + MG_437_MONOMER__m + PI__c";  // modifiers: MG_055_170_277_464_476_20MER__m, MG_072_DIMER__c
  Translocation_MG_439_MONOMER: 8 ATP__c + 8 H2O__c + MG_439_MONOMER__c => 8 ADP__c + 8 H__c + MG_439_MONOMER__m + 8 PI__c; TranslocationRate(k_trans_MG_439_MONOMER, MG_055_170_277_464_476_20MER__m, MG_072_DIMER__c, MG_439_MONOMER__c, ATP__c, Km1_MG_439_MONOMER, Km2_ATP); Translocation_MG_439_MONOMER is "ATP__c + H2O__c + MG_439_MONOMER__c -MG_055_170_277_464_476_20MER__m, MG_072_DIMER__c-> ADP__c + H__c + MG_439_MONOMER__m + PI__c";  // modifiers: MG_055_170_277_464_476_20MER__m, MG_072_DIMER__c
  Translocation_MG_440_MONOMER: 7 ATP__c + 7 H2O__c + MG_440_MONOMER__c => 7 ADP__c + 7 H__c + MG_440_MONOMER__m + 7 PI__c; TranslocationRate(k_trans_MG_440_MONOMER, MG_055_170_277_464_476_20MER__m, MG_072_DIMER__c, MG_440_MONOMER__c, ATP__c, Km1_MG_440_MONOMER, Km2_ATP); Translocation_MG_440_MONOMER is "ATP__c + H2O__c + MG_440_MONOMER__c -MG_055_170_277_464_476_20MER__m, MG_072_DIMER__c-> ADP__c + H__c + MG_440_MONOMER__m + PI__c";  // modifiers: MG_055_170_277_464_476_20MER__m, MG_072_DIMER__c
  Translocation_MG_441_MONOMER: 4 ATP__c + 4 H2O__c + MG_441_MONOMER__c => 4 ADP__c + 4 H__c + MG_441_MONOMER__m + 4 PI__c; TranslocationRate(k_trans_MG_441_MONOMER, MG_055_170_277_464_476_20MER__m, MG_072_DIMER__c, MG_441_MONOMER__c, ATP__c, Km1_MG_441_MONOMER, Km2_ATP); Translocation_MG_441_MONOMER is "ATP__c + H2O__c + MG_441_MONOMER__c -MG_055_170_277_464_476_20MER__m, MG_072_DIMER__c-> ADP__c + H__c + MG_441_MONOMER__m + PI__c";  // modifiers: MG_055_170_277_464_476_20MER__m, MG_072_DIMER__c
  Translocation_MG_443_MONOMER: 11 ATP__c + 11 H2O__c + MG_443_MONOMER__c => 11 ADP__c + 11 H__c + MG_443_MONOMER__m + 11 PI__c; TranslocationRate(k_trans_MG_443_MONOMER, MG_055_170_277_464_476_20MER__m, MG_072_DIMER__c, MG_443_MONOMER__c, ATP__c, Km1_MG_443_MONOMER, Km2_ATP); Translocation_MG_443_MONOMER is "ATP__c + H2O__c + MG_443_MONOMER__c -MG_055_170_277_464_476_20MER__m, MG_072_DIMER__c-> ADP__c + H__c + MG_443_MONOMER__m + PI__c";  // modifiers: MG_055_170_277_464_476_20MER__m, MG_072_DIMER__c
  Translocation_MG_447_MONOMER: 16 ATP__c + 16 H2O__c + MG_447_MONOMER__c => 16 ADP__c + 16 H__c + MG_447_MONOMER__m + 16 PI__c; TranslocationRate(k_trans_MG_447_MONOMER, MG_055_170_277_464_476_20MER__m, MG_072_DIMER__c, MG_447_MONOMER__c, ATP__c, Km1_MG_447_MONOMER, Km2_ATP); Translocation_MG_447_MONOMER is "ATP__c + H2O__c + MG_447_MONOMER__c -MG_055_170_277_464_476_20MER__m, MG_072_DIMER__c-> ADP__c + H__c + MG_447_MONOMER__m + PI__c";  // modifiers: MG_055_170_277_464_476_20MER__m, MG_072_DIMER__c
  Translocation_MG_452_MONOMER: 7 ATP__c + 7 H2O__c + MG_452_MONOMER__c => 7 ADP__c + 7 H__c + MG_452_MONOMER__m + 7 PI__c; TranslocationRate(k_trans_MG_452_MONOMER, MG_055_170_277_464_476_20MER__m, MG_072_DIMER__c, MG_452_MONOMER__c, ATP__c, Km1_MG_452_MONOMER, Km2_ATP); Translocation_MG_452_MONOMER is "ATP__c + H2O__c + MG_452_MONOMER__c -MG_055_170_277_464_476_20MER__m, MG_072_DIMER__c-> ADP__c + H__c + MG_452_MONOMER__m + PI__c";  // modifiers: MG_055_170_277_464_476_20MER__m, MG_072_DIMER__c
  Translocation_MG_456_MONOMER: 10 ATP__c + 10 H2O__c + MG_456_MONOMER__c => 10 ADP__c + 10 H__c + MG_456_MONOMER__m + 10 PI__c; TranslocationRate(k_trans_MG_456_MONOMER, MG_055_170_277_464_476_20MER__m, MG_072_DIMER__c, MG_456_MONOMER__c, ATP__c, Km1_MG_456_MONOMER, Km2_ATP); Translocation_MG_456_MONOMER is "ATP__c + H2O__c + MG_456_MONOMER__c -MG_055_170_277_464_476_20MER__m, MG_072_DIMER__c-> ADP__c + H__c + MG_456_MONOMER__m + PI__c";  // modifiers: MG_055_170_277_464_476_20MER__m, MG_072_DIMER__c
  Translocation_MG_457_MONOMER: 20 ATP__c + 20 H2O__c + MG_457_MONOMER__c => 20 ADP__c + 20 H__c + MG_457_MONOMER__m + 20 PI__c; TranslocationRate(k_trans_MG_457_MONOMER, MG_055_170_277_464_476_20MER__m, MG_072_DIMER__c, MG_457_MONOMER__c, ATP__c, Km1_MG_457_MONOMER, Km2_ATP); Translocation_MG_457_MONOMER is "ATP__c + H2O__c + MG_457_MONOMER__c -MG_055_170_277_464_476_20MER__m, MG_072_DIMER__c-> ADP__c + H__c + MG_457_MONOMER__m + PI__c";  // modifiers: MG_055_170_277_464_476_20MER__m, MG_072_DIMER__c
  Translocation_MG_464_MONOMER: 11 ATP__c + 11 H2O__c + MG_464_MONOMER__c => 11 ADP__c + 11 H__c + MG_464_MONOMER__m + 11 PI__c; TranslocationRate(k_trans_MG_464_MONOMER, MG_055_170_277_464_476_20MER__m, MG_072_DIMER__c, MG_464_MONOMER__c, ATP__c, Km1_MG_464_MONOMER, Km2_ATP); Translocation_MG_464_MONOMER is "ATP__c + H2O__c + MG_464_MONOMER__c -MG_055_170_277_464_476_20MER__m, MG_072_DIMER__c-> ADP__c + H__c + MG_464_MONOMER__m + PI__c";  // modifiers: MG_055_170_277_464_476_20MER__m, MG_072_DIMER__c
  Translocation_MG_468_MONOMER: 51 ATP__c + 51 H2O__c + MG_468_MONOMER__c => 51 ADP__c + 51 H__c + MG_468_MONOMER__m + 51 PI__c; TranslocationRate(k_trans_MG_468_MONOMER, MG_055_170_277_464_476_20MER__m, MG_072_DIMER__c, MG_468_MONOMER__c, ATP__c, Km1_MG_468_MONOMER, Km2_ATP); Translocation_MG_468_MONOMER is "ATP__c + H2O__c + MG_468_MONOMER__c -MG_055_170_277_464_476_20MER__m, MG_072_DIMER__c-> ADP__c + H__c + MG_468_MONOMER__m + PI__c";  // modifiers: MG_055_170_277_464_476_20MER__m, MG_072_DIMER__c
  Translocation_MG_474_MONOMER: 4 ATP__c + 4 H2O__c + MG_474_MONOMER__c => 4 ADP__c + 4 H__c + MG_474_MONOMER__m + 4 PI__c; TranslocationRate(k_trans_MG_474_MONOMER, MG_055_170_277_464_476_20MER__m, MG_072_DIMER__c, MG_474_MONOMER__c, ATP__c, Km1_MG_474_MONOMER, Km2_ATP); Translocation_MG_474_MONOMER is "ATP__c + H2O__c + MG_474_MONOMER__c -MG_055_170_277_464_476_20MER__m, MG_072_DIMER__c-> ADP__c + H__c + MG_474_MONOMER__m + PI__c";  // modifiers: MG_055_170_277_464_476_20MER__m, MG_072_DIMER__c
  Translocation_MG_476_MONOMER: 2 ATP__c + 2 H2O__c + MG_476_MONOMER__c => 2 ADP__c + 2 H__c + MG_476_MONOMER__m + 2 PI__c; TranslocationRate(k_trans_MG_476_MONOMER, MG_055_170_277_464_476_20MER__m, MG_072_DIMER__c, MG_476_MONOMER__c, ATP__c, Km1_MG_476_MONOMER, Km2_ATP); Translocation_MG_476_MONOMER is "ATP__c + H2O__c + MG_476_MONOMER__c -MG_055_170_277_464_476_20MER__m, MG_072_DIMER__c-> ADP__c + H__c + MG_476_MONOMER__m + PI__c";  // modifiers: MG_055_170_277_464_476_20MER__m, MG_072_DIMER__c
  Translocation_MG_478_MONOMER: 4 ATP__c + 4 H2O__c + MG_478_MONOMER__c => 4 ADP__c + 4 H__c + MG_478_MONOMER__m + 4 PI__c; TranslocationRate(k_trans_MG_478_MONOMER, MG_055_170_277_464_476_20MER__m, MG_072_DIMER__c, MG_478_MONOMER__c, ATP__c, Km1_MG_478_MONOMER, Km2_ATP); Translocation_MG_478_MONOMER is "ATP__c + H2O__c + MG_478_MONOMER__c -MG_055_170_277_464_476_20MER__m, MG_072_DIMER__c-> ADP__c + H__c + MG_478_MONOMER__m + PI__c";  // modifiers: MG_055_170_277_464_476_20MER__m, MG_072_DIMER__c
  Translocation_MG_515_MONOMER: 8 ATP__c + 8 H2O__c + MG_515_MONOMER__c => 8 ADP__c + 8 H__c + MG_515_MONOMER__m + 8 PI__c; TranslocationRate(k_trans_MG_515_MONOMER, MG_055_170_277_464_476_20MER__m, MG_072_DIMER__c, MG_515_MONOMER__c, ATP__c, Km1_MG_515_MONOMER, Km2_ATP); Translocation_MG_515_MONOMER is "ATP__c + H2O__c + MG_515_MONOMER__c -MG_055_170_277_464_476_20MER__m, MG_072_DIMER__c-> ADP__c + H__c + MG_515_MONOMER__m + PI__c";  // modifiers: MG_055_170_277_464_476_20MER__m, MG_072_DIMER__c
  Translocation_MG_521_MONOMER: 6 ATP__c + 6 H2O__c + MG_521_MONOMER__c => 6 ADP__c + 6 H__c + MG_521_MONOMER__m + 6 PI__c; TranslocationRate(k_trans_MG_521_MONOMER, MG_055_170_277_464_476_20MER__m, MG_072_DIMER__c, MG_521_MONOMER__c, ATP__c, Km1_MG_521_MONOMER, Km2_ATP); Translocation_MG_521_MONOMER is "ATP__c + H2O__c + MG_521_MONOMER__c -MG_055_170_277_464_476_20MER__m, MG_072_DIMER__c-> ADP__c + H__c + MG_521_MONOMER__m + PI__c";  // modifiers: MG_055_170_277_464_476_20MER__m, MG_072_DIMER__c
  Translocation_MG_524_MONOMER: 4 ATP__c + 4 H2O__c + MG_524_MONOMER__c => 4 ADP__c + 4 H__c + MG_524_MONOMER__m + 4 PI__c; TranslocationRate(k_trans_MG_524_MONOMER, MG_055_170_277_464_476_20MER__m, MG_072_DIMER__c, MG_524_MONOMER__c, ATP__c, Km1_MG_524_MONOMER, Km2_ATP); Translocation_MG_524_MONOMER is "ATP__c + H2O__c + MG_524_MONOMER__c -MG_055_170_277_464_476_20MER__m, MG_072_DIMER__c-> ADP__c + H__c + MG_524_MONOMER__m + PI__c";  // modifiers: MG_055_170_277_464_476_20MER__m, MG_072_DIMER__c
end
