// SBML level 2 version 4

function TranslocationRate(k_cat, en1, en2, monomer, atp, Km1, Km2)
  k_cat*en1*en2*monomer*atp/((1 + monomer/Km1)*(1 + atp/Km2));
end

model ProteinTranslocation_subset()

  // Compartments:
  compartment c = 1;
  compartment e = 1;
  compartment m = 1;

  // Species:
  species ADP__c in c = 3623/c;
  species ATP__c in c = 36234/c;
  species H2O__c in c = 3.09737899e8/c; H2O__c is "water";
  species H__c in c = 13042/c; H__c is "hydrogen ion";
  species MG_061_MONOMER__c in c = 0; MG_061_MONOMER__c is "Mycoplasma MFS transporter";
  species MG_062_MONOMER__c in c = 0; MG_062_MONOMER__c is "PTS system, fructose-specific IIABC component";
  species MG_069_MONOMER__c in c = 0; MG_069_MONOMER__c is "PTS system, glucose-specific IIABC component";
  species MG_072_DIMER__c in c = 13/c; MG_072_DIMER__c is "preprotein translocase, SecA subunit";
  species MG_411_MONOMER__c in c = 0; MG_411_MONOMER__c is "phosphate ABC transporter, permease protein PstA";
  species MG_412_MONOMER__c in c = 0; MG_412_MONOMER__c is "phosphate ABC transporter, substrate-binding protein";
  species MG_429_MONOMER__c in c = 0; MG_429_MONOMER__c is "PTS system, E1";
  species MG_431_MONOMER__c in c = 1/c; MG_431_MONOMER__c is "triosephosphate isomerase";
  species PI__c in c = 7246/c; PI__c is "phosphate";
  species MG_412_MONOMER__e in e = 28/e; MG_412_MONOMER__e is "phosphate ABC transporter, substrate-binding protein";
  species MG_055_170_277_464_476_20MER__m in m = 13/m; MG_055_170_277_464_476_20MER__m is "preprotein translocase";
  species MG_061_MONOMER__m in m = 22/m; MG_061_MONOMER__m is "Mycoplasma MFS transporter";
  species MG_062_MONOMER__m in m = 34/m; MG_062_MONOMER__m is "PTS system, fructose-specific IIABC component";
  species MG_069_MONOMER__m in m = 31/m; MG_069_MONOMER__m is "PTS system, glucose-specific IIABC component";
  species MG_411_MONOMER__m in m = 15/m; MG_411_MONOMER__m is "phosphate ABC transporter, permease protein PstA";

  // Parameters:
  Km1_MG_061_MONOMER = 1;
  Km1_MG_062_MONOMER = 1;
  Km1_MG_069_MONOMER = 1;
  Km1_MG_411_MONOMER = 1;
  Km1_MG_412_MONOMER = 1;
  Km2_ATP = 1;
  k_trans_MG_061_MONOMER = 6.525041e12;
  k_trans_MG_062_MONOMER = 5.440733e12;
  k_trans_MG_069_MONOMER = 4.074558e12;
  k_trans_MG_411_MONOMER = 5.657031e12;
  k_trans_MG_412_MONOMER = 9.813523e12;

  // Reactions:
  Translocation_MG_061_MONOMER: 16 ATP__c + 16 H2O__c + MG_061_MONOMER__c => 16 ADP__c + 16 H__c + MG_061_MONOMER__m + 16 PI__c; TranslocationRate(k_trans_MG_061_MONOMER, MG_055_170_277_464_476_20MER__m, MG_072_DIMER__c, MG_061_MONOMER__c, ATP__c, Km1_MG_061_MONOMER, Km2_ATP); Translocation_MG_061_MONOMER is "Translocation (Mycoplasma MFS transporter)";  // modifiers: MG_055_170_277_464_476_20MER__m, MG_072_DIMER__c
  Translocation_MG_062_MONOMER: 19 ATP__c + 19 H2O__c + MG_062_MONOMER__c => 19 ADP__c + 19 H__c + MG_062_MONOMER__m + 19 PI__c; TranslocationRate(k_trans_MG_062_MONOMER, MG_055_170_277_464_476_20MER__m, MG_072_DIMER__c, MG_062_MONOMER__c, ATP__c, Km1_MG_062_MONOMER, Km2_ATP); Translocation_MG_062_MONOMER is "Translocation (PTS system, fructose-specific IIABC component)";  // modifiers: MG_055_170_277_464_476_20MER__m, MG_072_DIMER__c
  Translocation_MG_069_MONOMER: 26 ATP__c + 26 H2O__c + MG_069_MONOMER__c => 26 ADP__c + 26 H__c + MG_069_MONOMER__m + 26 PI__c; TranslocationRate(k_trans_MG_069_MONOMER, MG_055_170_277_464_476_20MER__m, MG_072_DIMER__c, MG_069_MONOMER__c, ATP__c, Km1_MG_069_MONOMER, Km2_ATP); Translocation_MG_069_MONOMER is "Translocation (PTS system, glucose-specific IIABC component)";  // modifiers: MG_055_170_277_464_476_20MER__m, MG_072_DIMER__c
  Translocation_MG_411_MONOMER: 19 ATP__c + 19 H2O__c + MG_411_MONOMER__c => 19 ADP__c + 19 H__c + MG_411_MONOMER__m + 19 PI__c; TranslocationRate(k_trans_MG_411_MONOMER, MG_055_170_277_464_476_20MER__m, MG_072_DIMER__c, MG_411_MONOMER__c, ATP__c, Km1_MG_411_MONOMER, Km2_ATP); Translocation_MG_411_MONOMER is "Translocation (phosphate ABC transporter, permease protein PstA)";  // modifiers: MG_055_170_277_464_476_20MER__m, MG_072_DIMER__c
  Translocation_MG_412_MONOMER: 11 ATP__c + 11 H2O__c + MG_412_MONOMER__c => 11 ADP__c + 11 H__c + MG_412_MONOMER__e + 11 PI__c; TranslocationRate(k_trans_MG_412_MONOMER, MG_055_170_277_464_476_20MER__m, MG_072_DIMER__c, MG_412_MONOMER__c, ATP__c, Km1_MG_412_MONOMER, Km2_ATP); Translocation_MG_412_MONOMER is "Translocation (phosphate ABC transporter, substrate-binding protein)";  // modifiers: MG_055_170_277_464_476_20MER__m, MG_072_DIMER__c
end
