// SBML level 3 version 1

function min(x, y)
  piecewise(x, x < y, y);
end

model rnadecay()
  // model units - substance: substance

  // Compartments:
  compartment c;

  // Species:
  species H2O__c in c = 309737899/c; H2O__c is "water";
  species H__c in c = 13042/c; H__c is "hydrogen ion";
  species AMP__c in c = 1449/c;
  species CMP__c in c = 1449/c;
  species GMP__c in c = 1449/c;
  species UMP__c in c = 1449/c;
  species ALA__c in c = 8303/c; ALA__c is "L-alanine";
  species ARG__c in c = 5991/c; ARG__c is "L-Arginine";
  species ASN__c in c = 11161/c; ASN__c is "L-Asparagine";
  species ASP__c in c = 9407/c; ASP__c is "L-Aspartate";
  species CYS__c in c = 2181/c; CYS__c is "L-Cysteine";
  species GLN__c in c = 7920/c; GLN__c is "L-glutamine";
  species GLU__c in c = 9518/c; GLU__c is "L-Glutamate";
  species GLY__c in c = 7679/c; GLY__c is "glycine";
  species HIS__c in c = 2933/c; HIS__c is "L-Histidine";
  species ILE__c in c = 14247/c; ILE__c is "L-Isoleucine";
  species LEU__c in c = 17971/c; LEU__c is "L-Leucine";
  species LYS__c in c = 15094/c; LYS__c is "L-Lysine";
  species MET__c in c = 2792/c; MET__c is "L-Methionine";
  species PHE__c in c = 7681/c; PHE__c is "L-phenylalanine";
  species PRO__c in c = 4140/c; PRO__c is "L-Proline";
  species SER__c in c = 8749/c; SER__c is "L-Serine";
  species THR__c in c = 4460/c; THR__c is "L-Threonine";
  species TRP__c in c = 1084/c; TRP__c is "L-tryptophan";
  species TYR__c in c = 5375/c; TYR__c is "L-tyrosine";
  species VAL__c in c = 9500/c; VAL__c is "L-Valine";
  species FMET__c in c = 0; FMET__c is "N-Formyl-L-methionine";
  species TU_001__c in c = 0; TU_001__c is "MG_001 - MG_002";
  species TU_002__c in c = 0; TU_002__c is "MG_003 - MG_004";
  species TU_003__c in c = 1/c; TU_003__c is "MG_005 - MG_009";
  species TU_004__c in c = 0; TU_004__c is "MG_010";
  species TU_005__c in c = 0; TU_005__c is "MG_011 - MG_012";
  species TU_006__c in c = 0; TU_006__c is "MG_013";
  species MG471__c in c = 35/c;
  species MG472__c in c = 36/c;
  species TU_008__c in c = 0; TU_008__c is "MG_014 - MG_015";
  species TU_009__c in c = 0; TU_009__c is "MG_018";
  species TU_010__c in c = 0; TU_010__c is "MG_019 - MG_021";
  species TU_011__c in c = 0; TU_011__c is "MG_022 - MG_024";
  species TU_012__c in c = 0; TU_012__c is "MG_025";
  species TU_013__c in c = 0; TU_013__c is "MG_026 - MG_028";
  species TU_014__c in c = 0; TU_014__c is "MG_029 - MG_031";
  species TU_015__c in c = 0; TU_015__c is "MG_032";
  species TU_016__c in c = 0; TU_016__c is "MG_033";
  species TU_017__c in c = 0; TU_017__c is "MG_034";
  species TU_018__c in c = 0; TU_018__c is "MG_035";
  species TU_019__c in c = 0; TU_019__c is "MG_036";
  species TU_020__c in c = 0; TU_020__c is "MG_037";
  species TU_021__c in c = 0; TU_021__c is "MG_038";
  species TU_022__c in c = 0; TU_022__c is "MG_039";
  species TU_023__c in c = 0; TU_023__c is "MG_040";
  species TU_024__c in c = 0; TU_024__c is "MG_041";
  species TU_025__c in c = 0; TU_025__c is "MG_042 - MG_044";
  species TU_026__c in c = 0; TU_026__c is "MG_045";
  species TU_027__c in c = 0; TU_027__c is "MG_046 - MG_047";
  species TU_028__c in c = 0; TU_028__c is "MG_048";
  species TU_029__c in c = 1/c; TU_029__c is "MG_049 - MG_051";
  species TU_030__c in c = 0; TU_030__c is "MG_052 - MG_053";
  species TU_031__c in c = 1/c; TU_031__c is "MG_054, MG_055, MG_473";
  species TU_032__c in c = 0; TU_032__c is "MG_056, MG_057, MG_474";
  species TU_033__c in c = 0; TU_033__c is "MG_058";
  species TU_034__c in c = 0; TU_034__c is "MG_059";
  species TU_035__c in c = 0; TU_035__c is "MG_060";
  species TU_036__c in c = 0; TU_036__c is "MG_061";
  species MG475__c in c = 6/c;
  species TU_038__c in c = 0; TU_038__c is "MG_062";
  species TU_039__c in c = 0; TU_039__c is "MG_063";
  species TU_040__c in c = 0; TU_040__c is "MG_064 - MG_065";
  species TU_041__c in c = 0; TU_041__c is "MG_066";
  species TU_042__c in c = 0; TU_042__c is "MG_067 - MG_068";
  species TU_043__c in c = 0; TU_043__c is "MG_069";
  species TU_044__c in c = 0; TU_044__c is "MG_070";
  species TU_045__c in c = 0; TU_045__c is "MG_071";
  species TU_046__c in c = 0; TU_046__c is "MG_072";
  species TU_047__c in c = 0; TU_047__c is "MG_073";
  species TU_048__c in c = 0; TU_048__c is "MG_074";
  species TU_049__c in c = 1/c; TU_049__c is "MG_075";
  species TU_050__c in c = 0; TU_050__c is "MG_076";
  species TU_051__c in c = 0; TU_051__c is "MG_077 - MG_080";
  species TU_052__c in c = 0; TU_052__c is "MG_081 - MG_082";
  species TU_053__c in c = 0; TU_053__c is "MG_083";
  species TU_054__c in c = 1/c; TU_054__c is "MG_084 - MG_085";
  species TU_055__c in c = 0; TU_055__c is "MG_086 - MG_089";
  species TU_056__c in c = 0; TU_056__c is "MG_090";
  species TU_057__c in c = 2/c; TU_057__c is "MG_091";
  species TU_058__c in c = 2/c; TU_058__c is "MG_092";
  species TU_059__c in c = 0; TU_059__c is "MG_093 - MG_095";
  species TU_060__c in c = 0; TU_060__c is "MG_096";
  species TU_061__c in c = 0; TU_061__c is "MG_097";
  species TU_062__c in c = 2/c; TU_062__c is "MG_098 - MG_100";
  species TU_063__c in c = 0; TU_063__c is "MG_101 - MG_103";
  species TU_064__c in c = 0; TU_064__c is "MG_476";
  species TU_065__c in c = 0; TU_065__c is "MG_104";
  species TU_066__c in c = 1/c; TU_066__c is "MG_105";
  species TU_067__c in c = 0; TU_067__c is "MG_106";
  species TU_068__c in c = 0; TU_068__c is "MG_107 - MG_110";
  species TU_069__c in c = 0; TU_069__c is "MG_111 - MG_112";
  species TU_070__c in c = 0; TU_070__c is "MG_113";
  species TU_071__c in c = 0; TU_071__c is "MG_114";
  species TU_072__c in c = 0; TU_072__c is "MG_115";
  species TU_073__c in c = 0; TU_073__c is "MG_116 - MG_118";
  species TU_074__c in c = 0; TU_074__c is "MG_119 - MG_122";
  species TU_075__c in c = 0; TU_075__c is "MG_123";
  species TU_076__c in c = 0; TU_076__c is "MG_124 - MG_125";
  species TU_077__c in c = 0; TU_077__c is "MG_126";
  species TU_078__c in c = 0; TU_078__c is "MG_127 - MG_128";
  species TU_079__c in c = 0; TU_079__c is "MG_129";
  species TU_080__c in c = 0; TU_080__c is "MG_130";
  species TU_081__c in c = 0; TU_081__c is "MG_131";
  species TU_082__c in c = 0; TU_082__c is "MG_132";
  species TU_083__c in c = 0; TU_083__c is "MG_133";
  species TU_084__c in c = 0; TU_084__c is "MG_134";
  species TU_085__c in c = 0; TU_085__c is "MG_135";
  species TU_086__c in c = 1/c; TU_086__c is "MG_136 - MG_138";
  species TU_087__c in c = 0; TU_087__c is "MG_139";
  species MGrrnA16S__c in c = 0; MGrrnA16S__c is "16S ribosomal rRNA";
  species MGrrnA23S__c in c = 0; MGrrnA23S__c is "23S ribosomal rRNA";
  species MGrrnA5S__c in c = 29/c; MGrrnA5S__c is "5S ribosomal rRNA";
  species TU_089__c in c = 0; TU_089__c is "MG_140";
  species TU_090__c in c = 0; TU_090__c is "MG_141";
  species TU_091__c in c = 0; TU_091__c is "MG_477";
  species TU_092__c in c = 1/c; TU_092__c is "MG_142 - MG_144";
  species TU_093__c in c = 0; TU_093__c is "MG_145";
  species TU_094__c in c = 1/c; TU_094__c is "MG_146";
  species TU_095__c in c = 0; TU_095__c is "MG_147";
  species TU_096__c in c = 0; TU_096__c is "MG_148";
  species TU_097__c in c = 0; TU_097__c is "MG_149";
  species TU_098__c in c = 0; TU_098__c is "MG_478";
  species TU_099__c in c = 1/c; TU_099__c is "MG_150";
  species TU_100__c in c = 0; TU_100__c is "MG_151";
  species TU_101__c in c = 1/c; TU_101__c is "MG_152 - MG_153";
  species TU_102__c in c = 0; TU_102__c is "MG_154 - MG_163";
  species TU_103__c in c = 0; TU_103__c is "MG_164";
  species TU_104__c in c = 1/c; TU_104__c is "MG_165 - MG_169";
  species TU_105__c in c = 1/c; TU_105__c is "MG_170 - MG_173";
  species TU_106__c in c = 0; TU_106__c is "MG_174";
  species TU_107__c in c = 1/c; TU_107__c is "MG_175 - MG_177";
  species TU_108__c in c = 0; TU_108__c is "MG_178";
  species TU_109__c in c = 0; TU_109__c is "MG_179";
  species TU_110__c in c = 0; TU_110__c is "MG_180";
  species TU_111__c in c = 0; TU_111__c is "MG_181";
  species TU_112__c in c = 0; TU_112__c is "MG_182";
  species TU_113__c in c = 0; TU_113__c is "MG_183 - MG_184";
  species TU_114__c in c = 0; TU_114__c is "MG_185";
  species TU_115__c in c = 0; TU_115__c is "MG_186";
  species TU_116__c in c = 0; TU_116__c is "MG_187 - MG_189";
  species TU_117__c in c = 1/c; TU_117__c is "MG_190";
  species TU_118__c in c = 0; TU_118__c is "MG_191 - MG_192";
  species TU_119__c in c = 0; TU_119__c is "MG_194 - MG_195";
  species TU_120__c in c = 1/c; TU_120__c is "MG_196 - MG_198";
  species TU_121__c in c = 0; TU_121__c is "MG_199";
  species TU_122__c in c = 0; TU_122__c is "MG_200 - MG_202";
  species MG479__c in c = 12/c;
  species TU_124__c in c = 0; TU_124__c is "MG_203 - MG_204";
  species TU_125__c in c = 0; TU_125__c is "MG_205";
  species TU_126__c in c = 0; TU_126__c is "MG_206";
  species TU_127__c in c = 1/c; TU_127__c is "MG_207";
  species TU_128__c in c = 0; TU_128__c is "MG_208 - MG_210";
  species TU_129__c in c = 1/c; TU_129__c is "MG_480";
  species TU_130__c in c = 2/c; TU_130__c is "MG_481";
  species TU_131__c in c = 0; TU_131__c is "MG_211, MG_212, MG_482";
  species TU_132__c in c = 2/c; TU_132__c is "MG_213 - MG_214";
  species TU_133__c in c = 2/c; TU_133__c is "MG_215 - MG_216";
  species MG483__c in c = 5/c;
  species MG484__c in c = 30/c;
  species MG485__c in c = 6/c;
  species MG486__c in c = 22/c;
  species MG487__c in c = 10/c;
  species MG488__c in c = 5/c;
  species MG489__c in c = 42/c;
  species MG490__c in c = 27/c;
  species TU_142__c in c = 0; TU_142__c is "MG_217";
  species TU_143__c in c = 0; TU_143__c is "MG_218, MG_491";
  species TU_144__c in c = 0; TU_144__c is "MG_219";
  species TU_145__c in c = 0; TU_145__c is "MG_220";
  species MG492__c in c = 6/c;
  species TU_147__c in c = 0; TU_147__c is "MG_221 - MG_223";
  species TU_148__c in c = 2/c; TU_148__c is "MG_224";
  species TU_149__c in c = 0; TU_149__c is "MG_225 - MG_226";
  species TU_150__c in c = 0; TU_150__c is "MG_227";
  species TU_151__c in c = 1/c; TU_151__c is "MG_228 - MG_231";
  species TU_152__c in c = 1/c; TU_152__c is "MG_232 - MG_236";
  species TU_153__c in c = 0; TU_153__c is "MG_237";
  species TU_154__c in c = 0; TU_154__c is "MG_238";
  species TU_155__c in c = 0; TU_155__c is "MG_239";
  species TU_156__c in c = 1/c; TU_156__c is "MG_240";
  species TU_157__c in c = 0; TU_157__c is "MG_241";
  species TU_158__c in c = 0; TU_158__c is "MG_242";
  species TU_159__c in c = 0; TU_159__c is "MG_243 - MG_244";
  species TU_160__c in c = 0; TU_160__c is "MG_245";
  species TU_161__c in c = 0; TU_161__c is "MG_246";
  species TU_162__c in c = 0; TU_162__c is "MG_247";
  species TU_163__c in c = 0; TU_163__c is "MG_248 - MG_249";
  species TU_164__c in c = 0; TU_164__c is "MG_250 - MG_251";
  species TU_165__c in c = 2/c; TU_165__c is "MG_252 - MG_254";
  species MG493__c in c = 25/c;
  species TU_167__c in c = 0; TU_167__c is "MG_255, MG_494";
  species MG495__c in c = 3/c;
  species MG496__c in c = 4/c;
  species TU_169__c in c = 0; TU_169__c is "MG_256";
  species TU_170__c in c = 2/c; TU_170__c is "MG_257 - MG_259";
  species TU_171__c in c = 0; TU_171__c is "MG_260";
  species MG497__c in c = 4/c;
  species TU_173__c in c = 0; TU_173__c is "MG_261, MG_262, MG_498";
  species TU_174__c in c = 0; TU_174__c is "MG_263";
  species TU_175__c in c = 0; TU_175__c is "MG_264";
  species TU_176__c in c = 0; TU_176__c is "MG_265 - MG_267";
  species TU_177__c in c = 0; TU_177__c is "MG_268";
  species MG_0001__c in c = 0; MG_0001__c is "scRNA, signal recognition particle 4.5S RNA, MCS1";
  species TU_179__c in c = 0; TU_179__c is "MG_269";
  species TU_180__c in c = 3/c; TU_180__c is "MG_270 - MG_272";
  species MG_0002__c in c = 21/c; MG_0002__c is "MG170 RNA";
  species TU_182__c in c = 6/c; TU_182__c is "MG_273 - MG_275";
  species TU_183__c in c = 0; TU_183__c is "MG_276";
  species TU_184__c in c = 0; TU_184__c is "MG_277";
  species TU_185__c in c = 0; TU_185__c is "MG_278";
  species TU_186__c in c = 0; TU_186__c is "MG_279 - MG_281";
  species MG499__c in c = 21/c;
  species MG500__c in c = 30/c;
  species MG501__c in c = 18/c;
  species MG502__c in c = 37/c;
  species MG503__c in c = 22/c;
  species TU_190__c in c = 0; TU_190__c is "MG_282";
  species TU_191__c in c = 0; TU_191__c is "MG_283";
  species TU_192__c in c = 0; TU_192__c is "MG_284 - MG_286";
  species TU_193__c in c = 1/c; TU_193__c is "MG_287";
  species MG504__c in c = 4/c;
  species TU_195__c in c = 0; TU_195__c is "MG_288";
  species TU_196__c in c = 0; TU_196__c is "MG_289 - MG_291";
  species TU_197__c in c = 1/c; TU_197__c is "MG_505";
  species TU_198__c in c = 0; TU_198__c is "MG_292 - MG_294";
  species TU_199__c in c = 0; TU_199__c is "MG_295";
  species TU_200__c in c = 0; TU_200__c is "MG_296";
  species TU_201__c in c = 0; TU_201__c is "MG_297";
  species TU_202__c in c = 1/c; TU_202__c is "MG_298";
  species TU_203__c in c = 0; TU_203__c is "MG_299";
  species TU_204__c in c = 0; TU_204__c is "MG_300 - MG_301";
  species TU_205__c in c = 0; TU_205__c is "MG_302";
  species TU_206__c in c = 0; TU_206__c is "MG_303";
  species TU_207__c in c = 0; TU_207__c is "MG_304";
  species TU_208__c in c = 0; TU_208__c is "MG_305";
  species TU_209__c in c = 0; TU_209__c is "MG_306";
  species TU_210__c in c = 0; TU_210__c is "MG_307";
  species TU_211__c in c = 0; TU_211__c is "MG_308 - MG_309";
  species TU_212__c in c = 0; TU_212__c is "MG_310";
  species TU_213__c in c = 0; TU_213__c is "MG_311";
  species TU_214__c in c = 1/c; TU_214__c is "MG_312";
  species TU_215__c in c = 0; TU_215__c is "MG_313 - MG_315";
  species TU_216__c in c = 0; TU_216__c is "MG_316";
  species TU_217__c in c = 0; TU_217__c is "MG_317 - MG_318";
  species TU_218__c in c = 0; TU_218__c is "MG_319";
  species TU_219__c in c = 0; TU_219__c is "MG_320";
  species MG506__c in c = 7/c;
  species MG507__c in c = 11/c;
  species TU_222__c in c = 0; TU_222__c is "MG_321";
  species MG508__c in c = 30/c;
  species MG509__c in c = 28/c;
  species MG510__c in c = 25/c;
  species MG511__c in c = 27/c;
  species MG512__c in c = 30/c;
  species MG513__c in c = 27/c;
  species MG514__c in c = 27/c;
  species TU_224__c in c = 0; TU_224__c is "MG_322";
  species TU_225__c in c = 0; TU_225__c is "MG_323";
  species MG_0003__c in c = 0; MG_0003__c is "Rnase P RNA, MCS5, M1 RNA";
  species MG_0004__c in c = 2/c; MG_0004__c is "transfer-messenger RNA, tmRNA, MCS6, 10Sa RNA";
  species TU_228__c in c = 0; TU_228__c is "MG_324, MG_325, MG_515";
  species TU_229__c in c = 0; TU_229__c is "MG_326";
  species TU_230__c in c = 0; TU_230__c is "MG_327";
  species TU_231__c in c = 0; TU_231__c is "MG_328";
  species TU_232__c in c = 0; TU_232__c is "MG_329";
  species TU_233__c in c = 0; TU_233__c is "MG_330 - MG_333";
  species TU_234__c in c = 0; TU_234__c is "MG_334";
  species TU_235__c in c = 0; TU_235__c is "MG_335";
  species TU_236__c in c = 0; TU_236__c is "MG_516";
  species TU_237__c in c = 0; TU_237__c is "MG_517";
  species TU_238__c in c = 0; TU_238__c is "MG_336";
  species TU_239__c in c = 0; TU_239__c is "MG_337";
  species TU_240__c in c = 0; TU_240__c is "MG_338";
  species TU_241__c in c = 1/c; TU_241__c is "MG_339";
  species TU_242__c in c = 2/c; TU_242__c is "MG_340 - MG_341";
  species TU_243__c in c = 0; TU_243__c is "MG_342";
  species TU_244__c in c = 0; TU_244__c is "MG_343";
  species TU_245__c in c = 0; TU_245__c is "MG_344";
  species TU_246__c in c = 0; TU_246__c is "MG_345";
  species TU_247__c in c = 0; TU_247__c is "MG_346 - MG_347";
  species MG518__c in c = 9/c;
  species TU_249__c in c = 0; TU_249__c is "MG_348";
  species MG519__c in c = 13/c;
  species TU_251__c in c = 0; TU_251__c is "MG_349 - MG_350";
  species MG520__c in c = 16/c;
  species TU_253__c in c = 0; TU_253__c is "MG_521";
  species TU_254__c in c = 0; TU_254__c is "MG_351";
  species TU_255__c in c = 0; TU_255__c is "MG_352";
  species TU_256__c in c = 0; TU_256__c is "MG_353";
  species TU_257__c in c = 0; TU_257__c is "MG_354";
  species TU_258__c in c = 1/c; TU_258__c is "MG_355";
  species TU_259__c in c = 0; TU_259__c is "MG_356";
  species TU_260__c in c = 0; TU_260__c is "MG_357";
  species TU_261__c in c = 0; TU_261__c is "MG_358 - MG_359";
  species TU_262__c in c = 0; TU_262__c is "MG_360";
  species TU_263__c in c = 0; TU_263__c is "MG_361 - MG_363";
  species TU_264__c in c = 0; TU_264__c is "MG_522";
  species TU_265__c in c = 0; TU_265__c is "MG_364";
  species TU_266__c in c = 0; TU_266__c is "MG_365";
  species TU_267__c in c = 0; TU_267__c is "MG_366";
  species TU_268__c in c = 0; TU_268__c is "MG_367 - MG_369";
  species TU_269__c in c = 0; TU_269__c is "MG_370";
  species TU_270__c in c = 0; TU_270__c is "MG_371";
  species TU_271__c in c = 0; TU_271__c is "MG_372 - MG_375";
  species TU_272__c in c = 0; TU_272__c is "MG_376";
  species TU_273__c in c = 0; TU_273__c is "MG_377";
  species TU_274__c in c = 0; TU_274__c is "MG_378";
  species TU_275__c in c = 0; TU_275__c is "MG_379 - MG_381";
  species MG523__c in c = 6/c;
  species TU_277__c in c = 0; TU_277__c is "MG_382";
  species TU_278__c in c = 0; TU_278__c is "MG_383";
  species TU_279__c in c = 0; TU_279__c is "MG_384";
  species TU_280__c in c = 0; TU_280__c is "MG_385, MG_524";
  species TU_281__c in c = 0; TU_281__c is "MG_386";
  species TU_282__c in c = 0; TU_282__c is "MG_387 - MG_388";
  species TU_283__c in c = 0; TU_283__c is "MG_389";
  species TU_284__c in c = 0; TU_284__c is "MG_390";
  species TU_285__c in c = 2/c; TU_285__c is "MG_391 - MG_393";
  species TU_286__c in c = 0; TU_286__c is "MG_394";
  species TU_287__c in c = 0; TU_287__c is "MG_395";
  species TU_288__c in c = 0; TU_288__c is "MG_396 - MG_397";
  species TU_289__c in c = 0; TU_289__c is "MG_398";
  species TU_290__c in c = 0; TU_290__c is "MG_399";
  species TU_291__c in c = 0; TU_291__c is "MG_400 - MG_401";
  species TU_292__c in c = 0; TU_292__c is "MG_402 - MG_405";
  species TU_293__c in c = 0; TU_293__c is "MG_406";
  species TU_294__c in c = 1/c; TU_294__c is "MG_407";
  species TU_295__c in c = 0; TU_295__c is "MG_408";
  species TU_296__c in c = 0; TU_296__c is "MG_409 - MG_412";
  species TU_297__c in c = 0; TU_297__c is "MG_414";
  species TU_298__c in c = 0; TU_298__c is "MG_525";
  species TU_299__c in c = 1/c; TU_299__c is "MG_417";
  species TU_300__c in c = 0; TU_300__c is "MG_418";
  species TU_301__c in c = 0; TU_301__c is "MG_419, MG_421, MG_422, MG_423";
  species TU_302__c in c = 0; TU_302__c is "MG_424";
  species TU_303__c in c = 0; TU_303__c is "MG_425";
  species TU_304__c in c = 0; TU_304__c is "MG_426";
  species TU_305__c in c = 1/c; TU_305__c is "MG_427";
  species TU_306__c in c = 0; TU_306__c is "MG_428";
  species TU_307__c in c = 0; TU_307__c is "MG_429 - MG_431";
  species TU_308__c in c = 0; TU_308__c is "MG_432";
  species TU_309__c in c = 0; TU_309__c is "MG_433";
  species TU_310__c in c = 0; TU_310__c is "MG_434";
  species TU_311__c in c = 0; TU_311__c is "MG_435";
  species TU_312__c in c = 0; TU_312__c is "MG_437";
  species TU_313__c in c = 0; TU_313__c is "MG_438";
  species TU_314__c in c = 0; TU_314__c is "MG_439";
  species TU_315__c in c = 0; TU_315__c is "MG_440 - MG_441";
  species TU_316__c in c = 0; TU_316__c is "MG_442 - MG_443";
  species TU_317__c in c = 0; TU_317__c is "MG_444 - MG_446";
  species TU_318__c in c = 0; TU_318__c is "MG_447";
  species TU_319__c in c = 0; TU_319__c is "MG_448";
  species TU_320__c in c = 0; TU_320__c is "MG_449";
  species TU_321__c in c = 0; TU_321__c is "MG_450 - MG_451";
  species TU_322__c in c = 2/c; TU_322__c is "MG_452 - MG_453";
  species TU_323__c in c = 0; TU_323__c is "MG_454";
  species TU_324__c in c = 1/c; TU_324__c is "MG_455";
  species TU_325__c in c = 0; TU_325__c is "MG_456";
  species TU_326__c in c = 0; TU_326__c is "MG_457";
  species TU_327__c in c = 0; TU_327__c is "MG_458";
  species TU_328__c in c = 0; TU_328__c is "MG_459";
  species TU_329__c in c = 0; TU_329__c is "MG_460";
  species TU_330__c in c = 1/c; TU_330__c is "MG_461 - MG_462";
  species TU_331__c in c = 1/c; TU_331__c is "MG_463 - MG_465";
  species TU_332__c in c = 0; TU_332__c is "MG_466";
  species TU_333__c in c = 0; TU_333__c is "MG_467 - MG_468";
  species TU_334__c in c = 0; TU_334__c is "MG_526";
  species TU_335__c in c = 0; TU_335__c is "MG_469 - MG_470";
  species MG471_aa__c in c = 72/c; MG471_aa__c is "MG471-AA";
  species MG472_aa__c in c = 72/c; MG472_aa__c is "MG472-AA";
  species MG475_aa__c in c = 14/c; MG475_aa__c is "MG475-AA";
  species MG479_aa__c in c = 25/c; MG479_aa__c is "MG479-AA";
  species MG483_aa__c in c = 10/c; MG483_aa__c is "MG483-AA";
  species MG484_aa__c in c = 61/c; MG484_aa__c is "MG484-AA";
  species MG485_aa__c in c = 14/c; MG485_aa__c is "MG485-AA";
  species MG486_aa__c in c = 46/c; MG486_aa__c is "MG486-AA";
  species MG487_aa__c in c = 20/c; MG487_aa__c is "MG487-AA";
  species MG488_aa__c in c = 11/c; MG488_aa__c is "MG488-AA";
  species MG489_aa__c in c = 84/c; MG489_aa__c is "MG489-AA";
  species MG490_aa__c in c = 55/c; MG490_aa__c is "MG490-AA";
  species MG492_aa__c in c = 13/c; MG492_aa__c is "MG492-AA";
  species MG493_aa__c in c = 51/c; MG493_aa__c is "MG493-AA";
  species MG495_aa__c in c = 8/c; MG495_aa__c is "MG495-AA";
  species MG496_aa__c in c = 9/c; MG496_aa__c is "MG496-AA";
  species MG497_aa__c in c = 9/c; MG497_aa__c is "MG497-AA";
  species MG499_aa__c in c = 42/c; MG499_aa__c is "MG499-AA";
  species MG500_aa__c in c = 60/c; MG500_aa__c is "MG500-AA";
  species MG501_aa__c in c = 36/c; MG501_aa__c is "MG501-AA";
  species MG502_aa__c in c = 75/c; MG502_aa__c is "MG502-AA";
  species MG503_aa__c in c = 46/c; MG503_aa__c is "MG503-AA";
  species MG504_aa__c in c = 10/c; MG504_aa__c is "MG504-AA";
  species MG506_aa__c in c = 16/c; MG506_aa__c is "MG506-AA";
  species MG507_aa__c in c = 23/c; MG507_aa__c is "MG507-AA";
  species MG508_aa__c in c = 61/c; MG508_aa__c is "MG508-AA";
  species MG509_aa__c in c = 56/c; MG509_aa__c is "MG509-AA";
  species MG510_aa__c in c = 50/c; MG510_aa__c is "MG510-AA";
  species MG511_aa__c in c = 55/c; MG511_aa__c is "MG511-AA";
  species MG512_aa__c in c = 62/c; MG512_aa__c is "MG512-AA";
  species MG513_aa__c in c = 54/c; MG513_aa__c is "MG513-AA";
  species MG514_aa__c in c = 56/c; MG514_aa__c is "MG514-AA";
  species MG518_aa__c in c = 19/c; MG518_aa__c is "MG518-AA";
  species MG519_aa__c in c = 26/c; MG519_aa__c is "MG519-AA";
  species MG520_aa__c in c = 33/c; MG520_aa__c is "MG520-AA";
  species MG523_aa__c in c = 14/c; MG523_aa__c is "MG523-AA";
  species MG_104_MONOMER__c in c = 15/c; MG_104_MONOMER__c is "ribonuclease R";
  species MG_083_MONOMER__c in c = 15/c; MG_083_MONOMER__c is "peptidyl-tRNA hydrolase";

  // Parameters:
  Km_RNA_decay = 5;
  k_dcy_TU_001 = 0.004717;
  k_dcy_TU_002 = 0.004532;
  k_dcy_TU_003 = 0.003323;
  k_dcy_TU_004 = 0.002611;
  k_dcy_TU_005 = 0.002618;
  k_dcy_TU_006 = 0.00361;
  k_dcy_MG471 = 0.000257;
  k_dcy_MG472 = 0.000257;
  k_dcy_TU_008 = 0.002593;
  k_dcy_TU_009 = 0.002611;
  k_dcy_TU_010 = 0.004244;
  k_dcy_TU_011 = 0.002831;
  k_dcy_TU_012 = 0.002611;
  k_dcy_TU_013 = 0.003241;
  k_dcy_TU_014 = 0.00268;
  k_dcy_TU_015 = 0.002611;
  k_dcy_TU_016 = 0.00152;
  k_dcy_TU_017 = 0.002222;
  k_dcy_TU_018 = 0.006418;
  k_dcy_TU_019 = 0.00361;
  k_dcy_TU_020 = 0.002611;
  k_dcy_TU_021 = 0.001627;
  k_dcy_TU_022 = 0.002962;
  k_dcy_TU_023 = 0.002611;
  k_dcy_TU_024 = 0.002611;
  k_dcy_TU_025 = 0.002254;
  k_dcy_TU_026 = 0.002687;
  k_dcy_TU_027 = 0.004069;
  k_dcy_TU_028 = 0.004126;
  k_dcy_TU_029 = 0.000903;
  k_dcy_TU_030 = 0.002087;
  k_dcy_TU_031 = 0.003123;
  k_dcy_TU_032 = 0.002526;
  k_dcy_TU_033 = 0.002611;
  k_dcy_TU_034 = 0.0021;
  k_dcy_TU_035 = 0.002611;
  k_dcy_TU_036 = 0.002611;
  k_dcy_MG475 = 0.000257;
  k_dcy_TU_038 = 0.00218;
  k_dcy_TU_039 = 0.003301;
  k_dcy_TU_040 = 0.002611;
  k_dcy_TU_041 = 0.003301;
  k_dcy_TU_042 = 0.002611;
  k_dcy_TU_043 = 0.002139;
  k_dcy_TU_044 = 0.002626;
  k_dcy_TU_045 = 0.000631;
  k_dcy_TU_046 = 0.004443;
  k_dcy_TU_047 = 0.002611;
  k_dcy_TU_048 = 0.002611;
  k_dcy_TU_049 = 0.002611;
  k_dcy_TU_050 = 0.002611;
  k_dcy_TU_051 = 0.003403;
  k_dcy_TU_052 = 0.003576;
  k_dcy_TU_053 = 0.002888;
  k_dcy_TU_054 = 0.002611;
  k_dcy_TU_055 = 0.002201;
  k_dcy_TU_056 = 0.001834;
  k_dcy_TU_057 = 0.001863;
  k_dcy_TU_058 = 0.001863;
  k_dcy_TU_059 = 0.002658;
  k_dcy_TU_060 = 0.002611;
  k_dcy_TU_061 = 0.002222;
  k_dcy_TU_062 = 0.00104;
  k_dcy_TU_063 = 0.002728;
  k_dcy_TU_064 = 0.002611;
  k_dcy_TU_065 = 0.004126;
  k_dcy_TU_066 = 0.002611;
  k_dcy_TU_067 = 0.00304;
  k_dcy_TU_068 = 0.003297;
  k_dcy_TU_069 = 0.003712;
  k_dcy_TU_070 = 0.006796;
  k_dcy_TU_071 = 0.002222;
  k_dcy_TU_072 = 0.002139;
  k_dcy_TU_073 = 0.002596;
  k_dcy_TU_074 = 0.002356;
  k_dcy_TU_075 = 0.002611;
  k_dcy_TU_076 = 0.003368;
  k_dcy_TU_077 = 0.002611;
  k_dcy_TU_078 = 0.002611;
  k_dcy_TU_079 = 0.002611;
  k_dcy_TU_080 = 0.002611;
  k_dcy_TU_081 = 0.002684;
  k_dcy_TU_082 = 0.002611;
  k_dcy_TU_083 = 0.002611;
  k_dcy_TU_084 = 0.002611;
  k_dcy_TU_085 = 0.002611;
  k_dcy_TU_086 = 0.004225;
  k_dcy_TU_087 = 0.002611;
  k_dcy_MGrrnA16S = 1e-5;
  k_dcy_MGrrnA23S = 1e-5;
  k_dcy_MGrrnA5S = 1e-5;
  k_dcy_TU_089 = 0.002611;
  k_dcy_TU_090 = 0.003209;
  k_dcy_TU_091 = 0.002611;
  k_dcy_TU_092 = 0.003585;
  k_dcy_TU_093 = 0.002611;
  k_dcy_TU_094 = 0.002611;
  k_dcy_TU_095 = 0.002611;
  k_dcy_TU_096 = 0.002611;
  k_dcy_TU_097 = 0.002611;
  k_dcy_TU_098 = 0.002611;
  k_dcy_TU_099 = 0.002265;
  k_dcy_TU_100 = 0.002222;
  k_dcy_TU_101 = 0.001838;
  k_dcy_TU_102 = 0.002195;
  k_dcy_TU_103 = 0.003851;
  k_dcy_TU_104 = 0.002806;
  k_dcy_TU_105 = 0.002866;
  k_dcy_TU_106 = 0.001834;
  k_dcy_TU_107 = 0.001571;
  k_dcy_TU_108 = 0.001777;
  k_dcy_TU_109 = 0.00304;
  k_dcy_TU_110 = 0.002027;
  k_dcy_TU_111 = 0.00304;
  k_dcy_TU_112 = 0.002611;
  k_dcy_TU_113 = 0.002611;
  k_dcy_TU_114 = 0.002611;
  k_dcy_TU_115 = 0.002611;
  k_dcy_TU_116 = 0.002977;
  k_dcy_TU_117 = 0.002611;
  k_dcy_TU_118 = 0.002611;
  k_dcy_TU_119 = 0.003512;
  k_dcy_TU_120 = 0.001836;
  k_dcy_TU_121 = 0.002611;
  k_dcy_TU_122 = 0.00335;
  k_dcy_MG479 = 0.000257;
  k_dcy_TU_124 = 0.00318;
  k_dcy_TU_125 = 0.002611;
  k_dcy_TU_126 = 0.004279;
  k_dcy_TU_127 = 0.002611;
  k_dcy_TU_128 = 0.002596;
  k_dcy_TU_129 = 0.002611;
  k_dcy_TU_130 = 0.004279;
  k_dcy_TU_131 = 0.002683;
  k_dcy_TU_132 = 0.002611;
  k_dcy_TU_133 = 0.003181;
  k_dcy_MG483 = 0.000257;
  k_dcy_MG484 = 0.000257;
  k_dcy_MG485 = 0.000257;
  k_dcy_MG486 = 0.000257;
  k_dcy_MG487 = 0.000257;
  k_dcy_MG488 = 0.000257;
  k_dcy_MG489 = 0.000257;
  k_dcy_MG490 = 0.000257;
  k_dcy_TU_142 = 0.002611;
  k_dcy_TU_143 = 0.002611;
  k_dcy_TU_144 = 0.002611;
  k_dcy_TU_145 = 0.002611;
  k_dcy_MG492 = 0.000257;
  k_dcy_TU_147 = 0.003036;
  k_dcy_TU_148 = 0.002611;
  k_dcy_TU_149 = 0.00284;
  k_dcy_TU_150 = 0.004126;
  k_dcy_TU_151 = 0.005667;
  k_dcy_TU_152 = 0.003383;
  k_dcy_TU_153 = 0.002611;
  k_dcy_TU_154 = 0.005023;
  k_dcy_TU_155 = 0.003398;
  k_dcy_TU_156 = 0.004814;
  k_dcy_TU_157 = 0.002611;
  k_dcy_TU_158 = 0.002611;
  k_dcy_TU_159 = 0.002956;
  k_dcy_TU_160 = 0.002611;
  k_dcy_TU_161 = 0.002611;
  k_dcy_TU_162 = 0.001462;
  k_dcy_TU_163 = 0.003712;
  k_dcy_TU_164 = 0.004847;
  k_dcy_TU_165 = 0.002786;
  k_dcy_MG493 = 0.000257;
  k_dcy_TU_167 = 0.002611;
  k_dcy_MG495 = 0.000257;
  k_dcy_MG496 = 0.000257;
  k_dcy_TU_169 = 0.002611;
  k_dcy_TU_170 = 0.002534;
  k_dcy_TU_171 = 0.002611;
  k_dcy_MG497 = 0.000257;
  k_dcy_TU_173 = 0.002428;
  k_dcy_TU_174 = 0.002611;
  k_dcy_TU_175 = 0.00361;
  k_dcy_TU_176 = 0.003404;
  k_dcy_TU_177 = 0.002611;
  k_dcy_MG_0001 = 1e-5;
  k_dcy_TU_179 = 0.002611;
  k_dcy_TU_180 = 0.001728;
  k_dcy_MG_0002 = 0.00013;
  k_dcy_TU_182 = 0.002112;
  k_dcy_TU_183 = 0.003398;
  k_dcy_TU_184 = 0.002611;
  k_dcy_TU_185 = 0.0011;
  k_dcy_TU_186 = 0.002611;
  k_dcy_MG499 = 0.000257;
  k_dcy_MG500 = 0.000257;
  k_dcy_MG501 = 0.000257;
  k_dcy_MG502 = 0.000257;
  k_dcy_MG503 = 0.000257;
  k_dcy_TU_190 = 0.002626;
  k_dcy_TU_191 = 0.004126;
  k_dcy_TU_192 = 0.002611;
  k_dcy_TU_193 = 0.00165;
  k_dcy_MG504 = 0.000257;
  k_dcy_TU_195 = 0.002684;
  k_dcy_TU_196 = 0.001939;
  k_dcy_TU_197 = 0.002611;
  k_dcy_TU_198 = 0.003279;
  k_dcy_TU_199 = 0.002265;
  k_dcy_TU_200 = 0.002611;
  k_dcy_TU_201 = 0.003398;
  k_dcy_TU_202 = 0.002611;
  k_dcy_TU_203 = 0.003984;
  k_dcy_TU_204 = 0.003173;
  k_dcy_TU_205 = 0.005776;
  k_dcy_TU_206 = 0.0011;
  k_dcy_TU_207 = 0.012836;
  k_dcy_TU_208 = 0.004814;
  k_dcy_TU_209 = 0.002611;
  k_dcy_TU_210 = 0.002611;
  k_dcy_TU_211 = 0.003445;
  k_dcy_TU_212 = 0.002611;
  k_dcy_TU_213 = 0.002611;
  k_dcy_TU_214 = 0.002611;
  k_dcy_TU_215 = 0.003281;
  k_dcy_TU_216 = 0.002611;
  k_dcy_TU_217 = 0.002611;
  k_dcy_TU_218 = 0.002611;
  k_dcy_TU_219 = 0.002611;
  k_dcy_MG506 = 0.000257;
  k_dcy_MG507 = 0.000257;
  k_dcy_TU_222 = 0.002611;
  k_dcy_MG508 = 0.000257;
  k_dcy_MG509 = 0.000257;
  k_dcy_MG510 = 0.000257;
  k_dcy_MG511 = 0.000257;
  k_dcy_MG512 = 0.000257;
  k_dcy_MG513 = 0.000257;
  k_dcy_MG514 = 0.000257;
  k_dcy_TU_224 = 0.014441;
  k_dcy_TU_225 = 0.003984;
  k_dcy_MG_0003 = 1e-5;
  k_dcy_MG_0004 = 0.00013;
  k_dcy_TU_228 = 0.002841;
  k_dcy_TU_229 = 0.002611;
  k_dcy_TU_230 = 0.002611;
  k_dcy_TU_231 = 0.002611;
  k_dcy_TU_232 = 0.002611;
  k_dcy_TU_233 = 0.002745;
  k_dcy_TU_234 = 0.005251;
  k_dcy_TU_235 = 0.00361;
  k_dcy_TU_236 = 0.002611;
  k_dcy_TU_237 = 0.002611;
  k_dcy_TU_238 = 0.002222;
  k_dcy_TU_239 = 0.002611;
  k_dcy_TU_240 = 0.002611;
  k_dcy_TU_241 = 0.002751;
  k_dcy_TU_242 = 0.003184;
  k_dcy_TU_243 = 0.004443;
  k_dcy_TU_244 = 0.002611;
  k_dcy_TU_245 = 0.002611;
  k_dcy_TU_246 = 0.005776;
  k_dcy_TU_247 = 0.00257;
  k_dcy_MG518 = 0.000257;
  k_dcy_TU_249 = 0.002611;
  k_dcy_MG519 = 0.000257;
  k_dcy_TU_251 = 0.002611;
  k_dcy_MG520 = 0.000257;
  k_dcy_TU_253 = 0.002611;
  k_dcy_TU_254 = 0.003851;
  k_dcy_TU_255 = 0.002611;
  k_dcy_TU_256 = 0.002611;
  k_dcy_TU_257 = 0.002611;
  k_dcy_TU_258 = 0.003501;
  k_dcy_TU_259 = 0.002611;
  k_dcy_TU_260 = 0.003209;
  k_dcy_TU_261 = 0.002325;
  k_dcy_TU_262 = 0.002063;
  k_dcy_TU_263 = 0.002558;
  k_dcy_TU_264 = 0.004814;
  k_dcy_TU_265 = 0.002611;
  k_dcy_TU_266 = 0.00361;
  k_dcy_TU_267 = 0.002611;
  k_dcy_TU_268 = 0.003035;
  k_dcy_TU_269 = 0.002611;
  k_dcy_TU_270 = 0.002611;
  k_dcy_TU_271 = 0.002456;
  k_dcy_TU_272 = 0.002611;
  k_dcy_TU_273 = 0.002611;
  k_dcy_TU_274 = 0.003501;
  k_dcy_TU_275 = 0.003266;
  k_dcy_MG523 = 0.000257;
  k_dcy_TU_277 = 0.002962;
  k_dcy_TU_278 = 0.0021;
  k_dcy_TU_279 = 0.002962;
  k_dcy_TU_280 = 0.002611;
  k_dcy_TU_281 = 0.002611;
  k_dcy_TU_282 = 0.003297;
  k_dcy_TU_283 = 0.002611;
  k_dcy_TU_284 = 0.002611;
  k_dcy_TU_285 = 0.003113;
  k_dcy_TU_286 = 0.004443;
  k_dcy_TU_287 = 0.002611;
  k_dcy_TU_288 = 0.001872;
  k_dcy_TU_289 = 0.006796;
  k_dcy_TU_290 = 0.002027;
  k_dcy_TU_291 = 0.001451;
  k_dcy_TU_292 = 0.002421;
  k_dcy_TU_293 = 0.002611;
  k_dcy_TU_294 = 0.002458;
  k_dcy_TU_295 = 0.003122;
  k_dcy_TU_296 = 0.002356;
  k_dcy_TU_297 = 0.002611;
  k_dcy_TU_298 = 0.002611;
  k_dcy_TU_299 = 0.002818;
  k_dcy_TU_300 = 0.002567;
  k_dcy_TU_301 = 0.003664;
  k_dcy_TU_302 = 0.002358;
  k_dcy_TU_303 = 0.004279;
  k_dcy_TU_304 = 0.003398;
  k_dcy_TU_305 = 0.00154;
  k_dcy_TU_306 = 0.002611;
  k_dcy_TU_307 = 0.003162;
  k_dcy_TU_308 = 0.002611;
  k_dcy_TU_309 = 0.003727;
  k_dcy_TU_310 = 0.002962;
  k_dcy_TU_311 = 0.004279;
  k_dcy_TU_312 = 0.002687;
  k_dcy_TU_313 = 0.002611;
  k_dcy_TU_314 = 0.002611;
  k_dcy_TU_315 = 0.002611;
  k_dcy_TU_316 = 0.002611;
  k_dcy_TU_317 = 0.001897;
  k_dcy_TU_318 = 0.002611;
  k_dcy_TU_319 = 0.001863;
  k_dcy_TU_320 = 0.002684;
  k_dcy_TU_321 = 0.002131;
  k_dcy_TU_322 = 0.002484;
  k_dcy_TU_323 = 0.00154;
  k_dcy_TU_324 = 0.005776;
  k_dcy_TU_325 = 0.002611;
  k_dcy_TU_326 = 0.005251;
  k_dcy_TU_327 = 0.001834;
  k_dcy_TU_328 = 0.002611;
  k_dcy_TU_329 = 0.0011;
  k_dcy_TU_330 = 0.003368;
  k_dcy_TU_331 = 0.003788;
  k_dcy_TU_332 = 0.002567;
  k_dcy_TU_333 = 0.002611;
  k_dcy_TU_334 = 0.002611;
  k_dcy_TU_335 = 0.004345;
  k_dcy_MG471_aa = 0.000257;
  k_dcy_MG472_aa = 0.000257;
  k_dcy_MG475_aa = 0.000257;
  k_dcy_MG479_aa = 0.000257;
  k_dcy_MG483_aa = 0.000257;
  k_dcy_MG484_aa = 0.000257;
  k_dcy_MG485_aa = 0.000257;
  k_dcy_MG486_aa = 0.000257;
  k_dcy_MG487_aa = 0.000257;
  k_dcy_MG488_aa = 0.000257;
  k_dcy_MG489_aa = 0.000257;
  k_dcy_MG490_aa = 0.000257;
  k_dcy_MG492_aa = 0.000257;
  k_dcy_MG493_aa = 0.000257;
  k_dcy_MG495_aa = 0.000257;
  k_dcy_MG496_aa = 0.000257;
  k_dcy_MG497_aa = 0.000257;
  k_dcy_MG499_aa = 0.000257;
  k_dcy_MG500_aa = 0.000257;
  k_dcy_MG501_aa = 0.000257;
  k_dcy_MG502_aa = 0.000257;
  k_dcy_MG503_aa = 0.000257;
  k_dcy_MG504_aa = 0.000257;
  k_dcy_MG506_aa = 0.000257;
  k_dcy_MG507_aa = 0.000257;
  k_dcy_MG508_aa = 0.000257;
  k_dcy_MG509_aa = 0.000257;
  k_dcy_MG510_aa = 0.000257;
  k_dcy_MG511_aa = 0.000257;
  k_dcy_MG512_aa = 0.000257;
  k_dcy_MG513_aa = 0.000257;
  k_dcy_MG514_aa = 0.000257;
  k_dcy_MG518_aa = 0.000257;
  k_dcy_MG519_aa = 0.000257;
  k_dcy_MG520_aa = 0.000257;
  k_dcy_MG523_aa = 0.000257;

  // Reactions:
  RNA_decay_TU_001: TU_001__c + 2074 H2O__c -> 707 AMP__c + 283 CMP__c + 238 GMP__c + 847 UMP__c + 2074 H__c; k_dcy_TU_001*TU_001__c; RNA_decay_TU_001 is "RNA decay (MG_001 - MG_002)";
  RNA_decay_TU_002: TU_002__c + 4477 H2O__c -> 1401 AMP__c + 870 CMP__c + 649 GMP__c + 1558 UMP__c + 4477 H__c; k_dcy_TU_002*TU_002__c; RNA_decay_TU_002 is "RNA decay (MG_003 - MG_004)";
  RNA_decay_TU_003: TU_003__c + 4745 H2O__c -> 1564 AMP__c + 719 CMP__c + 598 GMP__c + 1865 UMP__c + 4745 H__c; k_dcy_TU_003*TU_003__c; RNA_decay_TU_003 is "RNA decay (MG_005 - MG_009)";
  RNA_decay_TU_004: TU_004__c + 656 H2O__c -> 231 AMP__c + 103 CMP__c + 71 GMP__c + 252 UMP__c + 656 H__c; k_dcy_TU_004*TU_004__c; RNA_decay_TU_004 is "RNA decay (MG_010)";
  RNA_decay_TU_005: TU_005__c + 1731 H2O__c -> 589 AMP__c + 253 CMP__c + 204 GMP__c + 686 UMP__c + 1731 H__c; k_dcy_TU_005*TU_005__c; RNA_decay_TU_005 is "RNA decay (MG_011 - MG_012)";
  RNA_decay_TU_006: TU_006__c + 821 H2O__c -> 269 AMP__c + 127 CMP__c + 101 GMP__c + 325 UMP__c + 821 H__c; k_dcy_TU_006*TU_006__c; RNA_decay_TU_006 is "RNA decay (MG_013)";
  RNA_decay_MG471: MG471__c + 75 H2O__c -> 19 AMP__c + 21 CMP__c + 18 GMP__c + 18 UMP__c + 75 H__c; k_dcy_MG471*MG471__c; RNA_decay_MG471 is "RNA decay (MG471)";
  RNA_decay_MG472: MG472__c + 76 H2O__c -> 20 AMP__c + 20 CMP__c + 17 GMP__c + 20 UMP__c + 76 H__c; k_dcy_MG472*MG472__c; RNA_decay_MG472 is "RNA decay (MG472)";
  RNA_decay_TU_008: TU_008__c + 3687 H2O__c -> 1344 AMP__c + 593 CMP__c + 487 GMP__c + 1264 UMP__c + 3687 H__c; k_dcy_TU_008*TU_008__c; RNA_decay_TU_008 is "RNA decay (MG_014 - MG_015)";
  RNA_decay_TU_009: TU_009__c + 3095 H2O__c -> 1051 AMP__c + 472 CMP__c + 373 GMP__c + 1200 UMP__c + 3095 H__c; k_dcy_TU_009*TU_009__c; RNA_decay_TU_009 is "RNA decay (MG_018)";
  RNA_decay_TU_010: TU_010__c + 3617 H2O__c -> 1219 AMP__c + 612 CMP__c + 483 GMP__c + 1304 UMP__c + 3617 H__c; k_dcy_TU_010*TU_010__c; RNA_decay_TU_010 is "RNA decay (MG_019 - MG_021)";
  RNA_decay_TU_011: TU_011__c + 2413 H2O__c -> 790 AMP__c + 436 CMP__c + 301 GMP__c + 887 UMP__c + 2413 H__c; k_dcy_TU_011*TU_011__c; RNA_decay_TU_011 is "RNA decay (MG_022 - MG_024)";
  RNA_decay_TU_012: TU_012__c + 896 H2O__c -> 313 AMP__c + 132 CMP__c + 129 GMP__c + 323 UMP__c + 896 H__c; k_dcy_TU_012*TU_012__c; RNA_decay_TU_012 is "RNA decay (MG_025)";
  RNA_decay_TU_013: TU_013__c + 1601 H2O__c -> 537 AMP__c + 263 CMP__c + 210 GMP__c + 592 UMP__c + 1601 H__c; k_dcy_TU_013*TU_013__c; RNA_decay_TU_013 is "RNA decay (MG_026 - MG_028)";
  RNA_decay_TU_014: TU_014__c + 5571 H2O__c -> 1778 AMP__c + 901 CMP__c + 806 GMP__c + 2087 UMP__c + 5571 H__c; k_dcy_TU_014*TU_014__c; RNA_decay_TU_014 is "RNA decay (MG_029 - MG_031)";
  RNA_decay_TU_015: TU_015__c + 2000 H2O__c -> 644 AMP__c + 338 CMP__c + 294 GMP__c + 725 UMP__c + 2000 H__c; k_dcy_TU_015*TU_015__c; RNA_decay_TU_015 is "RNA decay (MG_032)";
  RNA_decay_TU_016: TU_016__c + 776 H2O__c -> 285 AMP__c + 140 CMP__c + 128 GMP__c + 224 UMP__c + 776 H__c; k_dcy_TU_016*TU_016__c; RNA_decay_TU_016 is "RNA decay (MG_033)";
  RNA_decay_TU_017: TU_017__c + 641 H2O__c -> 194 AMP__c + 106 CMP__c + 104 GMP__c + 238 UMP__c + 641 H__c; k_dcy_TU_017*TU_017__c; RNA_decay_TU_017 is "RNA decay (MG_034)";
  RNA_decay_TU_018: TU_018__c + 1244 H2O__c -> 418 AMP__c + 209 CMP__c + 156 GMP__c + 462 UMP__c + 1244 H__c; k_dcy_TU_018*TU_018__c; RNA_decay_TU_018 is "RNA decay (MG_035)";
  RNA_decay_TU_019: TU_019__c + 1652 H2O__c -> 529 AMP__c + 269 CMP__c + 230 GMP__c + 625 UMP__c + 1652 H__c; k_dcy_TU_019*TU_019__c; RNA_decay_TU_019 is "RNA decay (MG_036)";
  RNA_decay_TU_020: TU_020__c + 1352 H2O__c -> 457 AMP__c + 232 CMP__c + 178 GMP__c + 486 UMP__c + 1352 H__c; k_dcy_TU_020*TU_020__c; RNA_decay_TU_020 is "RNA decay (MG_037)";
  RNA_decay_TU_021: TU_021__c + 1526 H2O__c -> 455 AMP__c + 278 CMP__c + 237 GMP__c + 557 UMP__c + 1526 H__c; k_dcy_TU_021*TU_021__c; RNA_decay_TU_021 is "RNA decay (MG_038)";
  RNA_decay_TU_022: TU_022__c + 1154 H2O__c -> 356 AMP__c + 186 CMP__c + 170 GMP__c + 443 UMP__c + 1154 H__c; k_dcy_TU_022*TU_022__c; RNA_decay_TU_022 is "RNA decay (MG_039)";
  RNA_decay_TU_023: TU_023__c + 1775 H2O__c -> 571 AMP__c + 322 CMP__c + 256 GMP__c + 627 UMP__c + 1775 H__c; k_dcy_TU_023*TU_023__c; RNA_decay_TU_023 is "RNA decay (MG_040)";
  RNA_decay_TU_024: TU_024__c + 266 H2O__c -> 79 AMP__c + 50 CMP__c + 39 GMP__c + 99 UMP__c + 266 H__c; k_dcy_TU_024*TU_024__c; RNA_decay_TU_024 is "RNA decay (MG_041)";
  RNA_decay_TU_025: TU_025__c + 3379 H2O__c -> 1178 AMP__c + 537 CMP__c + 470 GMP__c + 1195 UMP__c + 3379 H__c; k_dcy_TU_025*TU_025__c; RNA_decay_TU_025 is "RNA decay (MG_042 - MG_044)";
  RNA_decay_TU_026: TU_026__c + 1448 H2O__c -> 461 AMP__c + 252 CMP__c + 200 GMP__c + 536 UMP__c + 1448 H__c; k_dcy_TU_026*TU_026__c; RNA_decay_TU_026 is "RNA decay (MG_045)";
  RNA_decay_TU_027: TU_027__c + 2082 H2O__c -> 703 AMP__c + 375 CMP__c + 298 GMP__c + 707 UMP__c + 2082 H__c; k_dcy_TU_027*TU_027__c; RNA_decay_TU_027 is "RNA decay (MG_046 - MG_047)";
  RNA_decay_TU_028: TU_028__c + 1340 H2O__c -> 362 AMP__c + 244 CMP__c + 201 GMP__c + 534 UMP__c + 1340 H__c; k_dcy_TU_028*TU_028__c; RNA_decay_TU_028 is "RNA decay (MG_048)";
  RNA_decay_TU_029: TU_029__c + 2643 H2O__c -> 845 AMP__c + 499 CMP__c + 339 GMP__c + 961 UMP__c + 2643 H__c; k_dcy_TU_029*TU_029__c; RNA_decay_TU_029 is "RNA decay (MG_049 - MG_051)";
  RNA_decay_TU_030: TU_030__c + 2044 H2O__c -> 688 AMP__c + 357 CMP__c + 281 GMP__c + 719 UMP__c + 2044 H__c; k_dcy_TU_030*TU_030__c; RNA_decay_TU_030 is "RNA decay (MG_052 - MG_053)";
  RNA_decay_TU_031: TU_031__c + 1478 H2O__c -> 443 AMP__c + 254 CMP__c + 197 GMP__c + 585 UMP__c + 1478 H__c; k_dcy_TU_031*TU_031__c; RNA_decay_TU_031 is "RNA decay (MG_054, MG_055, MG_473)";
  RNA_decay_TU_032: TU_032__c + 1721 H2O__c -> 585 AMP__c + 259 CMP__c + 211 GMP__c + 667 UMP__c + 1721 H__c; k_dcy_TU_032*TU_032__c; RNA_decay_TU_032 is "RNA decay (MG_056, MG_057, MG_474)";
  RNA_decay_TU_033: TU_033__c + 998 H2O__c -> 319 AMP__c + 183 CMP__c + 141 GMP__c + 356 UMP__c + 998 H__c; k_dcy_TU_033*TU_033__c; RNA_decay_TU_033 is "RNA decay (MG_058)";
  RNA_decay_TU_034: TU_034__c + 437 H2O__c -> 138 AMP__c + 67 CMP__c + 56 GMP__c + 177 UMP__c + 437 H__c; k_dcy_TU_034*TU_034__c; RNA_decay_TU_034 is "RNA decay (MG_059)";
  RNA_decay_TU_035: TU_035__c + 893 H2O__c -> 317 AMP__c + 143 CMP__c + 101 GMP__c + 333 UMP__c + 893 H__c; k_dcy_TU_035*TU_035__c; RNA_decay_TU_035 is "RNA decay (MG_060)";
  RNA_decay_TU_036: TU_036__c + 1703 H2O__c -> 617 AMP__c + 312 CMP__c + 256 GMP__c + 519 UMP__c + 1703 H__c; k_dcy_TU_036*TU_036__c; RNA_decay_TU_036 is "RNA decay (MG_061)";
  RNA_decay_MG475: MG475__c + 88 H2O__c -> 21 AMP__c + 27 CMP__c + 23 GMP__c + 18 UMP__c + 88 H__c; k_dcy_MG475*MG475__c; RNA_decay_MG475 is "RNA decay (MG475)";
  RNA_decay_TU_038: TU_038__c + 2042 H2O__c -> 717 AMP__c + 370 CMP__c + 305 GMP__c + 651 UMP__c + 2042 H__c; k_dcy_TU_038*TU_038__c; RNA_decay_TU_038 is "RNA decay (MG_062)";
  RNA_decay_TU_039: TU_039__c + 911 H2O__c -> 314 AMP__c + 142 CMP__c + 117 GMP__c + 339 UMP__c + 911 H__c; k_dcy_TU_039*TU_039__c; RNA_decay_TU_039 is "RNA decay (MG_063)";
  RNA_decay_TU_040: TU_040__c + 5395 H2O__c -> 1819 AMP__c + 826 CMP__c + 787 GMP__c + 1964 UMP__c + 5395 H__c; k_dcy_TU_040*TU_040__c; RNA_decay_TU_040 is "RNA decay (MG_064 - MG_065)";
  RNA_decay_TU_041: TU_041__c + 1946 H2O__c -> 631 AMP__c + 347 CMP__c + 293 GMP__c + 676 UMP__c + 1946 H__c; k_dcy_TU_041*TU_041__c; RNA_decay_TU_041 is "RNA decay (MG_066)";
  RNA_decay_TU_042: TU_042__c + 2998 H2O__c -> 994 AMP__c + 447 CMP__c + 466 GMP__c + 1092 UMP__c + 2998 H__c; k_dcy_TU_042*TU_042__c; RNA_decay_TU_042 is "RNA decay (MG_067 - MG_068)";
  RNA_decay_TU_043: TU_043__c + 2726 H2O__c -> 908 AMP__c + 534 CMP__c + 443 GMP__c + 842 UMP__c + 2726 H__c; k_dcy_TU_043*TU_043__c; RNA_decay_TU_043 is "RNA decay (MG_069)";
  RNA_decay_TU_044: TU_044__c + 854 H2O__c -> 238 AMP__c + 137 CMP__c + 155 GMP__c + 325 UMP__c + 854 H__c; k_dcy_TU_044*TU_044__c; RNA_decay_TU_044 is "RNA decay (MG_070)";
  RNA_decay_TU_045: TU_045__c + 2624 H2O__c -> 920 AMP__c + 509 CMP__c + 376 GMP__c + 820 UMP__c + 2624 H__c; k_dcy_TU_045*TU_045__c; RNA_decay_TU_045 is "RNA decay (MG_071)";
  RNA_decay_TU_046: TU_046__c + 2420 H2O__c -> 721 AMP__c + 494 CMP__c + 372 GMP__c + 834 UMP__c + 2420 H__c; k_dcy_TU_046*TU_046__c; RNA_decay_TU_046 is "RNA decay (MG_072)";
  RNA_decay_TU_047: TU_047__c + 1970 H2O__c -> 594 AMP__c + 348 CMP__c + 323 GMP__c + 706 UMP__c + 1970 H__c; k_dcy_TU_047*TU_047__c; RNA_decay_TU_047 is "RNA decay (MG_073)";
  RNA_decay_TU_048: TU_048__c + 413 H2O__c -> 166 AMP__c + 62 CMP__c + 56 GMP__c + 130 UMP__c + 413 H__c; k_dcy_TU_048*TU_048__c; RNA_decay_TU_048 is "RNA decay (MG_074)";
  RNA_decay_TU_049: TU_049__c + 3074 H2O__c -> 1029 AMP__c + 448 CMP__c + 501 GMP__c + 1097 UMP__c + 3074 H__c; k_dcy_TU_049*TU_049__c; RNA_decay_TU_049 is "RNA decay (MG_075)";
  RNA_decay_TU_050: TU_050__c + 416 H2O__c -> 164 AMP__c + 75 CMP__c + 47 GMP__c + 131 UMP__c + 416 H__c; k_dcy_TU_050*TU_050__c; RNA_decay_TU_050 is "RNA decay (MG_076)";
  RNA_decay_TU_051: TU_051__c + 6102 H2O__c -> 1973 AMP__c + 1045 CMP__c + 997 GMP__c + 2088 UMP__c + 6102 H__c; k_dcy_TU_051*TU_051__c; RNA_decay_TU_051 is "RNA decay (MG_077 - MG_080)";
  RNA_decay_TU_052: TU_052__c + 1093 H2O__c -> 308 AMP__c + 201 CMP__c + 173 GMP__c + 412 UMP__c + 1093 H__c; k_dcy_TU_052*TU_052__c; RNA_decay_TU_052 is "RNA decay (MG_081 - MG_082)";
  RNA_decay_TU_053: TU_053__c + 569 H2O__c -> 175 AMP__c + 112 CMP__c + 79 GMP__c + 204 UMP__c + 569 H__c; k_dcy_TU_053*TU_053__c; RNA_decay_TU_053 is "RNA decay (MG_083)";
  RNA_decay_TU_054: TU_054__c + 1808 H2O__c -> 566 AMP__c + 327 CMP__c + 269 GMP__c + 647 UMP__c + 1808 H__c; k_dcy_TU_054*TU_054__c; RNA_decay_TU_054 is "RNA decay (MG_084 - MG_085)";
  RNA_decay_TU_055: TU_055__c + 4156 H2O__c -> 1327 AMP__c + 815 CMP__c + 650 GMP__c + 1365 UMP__c + 4156 H__c; k_dcy_TU_055*TU_055__c; RNA_decay_TU_055 is "RNA decay (MG_086 - MG_089)";
  RNA_decay_TU_056: TU_056__c + 626 H2O__c -> 169 AMP__c + 103 CMP__c + 113 GMP__c + 242 UMP__c + 626 H__c; k_dcy_TU_056*TU_056__c; RNA_decay_TU_056 is "RNA decay (MG_090)";
  RNA_decay_TU_057: TU_057__c + 482 H2O__c -> 149 AMP__c + 84 CMP__c + 84 GMP__c + 166 UMP__c + 482 H__c; k_dcy_TU_057*TU_057__c; RNA_decay_TU_057 is "RNA decay (MG_091)";
  RNA_decay_TU_058: TU_058__c + 317 H2O__c -> 80 AMP__c + 54 CMP__c + 57 GMP__c + 127 UMP__c + 317 H__c; k_dcy_TU_058*TU_058__c; RNA_decay_TU_058 is "RNA decay (MG_092)";
  RNA_decay_TU_059: TU_059__c + 3042 H2O__c -> 939 AMP__c + 502 CMP__c + 497 GMP__c + 1105 UMP__c + 3042 H__c; k_dcy_TU_059*TU_059__c; RNA_decay_TU_059 is "RNA decay (MG_093 - MG_095)";
  RNA_decay_TU_060: TU_060__c + 1952 H2O__c -> 620 AMP__c + 336 CMP__c + 305 GMP__c + 692 UMP__c + 1952 H__c; k_dcy_TU_060*TU_060__c; RNA_decay_TU_060 is "RNA decay (MG_096)";
  RNA_decay_TU_061: TU_061__c + 737 H2O__c -> 242 AMP__c + 118 CMP__c + 120 GMP__c + 258 UMP__c + 737 H__c; k_dcy_TU_061*TU_061__c; RNA_decay_TU_061 is "RNA decay (MG_097)";
  RNA_decay_TU_062: TU_062__c + 4295 H2O__c -> 1457 AMP__c + 695 CMP__c + 669 GMP__c + 1475 UMP__c + 4295 H__c; k_dcy_TU_062*TU_062__c; RNA_decay_TU_062 is "RNA decay (MG_098 - MG_100)";
  RNA_decay_TU_063: TU_063__c + 2440 H2O__c -> 810 AMP__c + 422 CMP__c + 346 GMP__c + 863 UMP__c + 2440 H__c; k_dcy_TU_063*TU_063__c; RNA_decay_TU_063 is "RNA decay (MG_101 - MG_103)";
  RNA_decay_TU_064: TU_064__c + 233 H2O__c -> 95 AMP__c + 43 CMP__c + 33 GMP__c + 63 UMP__c + 233 H__c; k_dcy_TU_064*TU_064__c; RNA_decay_TU_064 is "RNA decay (MG_476)";
  RNA_decay_TU_065: TU_065__c + 2177 H2O__c -> 682 AMP__c + 374 CMP__c + 350 GMP__c + 772 UMP__c + 2177 H__c; k_dcy_TU_065*TU_065__c; RNA_decay_TU_065 is "RNA decay (MG_104)";
  RNA_decay_TU_066: TU_066__c + 602 H2O__c -> 237 AMP__c + 98 CMP__c + 89 GMP__c + 179 UMP__c + 602 H__c; k_dcy_TU_066*TU_066__c; RNA_decay_TU_066 is "RNA decay (MG_105)";
  RNA_decay_TU_067: TU_067__c + 581 H2O__c -> 178 AMP__c + 107 CMP__c + 79 GMP__c + 218 UMP__c + 581 H__c; k_dcy_TU_067*TU_067__c; RNA_decay_TU_067 is "RNA decay (MG_106)";
  RNA_decay_TU_068: TU_068__c + 3322 H2O__c -> 1099 AMP__c + 561 CMP__c + 457 GMP__c + 1206 UMP__c + 3322 H__c; k_dcy_TU_068*TU_068__c; RNA_decay_TU_068 is "RNA decay (MG_107 - MG_110)";
  RNA_decay_TU_069: TU_069__c + 1920 H2O__c -> 656 AMP__c + 310 CMP__c + 288 GMP__c + 667 UMP__c + 1920 H__c; k_dcy_TU_069*TU_069__c; RNA_decay_TU_069 is "RNA decay (MG_111 - MG_112)";
  RNA_decay_TU_070: TU_070__c + 1370 H2O__c -> 423 AMP__c + 248 CMP__c + 204 GMP__c + 496 UMP__c + 1370 H__c; k_dcy_TU_070*TU_070__c; RNA_decay_TU_070 is "RNA decay (MG_113)";
  RNA_decay_TU_071: TU_071__c + 710 H2O__c -> 279 AMP__c + 129 CMP__c + 96 GMP__c + 207 UMP__c + 710 H__c; k_dcy_TU_071*TU_071__c; RNA_decay_TU_071 is "RNA decay (MG_114)";
  RNA_decay_TU_072: TU_072__c + 473 H2O__c -> 160 AMP__c + 94 CMP__c + 69 GMP__c + 151 UMP__c + 473 H__c; k_dcy_TU_072*TU_072__c; RNA_decay_TU_072 is "RNA decay (MG_115)";
  RNA_decay_TU_073: TU_073__c + 2395 H2O__c -> 808 AMP__c + 379 CMP__c + 347 GMP__c + 862 UMP__c + 2395 H__c; k_dcy_TU_073*TU_073__c; RNA_decay_TU_073 is "RNA decay (MG_116 - MG_118)";
  RNA_decay_TU_074: TU_074__c + 6355 H2O__c -> 2102 AMP__c + 1183 CMP__c + 918 GMP__c + 2153 UMP__c + 6355 H__c; k_dcy_TU_074*TU_074__c; RNA_decay_TU_074 is "RNA decay (MG_119 - MG_122)";
  RNA_decay_TU_075: TU_075__c + 1415 H2O__c -> 455 AMP__c + 211 CMP__c + 197 GMP__c + 553 UMP__c + 1415 H__c; k_dcy_TU_075*TU_075__c; RNA_decay_TU_075 is "RNA decay (MG_123)";
  RNA_decay_TU_076: TU_076__c + 1171 H2O__c -> 393 AMP__c + 192 CMP__c + 168 GMP__c + 419 UMP__c + 1171 H__c; k_dcy_TU_076*TU_076__c; RNA_decay_TU_076 is "RNA decay (MG_124 - MG_125)";
  RNA_decay_TU_077: TU_077__c + 1043 H2O__c -> 322 AMP__c + 160 CMP__c + 159 GMP__c + 403 UMP__c + 1043 H__c; k_dcy_TU_077*TU_077__c; RNA_decay_TU_077 is "RNA decay (MG_126)";
  RNA_decay_TU_078: TU_078__c + 1224 H2O__c -> 400 AMP__c + 207 CMP__c + 195 GMP__c + 423 UMP__c + 1224 H__c; k_dcy_TU_078*TU_078__c; RNA_decay_TU_078 is "RNA decay (MG_127 - MG_128)";
  RNA_decay_TU_079: TU_079__c + 353 H2O__c -> 118 AMP__c + 55 CMP__c + 44 GMP__c + 137 UMP__c + 353 H__c; k_dcy_TU_079*TU_079__c; RNA_decay_TU_079 is "RNA decay (MG_129)";
  RNA_decay_TU_080: TU_080__c + 1454 H2O__c -> 480 AMP__c + 214 CMP__c + 223 GMP__c + 538 UMP__c + 1454 H__c; k_dcy_TU_080*TU_080__c; RNA_decay_TU_080 is "RNA decay (MG_130)";
  RNA_decay_TU_081: TU_081__c + 286 H2O__c -> 128 AMP__c + 40 CMP__c + 36 GMP__c + 83 UMP__c + 286 H__c; k_dcy_TU_081*TU_081__c; RNA_decay_TU_081 is "RNA decay (MG_131)";
  RNA_decay_TU_082: TU_082__c + 425 H2O__c -> 132 AMP__c + 67 CMP__c + 69 GMP__c + 158 UMP__c + 425 H__c; k_dcy_TU_082*TU_082__c; RNA_decay_TU_082 is "RNA decay (MG_132)";
  RNA_decay_TU_083: TU_083__c + 794 H2O__c -> 326 AMP__c + 108 CMP__c + 126 GMP__c + 235 UMP__c + 794 H__c; k_dcy_TU_083*TU_083__c; RNA_decay_TU_083 is "RNA decay (MG_133)";
  RNA_decay_TU_084: TU_084__c + 302 H2O__c -> 87 AMP__c + 58 CMP__c + 41 GMP__c + 117 UMP__c + 302 H__c; k_dcy_TU_084*TU_084__c; RNA_decay_TU_084 is "RNA decay (MG_134)";
  RNA_decay_TU_085: TU_085__c + 842 H2O__c -> 343 AMP__c + 145 CMP__c + 120 GMP__c + 235 UMP__c + 842 H__c; k_dcy_TU_085*TU_085__c; RNA_decay_TU_085 is "RNA decay (MG_135)";
  RNA_decay_TU_086: TU_086__c + 4424 H2O__c -> 1415 AMP__c + 766 CMP__c + 674 GMP__c + 1570 UMP__c + 4424 H__c; k_dcy_TU_086*TU_086__c; RNA_decay_TU_086 is "RNA decay (MG_136 - MG_138)";
  RNA_decay_TU_087: TU_087__c + 1709 H2O__c -> 556 AMP__c + 320 CMP__c + 265 GMP__c + 569 UMP__c + 1709 H__c; k_dcy_TU_087*TU_087__c; RNA_decay_TU_087 is "RNA decay (MG_139)";
  RNA_decay_MGrrnA16S: MGrrnA16S__c + 1518 H2O__c -> 384 AMP__c + 409 CMP__c + 284 GMP__c + 442 UMP__c + 1518 H__c; k_dcy_MGrrnA16S*MGrrnA16S__c; RNA_decay_MGrrnA16S is "RNA decay (16S ribosomal rRNA)";
  RNA_decay_MGrrnA23S: MGrrnA23S__c + 2733 H2O__c -> 670 AMP__c + 759 CMP__c + 490 GMP__c + 815 UMP__c + 2733 H__c; k_dcy_MGrrnA23S*MGrrnA23S__c; RNA_decay_MGrrnA23S is "RNA decay (23S ribosomal rRNA)";
  RNA_decay_MGrrnA5S: MGrrnA5S__c + 103 H2O__c -> 20 AMP__c + 25 CMP__c + 23 GMP__c + 36 UMP__c + 103 H__c; k_dcy_MGrrnA5S*MGrrnA5S__c; RNA_decay_MGrrnA5S is "RNA decay (5S ribosomal rRNA)";
  RNA_decay_TU_089: TU_089__c + 3341 H2O__c -> 1050 AMP__c + 587 CMP__c + 522 GMP__c + 1183 UMP__c + 3341 H__c; k_dcy_TU_089*TU_089__c; RNA_decay_TU_089 is "RNA decay (MG_140)";
  RNA_decay_TU_090: TU_090__c + 1595 H2O__c -> 483 AMP__c + 298 CMP__c + 221 GMP__c + 594 UMP__c + 1595 H__c; k_dcy_TU_090*TU_090__c; RNA_decay_TU_090 is "RNA decay (MG_141)";
  RNA_decay_TU_091: TU_091__c + 272 H2O__c -> 81 AMP__c + 44 CMP__c + 39 GMP__c + 109 UMP__c + 272 H__c; k_dcy_TU_091*TU_091__c; RNA_decay_TU_091 is "RNA decay (MG_477)";
  RNA_decay_TU_092: TU_092__c + 3048 H2O__c -> 955 AMP__c + 587 CMP__c + 442 GMP__c + 1065 UMP__c + 3048 H__c; k_dcy_TU_092*TU_092__c; RNA_decay_TU_092 is "RNA decay (MG_142 - MG_144)";
  RNA_decay_TU_093: TU_093__c + 809 H2O__c -> 272 AMP__c + 142 CMP__c + 105 GMP__c + 291 UMP__c + 809 H__c; k_dcy_TU_093*TU_093__c; RNA_decay_TU_093 is "RNA decay (MG_145)";
  RNA_decay_TU_094: TU_094__c + 1274 H2O__c -> 431 AMP__c + 202 CMP__c + 202 GMP__c + 440 UMP__c + 1274 H__c; k_dcy_TU_094*TU_094__c; RNA_decay_TU_094 is "RNA decay (MG_146)";
  RNA_decay_TU_095: TU_095__c + 1127 H2O__c -> 467 AMP__c + 207 CMP__c + 155 GMP__c + 299 UMP__c + 1127 H__c; k_dcy_TU_095*TU_095__c; RNA_decay_TU_095 is "RNA decay (MG_147)";
  RNA_decay_TU_096: TU_096__c + 1229 H2O__c -> 351 AMP__c + 206 CMP__c + 162 GMP__c + 511 UMP__c + 1229 H__c; k_dcy_TU_096*TU_096__c; RNA_decay_TU_096 is "RNA decay (MG_148)";
  RNA_decay_TU_097: TU_097__c + 845 H2O__c -> 239 AMP__c + 143 CMP__c + 139 GMP__c + 325 UMP__c + 845 H__c; k_dcy_TU_097*TU_097__c; RNA_decay_TU_097 is "RNA decay (MG_149)";
  RNA_decay_TU_098: TU_098__c + 464 H2O__c -> 188 AMP__c + 73 CMP__c + 66 GMP__c + 138 UMP__c + 464 H__c; k_dcy_TU_098*TU_098__c; RNA_decay_TU_098 is "RNA decay (MG_478)";
  RNA_decay_TU_099: TU_099__c + 320 H2O__c -> 95 AMP__c + 64 CMP__c + 53 GMP__c + 109 UMP__c + 320 H__c; k_dcy_TU_099*TU_099__c; RNA_decay_TU_099 is "RNA decay (MG_150)";
  RNA_decay_TU_100: TU_100__c + 773 H2O__c -> 205 AMP__c + 180 CMP__c + 120 GMP__c + 269 UMP__c + 773 H__c; k_dcy_TU_100*TU_100__c; RNA_decay_TU_100 is "RNA decay (MG_151)";
  RNA_decay_TU_101: TU_101__c + 959 H2O__c -> 245 AMP__c + 171 CMP__c + 176 GMP__c + 368 UMP__c + 959 H__c; k_dcy_TU_101*TU_101__c; RNA_decay_TU_101 is "RNA decay (MG_152 - MG_153)";
  RNA_decay_TU_102: TU_102__c + 4893 H2O__c -> 1240 AMP__c + 974 CMP__c + 865 GMP__c + 1815 UMP__c + 4893 H__c; k_dcy_TU_102*TU_102__c; RNA_decay_TU_102 is "RNA decay (MG_154 - MG_163)";
  RNA_decay_TU_103: TU_103__c + 182 H2O__c -> 50 AMP__c + 46 CMP__c + 32 GMP__c + 55 UMP__c + 182 H__c; k_dcy_TU_103*TU_103__c; RNA_decay_TU_103 is "RNA decay (MG_164)";
  RNA_decay_TU_104: TU_104__c + 2433 H2O__c -> 635 AMP__c + 474 CMP__c + 409 GMP__c + 916 UMP__c + 2433 H__c; k_dcy_TU_104*TU_104__c; RNA_decay_TU_104 is "RNA decay (MG_165 - MG_169)";
  RNA_decay_TU_105: TU_105__c + 3026 H2O__c -> 958 AMP__c + 601 CMP__c + 527 GMP__c + 941 UMP__c + 3026 H__c; k_dcy_TU_105*TU_105__c; RNA_decay_TU_105 is "RNA decay (MG_170 - MG_173)";
  RNA_decay_TU_106: TU_106__c + 113 H2O__c -> 21 AMP__c + 23 CMP__c + 20 GMP__c + 50 UMP__c + 113 H__c; k_dcy_TU_106*TU_106__c; RNA_decay_TU_106 is "RNA decay (MG_174)";
  RNA_decay_TU_107: TU_107__c + 1741 H2O__c -> 442 AMP__c + 389 CMP__c + 297 GMP__c + 614 UMP__c + 1741 H__c; k_dcy_TU_107*TU_107__c; RNA_decay_TU_107 is "RNA decay (MG_175 - MG_177)";
  RNA_decay_TU_108: TU_108__c + 371 H2O__c -> 97 AMP__c + 80 CMP__c + 54 GMP__c + 141 UMP__c + 371 H__c; k_dcy_TU_108*TU_108__c; RNA_decay_TU_108 is "RNA decay (MG_178)";
  RNA_decay_TU_109: TU_109__c + 824 H2O__c -> 245 AMP__c + 158 CMP__c + 136 GMP__c + 286 UMP__c + 824 H__c; k_dcy_TU_109*TU_109__c; RNA_decay_TU_109 is "RNA decay (MG_179)";
  RNA_decay_TU_110: TU_110__c + 914 H2O__c -> 263 AMP__c + 183 CMP__c + 155 GMP__c + 314 UMP__c + 914 H__c; k_dcy_TU_110*TU_110__c; RNA_decay_TU_110 is "RNA decay (MG_180)";
  RNA_decay_TU_111: TU_111__c + 1262 H2O__c -> 462 AMP__c + 231 CMP__c + 218 GMP__c + 352 UMP__c + 1262 H__c; k_dcy_TU_111*TU_111__c; RNA_decay_TU_111 is "RNA decay (MG_181)";
  RNA_decay_TU_112: TU_112__c + 734 H2O__c -> 235 AMP__c + 148 CMP__c + 108 GMP__c + 244 UMP__c + 734 H__c; k_dcy_TU_112*TU_112__c; RNA_decay_TU_112 is "RNA decay (MG_182)";
  RNA_decay_TU_113: TU_113__c + 2777 H2O__c -> 876 AMP__c + 418 CMP__c + 459 GMP__c + 1025 UMP__c + 2777 H__c; k_dcy_TU_113*TU_113__c; RNA_decay_TU_113 is "RNA decay (MG_183 - MG_184)";
  RNA_decay_TU_114: TU_114__c + 2105 H2O__c -> 657 AMP__c + 347 CMP__c + 340 GMP__c + 762 UMP__c + 2105 H__c; k_dcy_TU_114*TU_114__c; RNA_decay_TU_114 is "RNA decay (MG_185)";
  RNA_decay_TU_115: TU_115__c + 752 H2O__c -> 226 AMP__c + 139 CMP__c + 135 GMP__c + 253 UMP__c + 752 H__c; k_dcy_TU_115*TU_115__c; RNA_decay_TU_115 is "RNA decay (MG_186)";
  RNA_decay_TU_116: TU_116__c + 3677 H2O__c -> 1199 AMP__c + 663 CMP__c + 642 GMP__c + 1174 UMP__c + 3677 H__c; k_dcy_TU_116*TU_116__c; RNA_decay_TU_116 is "RNA decay (MG_187 - MG_189)";
  RNA_decay_TU_117: TU_117__c + 956 H2O__c -> 281 AMP__c + 186 CMP__c + 135 GMP__c + 355 UMP__c + 956 H__c; k_dcy_TU_117*TU_117__c; RNA_decay_TU_117 is "RNA decay (MG_190)";
  RNA_decay_TU_118: TU_118__c + 7497 H2O__c -> 2029 AMP__c + 1493 CMP__c + 1523 GMP__c + 2453 UMP__c + 7497 H__c; k_dcy_TU_118*TU_118__c; RNA_decay_TU_118 is "RNA decay (MG_191 - MG_192)";
  RNA_decay_TU_119: TU_119__c + 3449 H2O__c -> 1085 AMP__c + 542 CMP__c + 582 GMP__c + 1241 UMP__c + 3449 H__c; k_dcy_TU_119*TU_119__c; RNA_decay_TU_119 is "RNA decay (MG_194 - MG_195)";
  RNA_decay_TU_120: TU_120__c + 1104 H2O__c -> 278 AMP__c + 199 CMP__c + 198 GMP__c + 430 UMP__c + 1104 H__c; k_dcy_TU_120*TU_120__c; RNA_decay_TU_120 is "RNA decay (MG_196 - MG_198)";
  RNA_decay_TU_121: TU_121__c + 707 H2O__c -> 222 AMP__c + 113 CMP__c + 116 GMP__c + 257 UMP__c + 707 H__c; k_dcy_TU_121*TU_121__c; RNA_decay_TU_121 is "RNA decay (MG_199)";
  RNA_decay_TU_122: TU_122__c + 2848 H2O__c -> 747 AMP__c + 520 CMP__c + 552 GMP__c + 1030 UMP__c + 2848 H__c; k_dcy_TU_122*TU_122__c; RNA_decay_TU_122 is "RNA decay (MG_200 - MG_202)";
  RNA_decay_MG479: MG479__c + 73 H2O__c -> 17 AMP__c + 20 CMP__c + 15 GMP__c + 22 UMP__c + 73 H__c; k_dcy_MG479*MG479__c; RNA_decay_MG479 is "RNA decay (MG479)";
  RNA_decay_TU_124: TU_124__c + 4246 H2O__c -> 1228 AMP__c + 782 CMP__c + 704 GMP__c + 1533 UMP__c + 4246 H__c; k_dcy_TU_124*TU_124__c; RNA_decay_TU_124 is "RNA decay (MG_203 - MG_204)";
  RNA_decay_TU_125: TU_125__c + 1031 H2O__c -> 297 AMP__c + 173 CMP__c + 183 GMP__c + 379 UMP__c + 1031 H__c; k_dcy_TU_125*TU_125__c; RNA_decay_TU_125 is "RNA decay (MG_205)";
  RNA_decay_TU_126: TU_126__c + 1793 H2O__c -> 540 AMP__c + 270 CMP__c + 318 GMP__c + 666 UMP__c + 1793 H__c; k_dcy_TU_126*TU_126__c; RNA_decay_TU_126 is "RNA decay (MG_206)";
  RNA_decay_TU_127: TU_127__c + 503 H2O__c -> 142 AMP__c + 78 CMP__c + 101 GMP__c + 183 UMP__c + 503 H__c; k_dcy_TU_127*TU_127__c; RNA_decay_TU_127 is "RNA decay (MG_207)";
  RNA_decay_TU_128: TU_128__c + 2045 H2O__c -> 679 AMP__c + 342 CMP__c + 333 GMP__c + 692 UMP__c + 2045 H__c; k_dcy_TU_128*TU_128__c; RNA_decay_TU_128 is "RNA decay (MG_208 - MG_210)";
  RNA_decay_TU_129: TU_129__c + 659 H2O__c -> 189 AMP__c + 125 CMP__c + 107 GMP__c + 239 UMP__c + 659 H__c; k_dcy_TU_129*TU_129__c; RNA_decay_TU_129 is "RNA decay (MG_480)";
  RNA_decay_TU_130: TU_130__c + 188 H2O__c -> 41 AMP__c + 44 CMP__c + 29 GMP__c + 75 UMP__c + 188 H__c; k_dcy_TU_130*TU_130__c; RNA_decay_TU_130 is "RNA decay (MG_481)";
  RNA_decay_TU_131: TU_131__c + 1589 H2O__c -> 496 AMP__c + 280 CMP__c + 240 GMP__c + 574 UMP__c + 1589 H__c; k_dcy_TU_131*TU_131__c; RNA_decay_TU_131 is "RNA decay (MG_211, MG_212, MG_482)";
  RNA_decay_TU_132: TU_132__c + 2022 H2O__c -> 623 AMP__c + 331 CMP__c + 339 GMP__c + 730 UMP__c + 2022 H__c; k_dcy_TU_132*TU_132__c; RNA_decay_TU_132 is "RNA decay (MG_213 - MG_214)";
  RNA_decay_TU_133: TU_133__c + 2500 H2O__c -> 750 AMP__c + 492 CMP__c + 417 GMP__c + 842 UMP__c + 2500 H__c; k_dcy_TU_133*TU_133__c; RNA_decay_TU_133 is "RNA decay (MG_215 - MG_216)";
  RNA_decay_MG483: MG483__c + 76 H2O__c -> 16 AMP__c + 19 CMP__c + 24 GMP__c + 18 UMP__c + 76 H__c; k_dcy_MG483*MG483__c; RNA_decay_MG483 is "RNA decay (MG483)";
  RNA_decay_MG484: MG484__c + 76 H2O__c -> 20 AMP__c + 24 CMP__c + 17 GMP__c + 16 UMP__c + 76 H__c; k_dcy_MG484*MG484__c; RNA_decay_MG484 is "RNA decay (MG484)";
  RNA_decay_MG485: MG485__c + 76 H2O__c -> 19 AMP__c + 23 CMP__c + 22 GMP__c + 13 UMP__c + 76 H__c; k_dcy_MG485*MG485__c; RNA_decay_MG485 is "RNA decay (MG485)";
  RNA_decay_MG486: MG486__c + 76 H2O__c -> 22 AMP__c + 16 CMP__c + 20 GMP__c + 19 UMP__c + 76 H__c; k_dcy_MG486*MG486__c; RNA_decay_MG486 is "RNA decay (MG486)";
  RNA_decay_MG487: MG487__c + 91 H2O__c -> 19 AMP__c + 27 CMP__c + 24 GMP__c + 22 UMP__c + 91 H__c; k_dcy_MG487*MG487__c; RNA_decay_MG487 is "RNA decay (MG487)";
  RNA_decay_MG488: MG488__c + 76 H2O__c -> 16 AMP__c + 21 CMP__c + 22 GMP__c + 18 UMP__c + 76 H__c; k_dcy_MG488*MG488__c; RNA_decay_MG488 is "RNA decay (MG488)";
  RNA_decay_MG489: MG489__c + 73 H2O__c -> 21 AMP__c + 23 CMP__c + 17 GMP__c + 13 UMP__c + 73 H__c; k_dcy_MG489*MG489__c; RNA_decay_MG489 is "RNA decay (MG489)";
  RNA_decay_MG490: MG490__c + 75 H2O__c -> 17 AMP__c + 23 CMP__c + 20 GMP__c + 16 UMP__c + 75 H__c; k_dcy_MG490*MG490__c; RNA_decay_MG490 is "RNA decay (MG490)";
  RNA_decay_TU_142: TU_142__c + 1118 H2O__c -> 289 AMP__c + 138 CMP__c + 243 GMP__c + 449 UMP__c + 1118 H__c; k_dcy_TU_142*TU_142__c; RNA_decay_TU_142 is "RNA decay (MG_217)";
  RNA_decay_TU_143: TU_143__c + 6460 H2O__c -> 1584 AMP__c + 1074 CMP__c + 1150 GMP__c + 2653 UMP__c + 6460 H__c; k_dcy_TU_143*TU_143__c; RNA_decay_TU_143 is "RNA decay (MG_218, MG_491)";
  RNA_decay_TU_144: TU_144__c + 446 H2O__c -> 100 AMP__c + 60 CMP__c + 91 GMP__c + 196 UMP__c + 446 H__c; k_dcy_TU_144*TU_144__c; RNA_decay_TU_144 is "RNA decay (MG_219)";
  RNA_decay_TU_145: TU_145__c + 281 H2O__c -> 93 AMP__c + 50 CMP__c + 46 GMP__c + 93 UMP__c + 281 H__c; k_dcy_TU_145*TU_145__c; RNA_decay_TU_145 is "RNA decay (MG_220)";
  RNA_decay_MG492: MG492__c + 76 H2O__c -> 20 AMP__c + 23 CMP__c + 16 GMP__c + 18 UMP__c + 76 H__c; k_dcy_MG492*MG492__c; RNA_decay_MG492 is "RNA decay (MG492)";
  RNA_decay_TU_147: TU_147__c + 2581 H2O__c -> 785 AMP__c + 386 CMP__c + 456 GMP__c + 955 UMP__c + 2581 H__c; k_dcy_TU_147*TU_147__c; RNA_decay_TU_147 is "RNA decay (MG_221 - MG_223)";
  RNA_decay_TU_148: TU_148__c + 1109 H2O__c -> 329 AMP__c + 183 CMP__c + 186 GMP__c + 412 UMP__c + 1109 H__c; k_dcy_TU_148*TU_148__c; RNA_decay_TU_148 is "RNA decay (MG_224)";
  RNA_decay_TU_149: TU_149__c + 2913 H2O__c -> 1115 AMP__c + 536 CMP__c + 423 GMP__c + 840 UMP__c + 2913 H__c; k_dcy_TU_149*TU_149__c; RNA_decay_TU_149 is "RNA decay (MG_225 - MG_226)";
  RNA_decay_TU_150: TU_150__c + 863 H2O__c -> 278 AMP__c + 149 CMP__c + 137 GMP__c + 300 UMP__c + 863 H__c; k_dcy_TU_150*TU_150__c; RNA_decay_TU_150 is "RNA decay (MG_227)";
  RNA_decay_TU_151: TU_151__c + 4159 H2O__c -> 1280 AMP__c + 773 CMP__c + 685 GMP__c + 1422 UMP__c + 4159 H__c; k_dcy_TU_151*TU_151__c; RNA_decay_TU_151 is "RNA decay (MG_228 - MG_231)";
  RNA_decay_TU_152: TU_152__c + 2181 H2O__c -> 664 AMP__c + 403 CMP__c + 395 GMP__c + 720 UMP__c + 2181 H__c; k_dcy_TU_152*TU_152__c; RNA_decay_TU_152 is "RNA decay (MG_232 - MG_236)";
  RNA_decay_TU_153: TU_153__c + 884 H2O__c -> 283 AMP__c + 129 CMP__c + 152 GMP__c + 321 UMP__c + 884 H__c; k_dcy_TU_153*TU_153__c; RNA_decay_TU_153 is "RNA decay (MG_237)";
  RNA_decay_TU_154: TU_154__c + 1334 H2O__c -> 382 AMP__c + 204 CMP__c + 225 GMP__c + 524 UMP__c + 1334 H__c; k_dcy_TU_154*TU_154__c; RNA_decay_TU_154 is "RNA decay (MG_238)";
  RNA_decay_TU_155: TU_155__c + 2387 H2O__c -> 665 AMP__c + 489 CMP__c + 387 GMP__c + 847 UMP__c + 2387 H__c; k_dcy_TU_155*TU_155__c; RNA_decay_TU_155 is "RNA decay (MG_239)";
  RNA_decay_TU_156: TU_156__c + 1052 H2O__c -> 319 AMP__c + 157 CMP__c + 173 GMP__c + 404 UMP__c + 1052 H__c; k_dcy_TU_156*TU_156__c; RNA_decay_TU_156 is "RNA decay (MG_240)";
  RNA_decay_TU_157: TU_157__c + 1862 H2O__c -> 629 AMP__c + 270 CMP__c + 259 GMP__c + 705 UMP__c + 1862 H__c; k_dcy_TU_157*TU_157__c; RNA_decay_TU_157 is "RNA decay (MG_241)";
  RNA_decay_TU_158: TU_158__c + 1892 H2O__c -> 645 AMP__c + 293 CMP__c + 241 GMP__c + 714 UMP__c + 1892 H__c; k_dcy_TU_158*TU_158__c; RNA_decay_TU_158 is "RNA decay (MG_242)";
  RNA_decay_TU_159: TU_159__c + 2797 H2O__c -> 944 AMP__c + 428 CMP__c + 377 GMP__c + 1049 UMP__c + 2797 H__c; k_dcy_TU_159*TU_159__c; RNA_decay_TU_159 is "RNA decay (MG_243 - MG_244)";
  RNA_decay_TU_160: TU_160__c + 497 H2O__c -> 175 AMP__c + 67 CMP__c + 62 GMP__c + 194 UMP__c + 497 H__c; k_dcy_TU_160*TU_160__c; RNA_decay_TU_160 is "RNA decay (MG_245)";
  RNA_decay_TU_161: TU_161__c + 845 H2O__c -> 291 AMP__c + 154 CMP__c + 114 GMP__c + 287 UMP__c + 845 H__c; k_dcy_TU_161*TU_161__c; RNA_decay_TU_161 is "RNA decay (MG_246)";
  RNA_decay_TU_162: TU_162__c + 719 H2O__c -> 300 AMP__c + 117 CMP__c + 100 GMP__c + 203 UMP__c + 719 H__c; k_dcy_TU_162*TU_162__c; RNA_decay_TU_162 is "RNA decay (MG_247)";
  RNA_decay_TU_163: TU_163__c + 2133 H2O__c -> 615 AMP__c + 367 CMP__c + 325 GMP__c + 827 UMP__c + 2133 H__c; k_dcy_TU_163*TU_163__c; RNA_decay_TU_163 is "RNA decay (MG_248 - MG_249)";
  RNA_decay_TU_164: TU_164__c + 3153 H2O__c -> 1013 AMP__c + 525 CMP__c + 446 GMP__c + 1170 UMP__c + 3153 H__c; k_dcy_TU_164*TU_164__c; RNA_decay_TU_164 is "RNA decay (MG_250 - MG_251)";
  RNA_decay_TU_165: TU_165__c + 4001 H2O__c -> 1264 AMP__c + 631 CMP__c + 597 GMP__c + 1510 UMP__c + 4001 H__c; k_dcy_TU_165*TU_165__c; RNA_decay_TU_165 is "RNA decay (MG_252 - MG_254)";
  RNA_decay_MG493: MG493__c + 73 H2O__c -> 21 AMP__c + 17 CMP__c + 16 GMP__c + 20 UMP__c + 73 H__c; k_dcy_MG493*MG493__c; RNA_decay_MG493 is "RNA decay (MG493)";
  RNA_decay_TU_167: TU_167__c + 1653 H2O__c -> 582 AMP__c + 248 CMP__c + 235 GMP__c + 589 UMP__c + 1653 H__c; k_dcy_TU_167*TU_167__c; RNA_decay_TU_167 is "RNA decay (MG_255, MG_494)";
  RNA_decay_MG495: MG495__c + 74 H2O__c -> 17 AMP__c + 17 CMP__c + 19 GMP__c + 22 UMP__c + 74 H__c; k_dcy_MG495*MG495__c; RNA_decay_MG495 is "RNA decay (MG495)";
  RNA_decay_MG496: MG496__c + 73 H2O__c -> 20 AMP__c + 20 CMP__c + 19 GMP__c + 15 UMP__c + 73 H__c; k_dcy_MG496*MG496__c; RNA_decay_MG496 is "RNA decay (MG496)";
  RNA_decay_TU_169: TU_169__c + 770 H2O__c -> 294 AMP__c + 113 CMP__c + 113 GMP__c + 251 UMP__c + 770 H__c; k_dcy_TU_169*TU_169__c; RNA_decay_TU_169 is "RNA decay (MG_256)";
  RNA_decay_TU_170: TU_170__c + 2743 H2O__c -> 839 AMP__c + 449 CMP__c + 425 GMP__c + 1031 UMP__c + 2743 H__c; k_dcy_TU_170*TU_170__c; RNA_decay_TU_170 is "RNA decay (MG_257 - MG_259)";
  RNA_decay_TU_171: TU_171__c + 2297 H2O__c -> 703 AMP__c + 376 CMP__c + 357 GMP__c + 862 UMP__c + 2297 H__c; k_dcy_TU_171*TU_171__c; RNA_decay_TU_171 is "RNA decay (MG_260)";
  RNA_decay_MG497: MG497__c + 76 H2O__c -> 18 AMP__c + 24 CMP__c + 19 GMP__c + 16 UMP__c + 76 H__c; k_dcy_MG497*MG497__c; RNA_decay_MG497 is "RNA decay (MG497)";
  RNA_decay_TU_173: TU_173__c + 4360 H2O__c -> 1438 AMP__c + 637 CMP__c + 648 GMP__c + 1638 UMP__c + 4360 H__c; k_dcy_TU_173*TU_173__c; RNA_decay_TU_173 is "RNA decay (MG_261, MG_262, MG_498)";
  RNA_decay_TU_174: TU_174__c + 875 H2O__c -> 290 AMP__c + 151 CMP__c + 124 GMP__c + 311 UMP__c + 875 H__c; k_dcy_TU_174*TU_174__c; RNA_decay_TU_174 is "RNA decay (MG_263)";
  RNA_decay_TU_175: TU_175__c + 596 H2O__c -> 189 AMP__c + 98 CMP__c + 84 GMP__c + 226 UMP__c + 596 H__c; k_dcy_TU_175*TU_175__c; RNA_decay_TU_175 is "RNA decay (MG_264)";
  RNA_decay_TU_176: TU_176__c + 3581 H2O__c -> 1184 AMP__c + 611 CMP__c + 530 GMP__c + 1257 UMP__c + 3581 H__c; k_dcy_TU_176*TU_176__c; RNA_decay_TU_176 is "RNA decay (MG_265 - MG_267)";
  RNA_decay_TU_177: TU_177__c + 686 H2O__c -> 230 AMP__c + 112 CMP__c + 105 GMP__c + 240 UMP__c + 686 H__c; k_dcy_TU_177*TU_177__c; RNA_decay_TU_177 is "RNA decay (MG_268)";
  RNA_decay_MG_0001: MG_0001__c + 82 H2O__c -> 22 AMP__c + 21 CMP__c + 14 GMP__c + 26 UMP__c + 82 H__c; k_dcy_MG_0001*MG_0001__c; RNA_decay_MG_0001 is "RNA decay (scRNA, signal recognition particle 4.5S RNA, MCS1)";
  RNA_decay_TU_179: TU_179__c + 1022 H2O__c -> 254 AMP__c + 164 CMP__c + 174 GMP__c + 431 UMP__c + 1022 H__c; k_dcy_TU_179*TU_179__c; RNA_decay_TU_179 is "RNA decay (MG_269)";
  RNA_decay_TU_180: TU_180__c + 3552 H2O__c -> 1110 AMP__c + 726 CMP__c + 510 GMP__c + 1207 UMP__c + 3552 H__c; k_dcy_TU_180*TU_180__c; RNA_decay_TU_180 is "RNA decay (MG_270 - MG_272)";
  RNA_decay_MG_0002: MG_0002__c + 181 H2O__c -> 55 AMP__c + 32 CMP__c + 30 GMP__c + 65 UMP__c + 181 H__c; k_dcy_MG_0002*MG_0002__c; RNA_decay_MG_0002 is "RNA decay (MG170 RNA)";
  RNA_decay_TU_182: TU_182__c + 3538 H2O__c -> 1076 AMP__c + 745 CMP__c + 563 GMP__c + 1155 UMP__c + 3538 H__c; k_dcy_TU_182*TU_182__c; RNA_decay_TU_182 is "RNA decay (MG_273 - MG_275)";
  RNA_decay_TU_183: TU_183__c + 542 H2O__c -> 171 AMP__c + 103 CMP__c + 94 GMP__c + 175 UMP__c + 542 H__c; k_dcy_TU_183*TU_183__c; RNA_decay_TU_183 is "RNA decay (MG_276)";
  RNA_decay_TU_184: TU_184__c + 2912 H2O__c -> 1024 AMP__c + 516 CMP__c + 469 GMP__c + 904 UMP__c + 2912 H__c; k_dcy_TU_184*TU_184__c; RNA_decay_TU_184 is "RNA decay (MG_277)";
  RNA_decay_TU_185: TU_185__c + 2162 H2O__c -> 647 AMP__c + 336 CMP__c + 344 GMP__c + 836 UMP__c + 2162 H__c; k_dcy_TU_185*TU_185__c; RNA_decay_TU_185 is "RNA decay (MG_278)";
  RNA_decay_TU_186: TU_186__c + 3177 H2O__c -> 1021 AMP__c + 558 CMP__c + 486 GMP__c + 1113 UMP__c + 3177 H__c; k_dcy_TU_186*TU_186__c; RNA_decay_TU_186 is "RNA decay (MG_279 - MG_281)";
  RNA_decay_MG499: MG499__c + 73 H2O__c -> 22 AMP__c + 17 CMP__c + 18 GMP__c + 17 UMP__c + 73 H__c; k_dcy_MG499*MG499__c; RNA_decay_MG499 is "RNA decay (MG499)";
  RNA_decay_MG500: MG500__c + 85 H2O__c -> 18 AMP__c + 28 CMP__c + 21 GMP__c + 19 UMP__c + 85 H__c; k_dcy_MG500*MG500__c; RNA_decay_MG500 is "RNA decay (MG500)";
  RNA_decay_MG501: MG501__c + 74 H2O__c -> 19 AMP__c + 20 CMP__c + 19 GMP__c + 17 UMP__c + 74 H__c; k_dcy_MG501*MG501__c; RNA_decay_MG501 is "RNA decay (MG501)";
  RNA_decay_MG502: MG502__c + 74 H2O__c -> 18 AMP__c + 18 CMP__c + 20 GMP__c + 19 UMP__c + 74 H__c; k_dcy_MG502*MG502__c; RNA_decay_MG502 is "RNA decay (MG502)";
  RNA_decay_MG503: MG503__c + 86 H2O__c -> 23 AMP__c + 22 CMP__c + 22 GMP__c + 20 UMP__c + 86 H__c; k_dcy_MG503*MG503__c; RNA_decay_MG503 is "RNA decay (MG503)";
  RNA_decay_TU_190: TU_190__c + 485 H2O__c -> 124 AMP__c + 94 CMP__c + 82 GMP__c + 186 UMP__c + 485 H__c; k_dcy_TU_190*TU_190__c; RNA_decay_TU_190 is "RNA decay (MG_282)";
  RNA_decay_TU_191: TU_191__c + 1451 H2O__c -> 458 AMP__c + 232 CMP__c + 230 GMP__c + 532 UMP__c + 1451 H__c; k_dcy_TU_191*TU_191__c; RNA_decay_TU_191 is "RNA decay (MG_283)";
  RNA_decay_TU_192: TU_192__c + 1997 H2O__c -> 610 AMP__c + 325 CMP__c + 281 GMP__c + 782 UMP__c + 1997 H__c; k_dcy_TU_192*TU_192__c; RNA_decay_TU_192 is "RNA decay (MG_284 - MG_286)";
  RNA_decay_TU_193: TU_193__c + 254 H2O__c -> 85 AMP__c + 42 CMP__c + 25 GMP__c + 103 UMP__c + 254 H__c; k_dcy_TU_193*TU_193__c; RNA_decay_TU_193 is "RNA decay (MG_287)";
  RNA_decay_MG504: MG504__c + 74 H2O__c -> 21 AMP__c + 20 CMP__c + 15 GMP__c + 19 UMP__c + 74 H__c; k_dcy_MG504*MG504__c; RNA_decay_MG504 is "RNA decay (MG504)";
  RNA_decay_TU_195: TU_195__c + 1244 H2O__c -> 378 AMP__c + 185 CMP__c + 166 GMP__c + 516 UMP__c + 1244 H__c; k_dcy_TU_195*TU_195__c; RNA_decay_TU_195 is "RNA decay (MG_288)";
  RNA_decay_TU_196: TU_196__c + 3454 H2O__c -> 1290 AMP__c + 496 CMP__c + 429 GMP__c + 1240 UMP__c + 3454 H__c; k_dcy_TU_196*TU_196__c; RNA_decay_TU_196 is "RNA decay (MG_289 - MG_291)";
  RNA_decay_TU_197: TU_197__c + 416 H2O__c -> 143 AMP__c + 60 CMP__c + 51 GMP__c + 163 UMP__c + 416 H__c; k_dcy_TU_197*TU_197__c; RNA_decay_TU_197 is "RNA decay (MG_505)";
  RNA_decay_TU_198: TU_198__c + 4911 H2O__c -> 1683 AMP__c + 764 CMP__c + 666 GMP__c + 1799 UMP__c + 4911 H__c; k_dcy_TU_198*TU_198__c; RNA_decay_TU_198 is "RNA decay (MG_292 - MG_294)";
  RNA_decay_TU_199: TU_199__c + 1103 H2O__c -> 380 AMP__c + 181 CMP__c + 130 GMP__c + 413 UMP__c + 1103 H__c; k_dcy_TU_199*TU_199__c; RNA_decay_TU_199 is "RNA decay (MG_295)";
  RNA_decay_TU_200: TU_200__c + 389 H2O__c -> 140 AMP__c + 57 CMP__c + 53 GMP__c + 140 UMP__c + 389 H__c; k_dcy_TU_200*TU_200__c; RNA_decay_TU_200 is "RNA decay (MG_296)";
  RNA_decay_TU_201: TU_201__c + 1040 H2O__c -> 337 AMP__c + 178 CMP__c + 140 GMP__c + 386 UMP__c + 1040 H__c; k_dcy_TU_201*TU_201__c; RNA_decay_TU_201 is "RNA decay (MG_297)";
  RNA_decay_TU_202: TU_202__c + 2948 H2O__c -> 891 AMP__c + 533 CMP__c + 422 GMP__c + 1103 UMP__c + 2948 H__c; k_dcy_TU_202*TU_202__c; RNA_decay_TU_202 is "RNA decay (MG_298)";
  RNA_decay_TU_203: TU_203__c + 962 H2O__c -> 321 AMP__c + 192 CMP__c + 141 GMP__c + 309 UMP__c + 962 H__c; k_dcy_TU_203*TU_203__c; RNA_decay_TU_203 is "RNA decay (MG_299)";
  RNA_decay_TU_204: TU_204__c + 2250 H2O__c -> 708 AMP__c + 442 CMP__c + 344 GMP__c + 757 UMP__c + 2250 H__c; k_dcy_TU_204*TU_204__c; RNA_decay_TU_204 is "RNA decay (MG_300 - MG_301)";
  RNA_decay_TU_205: TU_205__c + 953 H2O__c -> 390 AMP__c + 145 CMP__c + 120 GMP__c + 299 UMP__c + 953 H__c; k_dcy_TU_205*TU_205__c; RNA_decay_TU_205 is "RNA decay (MG_302)";
  RNA_decay_TU_206: TU_206__c + 1073 H2O__c -> 345 AMP__c + 162 CMP__c + 151 GMP__c + 416 UMP__c + 1073 H__c; k_dcy_TU_206*TU_206__c; RNA_decay_TU_206 is "RNA decay (MG_303)";
  RNA_decay_TU_207: TU_207__c + 812 H2O__c -> 270 AMP__c + 129 CMP__c + 125 GMP__c + 289 UMP__c + 812 H__c; k_dcy_TU_207*TU_207__c; RNA_decay_TU_207 is "RNA decay (MG_304)";
  RNA_decay_TU_208: TU_208__c + 1787 H2O__c -> 496 AMP__c + 375 CMP__c + 285 GMP__c + 632 UMP__c + 1787 H__c; k_dcy_TU_208*TU_208__c; RNA_decay_TU_208 is "RNA decay (MG_305)";
  RNA_decay_TU_209: TU_209__c + 1181 H2O__c -> 468 AMP__c + 204 CMP__c + 164 GMP__c + 346 UMP__c + 1181 H__c; k_dcy_TU_209*TU_209__c; RNA_decay_TU_209 is "RNA decay (MG_306)";
  RNA_decay_TU_210: TU_210__c + 3533 H2O__c -> 1061 AMP__c + 530 CMP__c + 573 GMP__c + 1370 UMP__c + 3533 H__c; k_dcy_TU_210*TU_210__c; RNA_decay_TU_210 is "RNA decay (MG_307)";
  RNA_decay_TU_211: TU_211__c + 4916 H2O__c -> 1561 AMP__c + 719 CMP__c + 757 GMP__c + 1880 UMP__c + 4916 H__c; k_dcy_TU_211*TU_211__c; RNA_decay_TU_211 is "RNA decay (MG_308 - MG_309)";
  RNA_decay_TU_212: TU_212__c + 806 H2O__c -> 271 AMP__c + 125 CMP__c + 128 GMP__c + 283 UMP__c + 806 H__c; k_dcy_TU_212*TU_212__c; RNA_decay_TU_212 is "RNA decay (MG_310)";
  RNA_decay_TU_213: TU_213__c + 617 H2O__c -> 186 AMP__c + 105 CMP__c + 99 GMP__c + 228 UMP__c + 617 H__c; k_dcy_TU_213*TU_213__c; RNA_decay_TU_213 is "RNA decay (MG_311)";
  RNA_decay_TU_214: TU_214__c + 3419 H2O__c -> 1007 AMP__c + 525 CMP__c + 579 GMP__c + 1309 UMP__c + 3419 H__c; k_dcy_TU_214*TU_214__c; RNA_decay_TU_214 is "RNA decay (MG_312)";
  RNA_decay_TU_215: TU_215__c + 3156 H2O__c -> 1162 AMP__c + 492 CMP__c + 449 GMP__c + 1054 UMP__c + 3156 H__c; k_dcy_TU_215*TU_215__c; RNA_decay_TU_215 is "RNA decay (MG_313 - MG_315)";
  RNA_decay_TU_216: TU_216__c + 1109 H2O__c -> 476 AMP__c + 150 CMP__c + 155 GMP__c + 329 UMP__c + 1109 H__c; k_dcy_TU_216*TU_216__c; RNA_decay_TU_216 is "RNA decay (MG_316)";
  RNA_decay_TU_217: TU_217__c + 2656 H2O__c -> 724 AMP__c + 378 CMP__c + 571 GMP__c + 984 UMP__c + 2656 H__c; k_dcy_TU_217*TU_217__c; RNA_decay_TU_217 is "RNA decay (MG_317 - MG_318)";
  RNA_decay_TU_218: TU_218__c + 536 H2O__c -> 188 AMP__c + 93 CMP__c + 84 GMP__c + 172 UMP__c + 536 H__c; k_dcy_TU_218*TU_218__c; RNA_decay_TU_218 is "RNA decay (MG_319)";
  RNA_decay_TU_219: TU_219__c + 860 H2O__c -> 329 AMP__c + 150 CMP__c + 127 GMP__c + 255 UMP__c + 860 H__c; k_dcy_TU_219*TU_219__c; RNA_decay_TU_219 is "RNA decay (MG_320)";
  RNA_decay_MG506: MG506__c + 90 H2O__c -> 20 AMP__c + 27 CMP__c + 19 GMP__c + 25 UMP__c + 90 H__c; k_dcy_MG506*MG506__c; RNA_decay_MG506 is "RNA decay (MG506)";
  RNA_decay_MG507: MG507__c + 88 H2O__c -> 19 AMP__c + 26 CMP__c + 23 GMP__c + 21 UMP__c + 88 H__c; k_dcy_MG507*MG507__c; RNA_decay_MG507 is "RNA decay (MG507)";
  RNA_decay_TU_222: TU_222__c + 2804 H2O__c -> 847 AMP__c + 499 CMP__c + 495 GMP__c + 964 UMP__c + 2804 H__c; k_dcy_TU_222*TU_222__c; RNA_decay_TU_222 is "RNA decay (MG_321)";
  RNA_decay_MG508: MG508__c + 84 H2O__c -> 21 AMP__c + 27 CMP__c + 19 GMP__c + 18 UMP__c + 84 H__c; k_dcy_MG508*MG508__c; RNA_decay_MG508 is "RNA decay (MG508)";
  RNA_decay_MG509: MG509__c + 75 H2O__c -> 22 AMP__c + 18 CMP__c + 18 GMP__c + 18 UMP__c + 75 H__c; k_dcy_MG509*MG509__c; RNA_decay_MG509 is "RNA decay (MG509)";
  RNA_decay_MG510: MG510__c + 75 H2O__c -> 21 AMP__c + 18 CMP__c + 16 GMP__c + 21 UMP__c + 75 H__c; k_dcy_MG510*MG510__c; RNA_decay_MG510 is "RNA decay (MG510)";
  RNA_decay_MG511: MG511__c + 75 H2O__c -> 17 AMP__c + 21 CMP__c + 20 GMP__c + 18 UMP__c + 75 H__c; k_dcy_MG511*MG511__c; RNA_decay_MG511 is "RNA decay (MG511)";
  RNA_decay_MG512: MG512__c + 74 H2O__c -> 17 AMP__c + 19 CMP__c + 19 GMP__c + 20 UMP__c + 74 H__c; k_dcy_MG512*MG512__c; RNA_decay_MG512 is "RNA decay (MG512)";
  RNA_decay_MG513: MG513__c + 76 H2O__c -> 17 AMP__c + 20 CMP__c + 23 GMP__c + 17 UMP__c + 76 H__c; k_dcy_MG513*MG513__c; RNA_decay_MG513 is "RNA decay (MG513)";
  RNA_decay_MG514: MG514__c + 74 H2O__c -> 16 AMP__c + 23 CMP__c + 22 GMP__c + 14 UMP__c + 74 H__c; k_dcy_MG514*MG514__c; RNA_decay_MG514 is "RNA decay (MG514)";
  RNA_decay_TU_224: TU_224__c + 1676 H2O__c -> 618 AMP__c + 303 CMP__c + 251 GMP__c + 505 UMP__c + 1676 H__c; k_dcy_TU_224*TU_224__c; RNA_decay_TU_224 is "RNA decay (MG_322)";
  RNA_decay_TU_225: TU_225__c + 683 H2O__c -> 208 AMP__c + 125 CMP__c + 101 GMP__c + 250 UMP__c + 683 H__c; k_dcy_TU_225*TU_225__c; RNA_decay_TU_225 is "RNA decay (MG_323)";
  RNA_decay_MG_0003: MG_0003__c + 377 H2O__c -> 106 AMP__c + 82 CMP__c + 53 GMP__c + 137 UMP__c + 377 H__c; k_dcy_MG_0003*MG_0003__c; RNA_decay_MG_0003 is "RNA decay (Rnase P RNA, MCS5, M1 RNA)";
  RNA_decay_MG_0004: MG_0004__c + 387 H2O__c -> 124 AMP__c + 65 CMP__c + 79 GMP__c + 120 UMP__c + 387 H__c; k_dcy_MG_0004*MG_0004__c; RNA_decay_MG_0004 is "RNA decay (transfer-messenger RNA, tmRNA, MCS6, 10Sa RNA)";
  RNA_decay_TU_228: TU_228__c + 1979 H2O__c -> 699 AMP__c + 343 CMP__c + 278 GMP__c + 660 UMP__c + 1979 H__c; k_dcy_TU_228*TU_228__c; RNA_decay_TU_228 is "RNA decay (MG_324, MG_325, MG_515)";
  RNA_decay_TU_229: TU_229__c + 887 H2O__c -> 304 AMP__c + 154 CMP__c + 116 GMP__c + 314 UMP__c + 887 H__c; k_dcy_TU_229*TU_229__c; RNA_decay_TU_229 is "RNA decay (MG_326)";
  RNA_decay_TU_230: TU_230__c + 806 H2O__c -> 277 AMP__c + 127 CMP__c + 114 GMP__c + 289 UMP__c + 806 H__c; k_dcy_TU_230*TU_230__c; RNA_decay_TU_230 is "RNA decay (MG_327)";
  RNA_decay_TU_231: TU_231__c + 2270 H2O__c -> 620 AMP__c + 362 CMP__c + 302 GMP__c + 987 UMP__c + 2270 H__c; k_dcy_TU_231*TU_231__c; RNA_decay_TU_231 is "RNA decay (MG_328)";
  RNA_decay_TU_232: TU_232__c + 1346 H2O__c -> 429 AMP__c + 222 CMP__c + 207 GMP__c + 489 UMP__c + 1346 H__c; k_dcy_TU_232*TU_232__c; RNA_decay_TU_232 is "RNA decay (MG_329)";
  RNA_decay_TU_233: TU_233__c + 2607 H2O__c -> 862 AMP__c + 420 CMP__c + 340 GMP__c + 986 UMP__c + 2607 H__c; k_dcy_TU_233*TU_233__c; RNA_decay_TU_233 is "RNA decay (MG_330 - MG_333)";
  RNA_decay_TU_234: TU_234__c + 2513 H2O__c -> 835 AMP__c + 362 CMP__c + 358 GMP__c + 959 UMP__c + 2513 H__c; k_dcy_TU_234*TU_234__c; RNA_decay_TU_234 is "RNA decay (MG_334)";
  RNA_decay_TU_235: TU_235__c + 575 H2O__c -> 206 AMP__c + 95 CMP__c + 62 GMP__c + 213 UMP__c + 575 H__c; k_dcy_TU_235*TU_235__c; RNA_decay_TU_235 is "RNA decay (MG_335)";
  RNA_decay_TU_236: TU_236__c + 221 H2O__c -> 68 AMP__c + 36 CMP__c + 34 GMP__c + 84 UMP__c + 221 H__c; k_dcy_TU_236*TU_236__c; RNA_decay_TU_236 is "RNA decay (MG_516)";
  RNA_decay_TU_237: TU_237__c + 1025 H2O__c -> 381 AMP__c + 141 CMP__c + 116 GMP__c + 388 UMP__c + 1025 H__c; k_dcy_TU_237*TU_237__c; RNA_decay_TU_237 is "RNA decay (MG_517)";
  RNA_decay_TU_238: TU_238__c + 1226 H2O__c -> 415 AMP__c + 154 CMP__c + 176 GMP__c + 482 UMP__c + 1226 H__c; k_dcy_TU_238*TU_238__c; RNA_decay_TU_238 is "RNA decay (MG_336)";
  RNA_decay_TU_239: TU_239__c + 416 H2O__c -> 139 AMP__c + 56 CMP__c + 41 GMP__c + 181 UMP__c + 416 H__c; k_dcy_TU_239*TU_239__c; RNA_decay_TU_239 is "RNA decay (MG_337)";
  RNA_decay_TU_240: TU_240__c + 3812 H2O__c -> 1223 AMP__c + 563 CMP__c + 558 GMP__c + 1469 UMP__c + 3812 H__c; k_dcy_TU_240*TU_240__c; RNA_decay_TU_240 is "RNA decay (MG_338)";
  RNA_decay_TU_241: TU_241__c + 953 H2O__c -> 303 AMP__c + 173 CMP__c + 123 GMP__c + 355 UMP__c + 953 H__c; k_dcy_TU_241*TU_241__c; RNA_decay_TU_241 is "RNA decay (MG_339)";
  RNA_decay_TU_242: TU_242__c + 8060 H2O__c -> 2479 AMP__c + 1546 CMP__c + 1242 GMP__c + 2794 UMP__c + 8060 H__c; k_dcy_TU_242*TU_242__c; RNA_decay_TU_242 is "RNA decay (MG_340 - MG_341)";
  RNA_decay_TU_243: TU_243__c + 506 H2O__c -> 178 AMP__c + 83 CMP__c + 68 GMP__c + 178 UMP__c + 506 H__c; k_dcy_TU_243*TU_243__c; RNA_decay_TU_243 is "RNA decay (MG_342)";
  RNA_decay_TU_244: TU_244__c + 1040 H2O__c -> 373 AMP__c + 133 CMP__c + 127 GMP__c + 408 UMP__c + 1040 H__c; k_dcy_TU_244*TU_244__c; RNA_decay_TU_244 is "RNA decay (MG_343)";
  RNA_decay_TU_245: TU_245__c + 821 H2O__c -> 282 AMP__c + 117 CMP__c + 111 GMP__c + 312 UMP__c + 821 H__c; k_dcy_TU_245*TU_245__c; RNA_decay_TU_245 is "RNA decay (MG_344)";
  RNA_decay_TU_246: TU_246__c + 2687 H2O__c -> 907 AMP__c + 383 CMP__c + 348 GMP__c + 1050 UMP__c + 2687 H__c; k_dcy_TU_246*TU_246__c; RNA_decay_TU_246 is "RNA decay (MG_345)";
  RNA_decay_TU_247: TU_247__c + 1123 H2O__c -> 381 AMP__c + 153 CMP__c + 149 GMP__c + 441 UMP__c + 1123 H__c; k_dcy_TU_247*TU_247__c; RNA_decay_TU_247 is "RNA decay (MG_346 - MG_347)";
  RNA_decay_MG518: MG518__c + 75 H2O__c -> 20 AMP__c + 22 CMP__c + 19 GMP__c + 15 UMP__c + 75 H__c; k_dcy_MG518*MG518__c; RNA_decay_MG518 is "RNA decay (MG518)";
  RNA_decay_TU_249: TU_249__c + 968 H2O__c -> 302 AMP__c + 184 CMP__c + 157 GMP__c + 326 UMP__c + 968 H__c; k_dcy_TU_249*TU_249__c; RNA_decay_TU_249 is "RNA decay (MG_348)";
  RNA_decay_MG519: MG519__c + 87 H2O__c -> 22 AMP__c + 29 CMP__c + 18 GMP__c + 19 UMP__c + 87 H__c; k_dcy_MG519*MG519__c; RNA_decay_MG519 is "RNA decay (MG519)";
  RNA_decay_TU_251: TU_251__c + 2149 H2O__c -> 710 AMP__c + 314 CMP__c + 268 GMP__c + 858 UMP__c + 2149 H__c; k_dcy_TU_251*TU_251__c; RNA_decay_TU_251 is "RNA decay (MG_349 - MG_350)";
  RNA_decay_MG520: MG520__c + 81 H2O__c -> 15 AMP__c + 24 CMP__c + 21 GMP__c + 22 UMP__c + 81 H__c; k_dcy_MG520*MG520__c; RNA_decay_MG520 is "RNA decay (MG520)";
  RNA_decay_TU_253: TU_253__c + 674 H2O__c -> 300 AMP__c + 94 CMP__c + 92 GMP__c + 189 UMP__c + 674 H__c; k_dcy_TU_253*TU_253__c; RNA_decay_TU_253 is "RNA decay (MG_521)";
  RNA_decay_TU_254: TU_254__c + 554 H2O__c -> 182 AMP__c + 92 CMP__c + 65 GMP__c + 216 UMP__c + 554 H__c; k_dcy_TU_254*TU_254__c; RNA_decay_TU_254 is "RNA decay (MG_351)";
  RNA_decay_TU_255: TU_255__c + 500 H2O__c -> 154 AMP__c + 73 CMP__c + 74 GMP__c + 200 UMP__c + 500 H__c; k_dcy_TU_255*TU_255__c; RNA_decay_TU_255 is "RNA decay (MG_352)";
  RNA_decay_TU_256: TU_256__c + 329 H2O__c -> 84 AMP__c + 57 CMP__c + 49 GMP__c + 140 UMP__c + 329 H__c; k_dcy_TU_256*TU_256__c; RNA_decay_TU_256 is "RNA decay (MG_353)";
  RNA_decay_TU_257: TU_257__c + 413 H2O__c -> 141 AMP__c + 52 CMP__c + 59 GMP__c + 162 UMP__c + 413 H__c; k_dcy_TU_257*TU_257__c; RNA_decay_TU_257 is "RNA decay (MG_354)";
  RNA_decay_TU_258: TU_258__c + 2144 H2O__c -> 653 AMP__c + 379 CMP__c + 288 GMP__c + 825 UMP__c + 2144 H__c; k_dcy_TU_258*TU_258__c; RNA_decay_TU_258 is "RNA decay (MG_355)";
  RNA_decay_TU_259: TU_259__c + 842 H2O__c -> 305 AMP__c + 122 CMP__c + 109 GMP__c + 307 UMP__c + 842 H__c; k_dcy_TU_259*TU_259__c; RNA_decay_TU_259 is "RNA decay (MG_356)";
  RNA_decay_TU_260: TU_260__c + 1181 H2O__c -> 391 AMP__c + 207 CMP__c + 142 GMP__c + 442 UMP__c + 1181 H__c; k_dcy_TU_260*TU_260__c; RNA_decay_TU_260 is "RNA decay (MG_357)";
  RNA_decay_TU_261: TU_261__c + 1515 H2O__c -> 465 AMP__c + 242 CMP__c + 187 GMP__c + 622 UMP__c + 1515 H__c; k_dcy_TU_261*TU_261__c; RNA_decay_TU_261 is "RNA decay (MG_358 - MG_359)";
  RNA_decay_TU_262: TU_262__c + 1235 H2O__c -> 449 AMP__c + 170 CMP__c + 144 GMP__c + 473 UMP__c + 1235 H__c; k_dcy_TU_262*TU_262__c; RNA_decay_TU_262 is "RNA decay (MG_360)";
  RNA_decay_TU_263: TU_263__c + 1055 H2O__c -> 320 AMP__c + 216 CMP__c + 129 GMP__c + 391 UMP__c + 1055 H__c; k_dcy_TU_263*TU_263__c; RNA_decay_TU_263 is "RNA decay (MG_361 - MG_363)";
  RNA_decay_TU_264: TU_264__c + 266 H2O__c -> 76 AMP__c + 33 CMP__c + 32 GMP__c + 126 UMP__c + 266 H__c; k_dcy_TU_264*TU_264__c; RNA_decay_TU_264 is "RNA decay (MG_522)";
  RNA_decay_TU_265: TU_265__c + 674 H2O__c -> 174 AMP__c + 120 CMP__c + 78 GMP__c + 303 UMP__c + 674 H__c; k_dcy_TU_265*TU_265__c; RNA_decay_TU_265 is "RNA decay (MG_364)";
  RNA_decay_TU_266: TU_266__c + 935 H2O__c -> 312 AMP__c + 144 CMP__c + 118 GMP__c + 362 UMP__c + 935 H__c; k_dcy_TU_266*TU_266__c; RNA_decay_TU_266 is "RNA decay (MG_365)";
  RNA_decay_TU_267: TU_267__c + 2003 H2O__c -> 711 AMP__c + 248 CMP__c + 213 GMP__c + 832 UMP__c + 2003 H__c; k_dcy_TU_267*TU_267__c; RNA_decay_TU_267 is "RNA decay (MG_366)";
  RNA_decay_TU_268: TU_268__c + 3437 H2O__c -> 1139 AMP__c + 582 CMP__c + 436 GMP__c + 1281 UMP__c + 3437 H__c; k_dcy_TU_268*TU_268__c; RNA_decay_TU_268 is "RNA decay (MG_367 - MG_369)";
  RNA_decay_TU_269: TU_269__c + 971 H2O__c -> 321 AMP__c + 127 CMP__c + 133 GMP__c + 391 UMP__c + 971 H__c; k_dcy_TU_269*TU_269__c; RNA_decay_TU_269 is "RNA decay (MG_370)";
  RNA_decay_TU_270: TU_270__c + 974 H2O__c -> 324 AMP__c + 161 CMP__c + 144 GMP__c + 346 UMP__c + 974 H__c; k_dcy_TU_270*TU_270__c; RNA_decay_TU_270 is "RNA decay (MG_371)";
  RNA_decay_TU_271: TU_271__c + 4501 H2O__c -> 1569 AMP__c + 704 CMP__c + 538 GMP__c + 1691 UMP__c + 4501 H__c; k_dcy_TU_271*TU_271__c; RNA_decay_TU_271 is "RNA decay (MG_372 - MG_375)";
  RNA_decay_TU_272: TU_272__c + 314 H2O__c -> 98 AMP__c + 55 CMP__c + 39 GMP__c + 123 UMP__c + 314 H__c; k_dcy_TU_272*TU_272__c; RNA_decay_TU_272 is "RNA decay (MG_376)";
  RNA_decay_TU_273: TU_273__c + 581 H2O__c -> 194 AMP__c + 97 CMP__c + 65 GMP__c + 226 UMP__c + 581 H__c; k_dcy_TU_273*TU_273__c; RNA_decay_TU_273 is "RNA decay (MG_377)";
  RNA_decay_TU_274: TU_274__c + 1613 H2O__c -> 575 AMP__c + 238 CMP__c + 196 GMP__c + 605 UMP__c + 1613 H__c; k_dcy_TU_274*TU_274__c; RNA_decay_TU_274 is "RNA decay (MG_378)";
  RNA_decay_TU_275: TU_275__c + 3058 H2O__c -> 983 AMP__c + 437 CMP__c + 395 GMP__c + 1244 UMP__c + 3058 H__c; k_dcy_TU_275*TU_275__c; RNA_decay_TU_275 is "RNA decay (MG_379 - MG_381)";
  RNA_decay_MG523: MG523__c + 75 H2O__c -> 19 AMP__c + 22 CMP__c + 21 GMP__c + 14 UMP__c + 75 H__c; k_dcy_MG523*MG523__c; RNA_decay_MG523 is "RNA decay (MG523)";
  RNA_decay_TU_277: TU_277__c + 641 H2O__c -> 192 AMP__c + 114 CMP__c + 77 GMP__c + 259 UMP__c + 641 H__c; k_dcy_TU_277*TU_277__c; RNA_decay_TU_277 is "RNA decay (MG_382)";
  RNA_decay_TU_278: TU_278__c + 746 H2O__c -> 249 AMP__c + 125 CMP__c + 98 GMP__c + 275 UMP__c + 746 H__c; k_dcy_TU_278*TU_278__c; RNA_decay_TU_278 is "RNA decay (MG_383)";
  RNA_decay_TU_279: TU_279__c + 1301 H2O__c -> 437 AMP__c + 242 CMP__c + 152 GMP__c + 471 UMP__c + 1301 H__c; k_dcy_TU_279*TU_279__c; RNA_decay_TU_279 is "RNA decay (MG_384)";
  RNA_decay_TU_280: TU_280__c + 1330 H2O__c -> 507 AMP__c + 174 CMP__c + 167 GMP__c + 483 UMP__c + 1330 H__c; k_dcy_TU_280*TU_280__c; RNA_decay_TU_280 is "RNA decay (MG_385, MG_524)";
  RNA_decay_TU_281: TU_281__c + 4850 H2O__c -> 1387 AMP__c + 808 CMP__c + 759 GMP__c + 1897 UMP__c + 4850 H__c; k_dcy_TU_281*TU_281__c; RNA_decay_TU_281 is "RNA decay (MG_386)";
  RNA_decay_TU_282: TU_282__c + 1324 H2O__c -> 452 AMP__c + 189 CMP__c + 173 GMP__c + 511 UMP__c + 1324 H__c; k_dcy_TU_282*TU_282__c; RNA_decay_TU_282 is "RNA decay (MG_387 - MG_388)";
  RNA_decay_TU_283: TU_283__c + 383 H2O__c -> 127 AMP__c + 50 CMP__c + 49 GMP__c + 158 UMP__c + 383 H__c; k_dcy_TU_283*TU_283__c; RNA_decay_TU_283 is "RNA decay (MG_389)";
  RNA_decay_TU_284: TU_284__c + 1982 H2O__c -> 702 AMP__c + 304 CMP__c + 252 GMP__c + 725 UMP__c + 1982 H__c; k_dcy_TU_284*TU_284__c; RNA_decay_TU_284 is "RNA decay (MG_390)";
  RNA_decay_TU_285: TU_285__c + 3336 H2O__c -> 997 AMP__c + 651 CMP__c + 472 GMP__c + 1217 UMP__c + 3336 H__c; k_dcy_TU_285*TU_285__c; RNA_decay_TU_285 is "RNA decay (MG_391 - MG_393)";
  RNA_decay_TU_286: TU_286__c + 1220 H2O__c -> 413 AMP__c + 224 CMP__c + 191 GMP__c + 393 UMP__c + 1220 H__c; k_dcy_TU_286*TU_286__c; RNA_decay_TU_286 is "RNA decay (MG_394)";
  RNA_decay_TU_287: TU_287__c + 1574 H2O__c -> 474 AMP__c + 241 CMP__c + 239 GMP__c + 621 UMP__c + 1574 H__c; k_dcy_TU_287*TU_287__c; RNA_decay_TU_287 is "RNA decay (MG_395)";
  RNA_decay_TU_288: TU_288__c + 2159 H2O__c -> 754 AMP__c + 309 CMP__c + 277 GMP__c + 820 UMP__c + 2159 H__c; k_dcy_TU_288*TU_288__c; RNA_decay_TU_288 is "RNA decay (MG_396 - MG_397)";
  RNA_decay_TU_289: TU_289__c + 401 H2O__c -> 127 AMP__c + 63 CMP__c + 53 GMP__c + 159 UMP__c + 401 H__c; k_dcy_TU_289*TU_289__c; RNA_decay_TU_289 is "RNA decay (MG_398)";
  RNA_decay_TU_290: TU_290__c + 1430 H2O__c -> 460 AMP__c + 282 CMP__c + 210 GMP__c + 479 UMP__c + 1430 H__c; k_dcy_TU_290*TU_290__c; RNA_decay_TU_290 is "RNA decay (MG_399)";
  RNA_decay_TU_291: TU_291__c + 2395 H2O__c -> 778 AMP__c + 418 CMP__c + 329 GMP__c + 871 UMP__c + 2395 H__c; k_dcy_TU_291*TU_291__c; RNA_decay_TU_291 is "RNA decay (MG_400 - MG_401)";
  RNA_decay_TU_292: TU_292__c + 2341 H2O__c -> 845 AMP__c + 383 CMP__c + 302 GMP__c + 812 UMP__c + 2341 H__c; k_dcy_TU_292*TU_292__c; RNA_decay_TU_292 is "RNA decay (MG_402 - MG_405)";
  RNA_decay_TU_293: TU_293__c + 476 H2O__c -> 203 AMP__c + 62 CMP__c + 61 GMP__c + 151 UMP__c + 476 H__c; k_dcy_TU_293*TU_293__c; RNA_decay_TU_293 is "RNA decay (MG_406)";
  RNA_decay_TU_294: TU_294__c + 1376 H2O__c -> 411 AMP__c + 249 CMP__c + 200 GMP__c + 517 UMP__c + 1376 H__c; k_dcy_TU_294*TU_294__c; RNA_decay_TU_294 is "RNA decay (MG_407)";
  RNA_decay_TU_295: TU_295__c + 473 H2O__c -> 153 AMP__c + 80 CMP__c + 52 GMP__c + 189 UMP__c + 473 H__c; k_dcy_TU_295*TU_295__c; RNA_decay_TU_295 is "RNA decay (MG_408)";
  RNA_decay_TU_296: TU_296__c + 4751 H2O__c -> 1690 AMP__c + 694 CMP__c + 636 GMP__c + 1732 UMP__c + 4751 H__c; k_dcy_TU_296*TU_296__c; RNA_decay_TU_296 is "RNA decay (MG_409 - MG_412)";
  RNA_decay_TU_297: TU_297__c + 3110 H2O__c -> 1043 AMP__c + 426 CMP__c + 373 GMP__c + 1269 UMP__c + 3110 H__c; k_dcy_TU_297*TU_297__c; RNA_decay_TU_297 is "RNA decay (MG_414)";
  RNA_decay_TU_298: TU_298__c + 1994 H2O__c -> 696 AMP__c + 238 CMP__c + 214 GMP__c + 847 UMP__c + 1994 H__c; k_dcy_TU_298*TU_298__c; RNA_decay_TU_298 is "RNA decay (MG_525)";
  RNA_decay_TU_299: TU_299__c + 398 H2O__c -> 124 AMP__c + 73 CMP__c + 56 GMP__c + 146 UMP__c + 398 H__c; k_dcy_TU_299*TU_299__c; RNA_decay_TU_299 is "RNA decay (MG_417)";
  RNA_decay_TU_300: TU_300__c + 440 H2O__c -> 126 AMP__c + 81 CMP__c + 53 GMP__c + 181 UMP__c + 440 H__c; k_dcy_TU_300*TU_300__c; RNA_decay_TU_300 is "RNA decay (MG_418)";
  RNA_decay_TU_301: TU_301__c + 8865 H2O__c -> 2974 AMP__c + 1316 CMP__c + 1155 GMP__c + 3421 UMP__c + 8865 H__c; k_dcy_TU_301*TU_301__c; RNA_decay_TU_301 is "RNA decay (MG_419, MG_421, MG_422, MG_423)";
  RNA_decay_TU_302: TU_302__c + 260 H2O__c -> 70 AMP__c + 39 CMP__c + 40 GMP__c + 112 UMP__c + 260 H__c; k_dcy_TU_302*TU_302__c; RNA_decay_TU_302 is "RNA decay (MG_424)";
  RNA_decay_TU_303: TU_303__c + 1349 H2O__c -> 401 AMP__c + 198 CMP__c + 212 GMP__c + 539 UMP__c + 1349 H__c; k_dcy_TU_303*TU_303__c; RNA_decay_TU_303 is "RNA decay (MG_425)";
  RNA_decay_TU_304: TU_304__c + 194 H2O__c -> 51 AMP__c + 27 CMP__c + 35 GMP__c + 82 UMP__c + 194 H__c; k_dcy_TU_304*TU_304__c; RNA_decay_TU_304 is "RNA decay (MG_426)";
  RNA_decay_TU_305: TU_305__c + 425 H2O__c -> 130 AMP__c + 78 CMP__c + 73 GMP__c + 145 UMP__c + 425 H__c; k_dcy_TU_305*TU_305__c; RNA_decay_TU_305 is "RNA decay (MG_427)";
  RNA_decay_TU_306: TU_306__c + 515 H2O__c -> 165 AMP__c + 84 CMP__c + 59 GMP__c + 208 UMP__c + 515 H__c; k_dcy_TU_306*TU_306__c; RNA_decay_TU_306 is "RNA decay (MG_428)";
  RNA_decay_TU_307: TU_307__c + 3972 H2O__c -> 1297 AMP__c + 667 CMP__c + 544 GMP__c + 1465 UMP__c + 3972 H__c; k_dcy_TU_307*TU_307__c; RNA_decay_TU_307 is "RNA decay (MG_429 - MG_431)";
  RNA_decay_TU_308: TU_308__c + 1196 H2O__c -> 481 AMP__c + 184 CMP__c + 164 GMP__c + 368 UMP__c + 1196 H__c; k_dcy_TU_308*TU_308__c; RNA_decay_TU_308 is "RNA decay (MG_432)";
  RNA_decay_TU_309: TU_309__c + 896 H2O__c -> 256 AMP__c + 149 CMP__c + 95 GMP__c + 397 UMP__c + 896 H__c; k_dcy_TU_309*TU_309__c; RNA_decay_TU_309 is "RNA decay (MG_433)";
  RNA_decay_TU_310: TU_310__c + 731 H2O__c -> 239 AMP__c + 118 CMP__c + 104 GMP__c + 271 UMP__c + 731 H__c; k_dcy_TU_310*TU_310__c; RNA_decay_TU_310 is "RNA decay (MG_434)";
  RNA_decay_TU_311: TU_311__c + 551 H2O__c -> 152 AMP__c + 82 CMP__c + 71 GMP__c + 247 UMP__c + 551 H__c; k_dcy_TU_311*TU_311__c; RNA_decay_TU_311 is "RNA decay (MG_435)";
  RNA_decay_TU_312: TU_312__c + 1193 H2O__c -> 482 AMP__c + 197 CMP__c + 162 GMP__c + 353 UMP__c + 1193 H__c; k_dcy_TU_312*TU_312__c; RNA_decay_TU_312 is "RNA decay (MG_437)";
  RNA_decay_TU_313: TU_313__c + 1151 H2O__c -> 361 AMP__c + 199 CMP__c + 151 GMP__c + 441 UMP__c + 1151 H__c; k_dcy_TU_313*TU_313__c; RNA_decay_TU_313 is "RNA decay (MG_438)";
  RNA_decay_TU_314: TU_314__c + 818 H2O__c -> 285 AMP__c + 130 CMP__c + 107 GMP__c + 297 UMP__c + 818 H__c; k_dcy_TU_314*TU_314__c; RNA_decay_TU_314 is "RNA decay (MG_439)";
  RNA_decay_TU_315: TU_315__c + 1329 H2O__c -> 482 AMP__c + 194 CMP__c + 158 GMP__c + 496 UMP__c + 1329 H__c; k_dcy_TU_315*TU_315__c; RNA_decay_TU_315 is "RNA decay (MG_440 - MG_441)";
  RNA_decay_TU_316: TU_316__c + 1971 H2O__c -> 734 AMP__c + 293 CMP__c + 259 GMP__c + 686 UMP__c + 1971 H__c; k_dcy_TU_316*TU_316__c; RNA_decay_TU_316 is "RNA decay (MG_442 - MG_443)";
  RNA_decay_TU_317: TU_317__c + 1325 H2O__c -> 407 AMP__c + 244 CMP__c + 164 GMP__c + 511 UMP__c + 1325 H__c; k_dcy_TU_317*TU_317__c; RNA_decay_TU_317 is "RNA decay (MG_444 - MG_446)";
  RNA_decay_TU_318: TU_318__c + 1643 H2O__c -> 667 AMP__c + 225 CMP__c + 215 GMP__c + 537 UMP__c + 1643 H__c; k_dcy_TU_318*TU_318__c; RNA_decay_TU_318 is "RNA decay (MG_447)";
  RNA_decay_TU_319: TU_319__c + 452 H2O__c -> 142 AMP__c + 79 CMP__c + 69 GMP__c + 163 UMP__c + 452 H__c; k_dcy_TU_319*TU_319__c; RNA_decay_TU_319 is "RNA decay (MG_448)";
  RNA_decay_TU_320: TU_320__c + 685 H2O__c -> 232 AMP__c + 118 CMP__c + 77 GMP__c + 259 UMP__c + 685 H__c; k_dcy_TU_320*TU_320__c; RNA_decay_TU_320 is "RNA decay (MG_449)";
  RNA_decay_TU_321: TU_321__c + 2056 H2O__c -> 625 AMP__c + 414 CMP__c + 321 GMP__c + 697 UMP__c + 2056 H__c; k_dcy_TU_321*TU_321__c; RNA_decay_TU_321 is "RNA decay (MG_450 - MG_451)";
  RNA_decay_TU_322: TU_322__c + 1648 H2O__c -> 585 AMP__c + 251 CMP__c + 227 GMP__c + 586 UMP__c + 1648 H__c; k_dcy_TU_322*TU_322__c; RNA_decay_TU_322 is "RNA decay (MG_452 - MG_453)";
  RNA_decay_TU_323: TU_323__c + 467 H2O__c -> 161 AMP__c + 71 CMP__c + 65 GMP__c + 171 UMP__c + 467 H__c; k_dcy_TU_323*TU_323__c; RNA_decay_TU_323 is "RNA decay (MG_454)";
  RNA_decay_TU_324: TU_324__c + 1190 H2O__c -> 368 AMP__c + 181 CMP__c + 144 GMP__c + 498 UMP__c + 1190 H__c; k_dcy_TU_324*TU_324__c; RNA_decay_TU_324 is "RNA decay (MG_455)";
  RNA_decay_TU_325: TU_325__c + 1004 H2O__c -> 349 AMP__c + 143 CMP__c + 133 GMP__c + 380 UMP__c + 1004 H__c; k_dcy_TU_325*TU_325__c; RNA_decay_TU_325 is "RNA decay (MG_456)";
  RNA_decay_TU_326: TU_326__c + 2108 H2O__c -> 650 AMP__c + 416 CMP__c + 314 GMP__c + 729 UMP__c + 2108 H__c; k_dcy_TU_326*TU_326__c; RNA_decay_TU_326 is "RNA decay (MG_457)";
  RNA_decay_TU_327: TU_327__c + 527 H2O__c -> 189 AMP__c + 88 CMP__c + 74 GMP__c + 177 UMP__c + 527 H__c; k_dcy_TU_327*TU_327__c; RNA_decay_TU_327 is "RNA decay (MG_458)";
  RNA_decay_TU_328: TU_328__c + 509 H2O__c -> 161 AMP__c + 89 CMP__c + 63 GMP__c + 197 UMP__c + 509 H__c; k_dcy_TU_328*TU_328__c; RNA_decay_TU_328 is "RNA decay (MG_459)";
  RNA_decay_TU_329: TU_329__c + 938 H2O__c -> 290 AMP__c + 190 CMP__c + 125 GMP__c + 334 UMP__c + 938 H__c; k_dcy_TU_329*TU_329__c; RNA_decay_TU_329 is "RNA decay (MG_460)";
  RNA_decay_TU_330: TU_330__c + 2712 H2O__c -> 907 AMP__c + 422 CMP__c + 375 GMP__c + 1009 UMP__c + 2712 H__c; k_dcy_TU_330*TU_330__c; RNA_decay_TU_330 is "RNA decay (MG_461 - MG_462)";
  RNA_decay_TU_331: TU_331__c + 2287 H2O__c -> 802 AMP__c + 359 CMP__c + 336 GMP__c + 791 UMP__c + 2287 H__c; k_dcy_TU_331*TU_331__c; RNA_decay_TU_331 is "RNA decay (MG_463 - MG_465)";
  RNA_decay_TU_332: TU_332__c + 146 H2O__c -> 34 AMP__c + 31 CMP__c + 29 GMP__c + 53 UMP__c + 146 H__c; k_dcy_TU_332*TU_332__c; RNA_decay_TU_332 is "RNA decay (MG_466)";
  RNA_decay_TU_333: TU_333__c + 6290 H2O__c -> 2130 AMP__c + 996 CMP__c + 947 GMP__c + 2218 UMP__c + 6290 H__c; k_dcy_TU_333*TU_333__c; RNA_decay_TU_333 is "RNA decay (MG_467 - MG_468)";
  RNA_decay_TU_334: TU_334__c + 854 H2O__c -> 271 AMP__c + 136 CMP__c + 117 GMP__c + 331 UMP__c + 854 H__c; k_dcy_TU_334*TU_334__c; RNA_decay_TU_334 is "RNA decay (MG_526)";
  RNA_decay_TU_335: TU_335__c + 2765 H2O__c -> 887 AMP__c + 405 CMP__c + 378 GMP__c + 1096 UMP__c + 2765 H__c; k_dcy_TU_335*TU_335__c; RNA_decay_TU_335 is "RNA decay (MG_469 - MG_470)";
  RNA_decay_MG471_aa: MG471_aa__c + 76 H2O__c -> 19 AMP__c + 21 CMP__c + 18 GMP__c + 18 UMP__c + ALA__c + 76 H__c; k_dcy_MG471_aa*MG471_aa__c; RNA_decay_MG471_aa is "RNA decay, aminoacylated (MG471)";
  RNA_decay_MG472_aa: MG472_aa__c + 77 H2O__c -> 20 AMP__c + 20 CMP__c + 17 GMP__c + 20 UMP__c + ILE__c + 77 H__c; k_dcy_MG472_aa*MG472_aa__c; RNA_decay_MG472_aa is "RNA decay, aminoacylated (MG472)";
  RNA_decay_MG475_aa: MG475_aa__c + 89 H2O__c -> 21 AMP__c + 27 CMP__c + 23 GMP__c + 18 UMP__c + SER__c + 89 H__c; k_dcy_MG475_aa*MG475_aa__c; RNA_decay_MG475_aa is "RNA decay, aminoacylated (MG475)";
  RNA_decay_MG479_aa: MG479_aa__c + 74 H2O__c -> 17 AMP__c + 20 CMP__c + 15 GMP__c + 22 UMP__c + THR__c + 74 H__c; k_dcy_MG479_aa*MG479_aa__c; RNA_decay_MG479_aa is "RNA decay, aminoacylated (MG479)";
  RNA_decay_MG483_aa: MG483_aa__c + 77 H2O__c -> 16 AMP__c + 19 CMP__c + 24 GMP__c + 18 UMP__c + CYS__c + 77 H__c; k_dcy_MG483_aa*MG483_aa__c; RNA_decay_MG483_aa is "RNA decay, aminoacylated (MG483)";
  RNA_decay_MG484_aa: MG484_aa__c + 77 H2O__c -> 20 AMP__c + 24 CMP__c + 17 GMP__c + 16 UMP__c + PRO__c + 77 H__c; k_dcy_MG484_aa*MG484_aa__c; RNA_decay_MG484_aa is "RNA decay, aminoacylated (MG484)";
  RNA_decay_MG485_aa: MG485_aa__c + 77 H2O__c -> 19 AMP__c + 23 CMP__c + 22 GMP__c + 13 UMP__c + MET__c + 77 H__c; k_dcy_MG485_aa*MG485_aa__c; RNA_decay_MG485_aa is "RNA decay, aminoacylated (MG485)";
  RNA_decay_MG486_aa: MG486_aa__c + 77 H2O__c -> 22 AMP__c + 16 CMP__c + 20 GMP__c + 19 UMP__c + ILE__c + 77 H__c; k_dcy_MG486_aa*MG486_aa__c; RNA_decay_MG486_aa is "RNA decay, aminoacylated (MG486)";
  RNA_decay_MG487_aa: MG487_aa__c + 92 H2O__c -> 19 AMP__c + 27 CMP__c + 24 GMP__c + 22 UMP__c + SER__c + 92 H__c; k_dcy_MG487_aa*MG487_aa__c; RNA_decay_MG487_aa is "RNA decay, aminoacylated (MG487)";
  RNA_decay_MG488_aa: MG488_aa__c + 77 H2O__c -> 16 AMP__c + 21 CMP__c + 22 GMP__c + 18 UMP__c + FMET__c + 77 H__c; k_dcy_MG488_aa*MG488_aa__c; RNA_decay_MG488_aa is "RNA decay, aminoacylated (MG488)";
  RNA_decay_MG489_aa: MG489_aa__c + 74 H2O__c -> 21 AMP__c + 23 CMP__c + 17 GMP__c + 13 UMP__c + ASP__c + 74 H__c; k_dcy_MG489_aa*MG489_aa__c; RNA_decay_MG489_aa is "RNA decay, aminoacylated (MG489)";
  RNA_decay_MG490_aa: MG490_aa__c + 76 H2O__c -> 17 AMP__c + 23 CMP__c + 20 GMP__c + 16 UMP__c + PHE__c + 76 H__c; k_dcy_MG490_aa*MG490_aa__c; RNA_decay_MG490_aa is "RNA decay, aminoacylated (MG490)";
  RNA_decay_MG492_aa: MG492_aa__c + 77 H2O__c -> 20 AMP__c + 23 CMP__c + 16 GMP__c + 18 UMP__c + ARG__c + 77 H__c; k_dcy_MG492_aa*MG492_aa__c; RNA_decay_MG492_aa is "RNA decay, aminoacylated (MG492)";
  RNA_decay_MG493_aa: MG493_aa__c + 74 H2O__c -> 21 AMP__c + 17 CMP__c + 16 GMP__c + 20 UMP__c + GLY__c + 74 H__c; k_dcy_MG493_aa*MG493_aa__c; RNA_decay_MG493_aa is "RNA decay, aminoacylated (MG493)";
  RNA_decay_MG495_aa: MG495_aa__c + 75 H2O__c -> 17 AMP__c + 17 CMP__c + 19 GMP__c + 22 UMP__c + ARG__c + 75 H__c; k_dcy_MG495_aa*MG495_aa__c; RNA_decay_MG495_aa is "RNA decay, aminoacylated (MG495)";
  RNA_decay_MG496_aa: MG496_aa__c + 74 H2O__c -> 20 AMP__c + 20 CMP__c + 19 GMP__c + 15 UMP__c + TRP__c + 74 H__c; k_dcy_MG496_aa*MG496_aa__c; RNA_decay_MG496_aa is "RNA decay, aminoacylated (MG496)";
  RNA_decay_MG497_aa: MG497_aa__c + 77 H2O__c -> 18 AMP__c + 24 CMP__c + 19 GMP__c + 16 UMP__c + ARG__c + 77 H__c; k_dcy_MG497_aa*MG497_aa__c; RNA_decay_MG497_aa is "RNA decay, aminoacylated (MG497)";
  RNA_decay_MG499_aa: MG499_aa__c + 74 H2O__c -> 22 AMP__c + 17 CMP__c + 18 GMP__c + 17 UMP__c + GLY__c + 74 H__c; k_dcy_MG499_aa*MG499_aa__c; RNA_decay_MG499_aa is "RNA decay, aminoacylated (MG499)";
  RNA_decay_MG500_aa: MG500_aa__c + 86 H2O__c -> 18 AMP__c + 28 CMP__c + 21 GMP__c + 19 UMP__c + LEU__c + 86 H__c; k_dcy_MG500_aa*MG500_aa__c; RNA_decay_MG500_aa is "RNA decay, aminoacylated (MG500)";
  RNA_decay_MG501_aa: MG501_aa__c + 75 H2O__c -> 19 AMP__c + 20 CMP__c + 19 GMP__c + 17 UMP__c + LYS__c + 75 H__c; k_dcy_MG501_aa*MG501_aa__c; RNA_decay_MG501_aa is "RNA decay, aminoacylated (MG501)";
  RNA_decay_MG502_aa: MG502_aa__c + 75 H2O__c -> 18 AMP__c + 18 CMP__c + 20 GMP__c + 19 UMP__c + GLN__c + 75 H__c; k_dcy_MG502_aa*MG502_aa__c; RNA_decay_MG502_aa is "RNA decay, aminoacylated (MG502)";
  RNA_decay_MG503_aa: MG503_aa__c + 87 H2O__c -> 23 AMP__c + 22 CMP__c + 22 GMP__c + 20 UMP__c + TYR__c + 87 H__c; k_dcy_MG503_aa*MG503_aa__c; RNA_decay_MG503_aa is "RNA decay, aminoacylated (MG503)";
  RNA_decay_MG504_aa: MG504_aa__c + 75 H2O__c -> 21 AMP__c + 20 CMP__c + 15 GMP__c + 19 UMP__c + TRP__c + 75 H__c; k_dcy_MG504_aa*MG504_aa__c; RNA_decay_MG504_aa is "RNA decay, aminoacylated (MG504)";
  RNA_decay_MG506_aa: MG506_aa__c + 91 H2O__c -> 20 AMP__c + 27 CMP__c + 19 GMP__c + 25 UMP__c + SER__c + 91 H__c; k_dcy_MG506_aa*MG506_aa__c; RNA_decay_MG506_aa is "RNA decay, aminoacylated (MG506)";
  RNA_decay_MG507_aa: MG507_aa__c + 89 H2O__c -> 19 AMP__c + 26 CMP__c + 23 GMP__c + 21 UMP__c + SER__c + 89 H__c; k_dcy_MG507_aa*MG507_aa__c; RNA_decay_MG507_aa is "RNA decay, aminoacylated (MG507)";
  RNA_decay_MG508_aa: MG508_aa__c + 85 H2O__c -> 21 AMP__c + 27 CMP__c + 19 GMP__c + 18 UMP__c + LEU__c + 85 H__c; k_dcy_MG508_aa*MG508_aa__c; RNA_decay_MG508_aa is "RNA decay, aminoacylated (MG508)";
  RNA_decay_MG509_aa: MG509_aa__c + 76 H2O__c -> 22 AMP__c + 18 CMP__c + 18 GMP__c + 18 UMP__c + LYS__c + 76 H__c; k_dcy_MG509_aa*MG509_aa__c; RNA_decay_MG509_aa is "RNA decay, aminoacylated (MG509)";
  RNA_decay_MG510_aa: MG510_aa__c + 76 H2O__c -> 21 AMP__c + 18 CMP__c + 16 GMP__c + 21 UMP__c + THR__c + 76 H__c; k_dcy_MG510_aa*MG510_aa__c; RNA_decay_MG510_aa is "RNA decay, aminoacylated (MG510)";
  RNA_decay_MG511_aa: MG511_aa__c + 76 H2O__c -> 17 AMP__c + 21 CMP__c + 20 GMP__c + 18 UMP__c + VAL__c + 76 H__c; k_dcy_MG511_aa*MG511_aa__c; RNA_decay_MG511_aa is "RNA decay, aminoacylated (MG511)";
  RNA_decay_MG512_aa: MG512_aa__c + 75 H2O__c -> 17 AMP__c + 19 CMP__c + 19 GMP__c + 20 UMP__c + THR__c + 75 H__c; k_dcy_MG512_aa*MG512_aa__c; RNA_decay_MG512_aa is "RNA decay, aminoacylated (MG512)";
  RNA_decay_MG513_aa: MG513_aa__c + 77 H2O__c -> 17 AMP__c + 20 CMP__c + 23 GMP__c + 17 UMP__c + GLU__c + 77 H__c; k_dcy_MG513_aa*MG513_aa__c; RNA_decay_MG513_aa is "RNA decay, aminoacylated (MG513)";
  RNA_decay_MG514_aa: MG514_aa__c + 75 H2O__c -> 16 AMP__c + 23 CMP__c + 22 GMP__c + 14 UMP__c + ASN__c + 75 H__c; k_dcy_MG514_aa*MG514_aa__c; RNA_decay_MG514_aa is "RNA decay, aminoacylated (MG514)";
  RNA_decay_MG518_aa: MG518_aa__c + 76 H2O__c -> 20 AMP__c + 22 CMP__c + 19 GMP__c + 15 UMP__c + HIS__c + 76 H__c; k_dcy_MG518_aa*MG518_aa__c; RNA_decay_MG518_aa is "RNA decay, aminoacylated (MG518)";
  RNA_decay_MG519_aa: MG519_aa__c + 88 H2O__c -> 22 AMP__c + 29 CMP__c + 18 GMP__c + 19 UMP__c + LEU__c + 88 H__c; k_dcy_MG519_aa*MG519_aa__c; RNA_decay_MG519_aa is "RNA decay, aminoacylated (MG519)";
  RNA_decay_MG520_aa: MG520_aa__c + 82 H2O__c -> 15 AMP__c + 24 CMP__c + 21 GMP__c + 22 UMP__c + LEU__c + 82 H__c; k_dcy_MG520_aa*MG520_aa__c; RNA_decay_MG520_aa is "RNA decay, aminoacylated (MG520)";
  RNA_decay_MG523_aa: MG523_aa__c + 76 H2O__c -> 19 AMP__c + 22 CMP__c + 21 GMP__c + 14 UMP__c + ARG__c + 76 H__c; k_dcy_MG523_aa*MG523_aa__c; RNA_decay_MG523_aa is "RNA decay, aminoacylated (MG523)";

  // Unit definitions:
  unit substance = item;
end
