// SBML level 2 version 1

function min2(a, b)
  1/2*(a + b - abs(a - b));
end

function min4(a, b, c, d)
  min2(min2(a, b), min2(c, d));
end

function Function_for_ATP__c___H2O__c___MG_147_MONOMER__c__MG_055_170_277_464_476_20MER__m__MG_072_DIMER__c___ADP__c___H__c___MG_147_MONOMER__m___PI__c(ATP__c, Km1_MG_147_MONOMER__c, Km2_ATP__c, MG_055_170_277_464_476_20MER__m, MG_072_DIMER__c, MG_147_MONOMER__c, mw07d1e21b_acc8_42bc_95c5_d9d3970f15f5_mw9290bc11_2ca9_45bc_99b0_997b338f2d5e)
  mw07d1e21b_acc8_42bc_95c5_d9d3970f15f5_mw9290bc11_2ca9_45bc_99b0_997b338f2d5e*MG_072_DIMER__c*MG_055_170_277_464_476_20MER__m*MG_147_MONOMER__c*ATP__c/((1 + MG_147_MONOMER__c/Km1_MG_147_MONOMER__c)*(1 + ATP__c/Km2_ATP__c));
end
Function_for_ATP__c___H2O__c___MG_147_MONOMER__c__MG_055_170_277_464_476_20MER__m__MG_072_DIMER__c___ADP__c___H__c___MG_147_MONOMER__m___PI__c is "Function for ATP__c + H2O__c + MG_147_MONOMER__c -MG_055_170_277_464_476_20MER__m, MG_072_DIMER__c-> ADP__c + H__c + MG_147_MONOMER__m + PI__c";

function Function_for_ATP__c___H2O__c___MG_068_MONOMER__c__MG_055_170_277_464_476_20MER__m__MG_072_DIMER__c___ADP__c___H__c___MG_068_MONOMER__m___PI__c(ATP__c, Km1_MG_068_MONOMER__c, Km2_ATP__c, MG_055_170_277_464_476_20MER__m, MG_068_MONOMER__c, MG_072_DIMER__c, mw0073301c_98ed_487f_a2e3_54d58c2f0408_mw6e48d654_db66_4dc7_8d0f_0e1d422c7794)
  mw0073301c_98ed_487f_a2e3_54d58c2f0408_mw6e48d654_db66_4dc7_8d0f_0e1d422c7794*MG_072_DIMER__c*MG_055_170_277_464_476_20MER__m*MG_068_MONOMER__c*ATP__c/((1 + MG_068_MONOMER__c/Km1_MG_068_MONOMER__c)*(1 + ATP__c/Km2_ATP__c));
end
Function_for_ATP__c___H2O__c___MG_068_MONOMER__c__MG_055_170_277_464_476_20MER__m__MG_072_DIMER__c___ADP__c___H__c___MG_068_MONOMER__m___PI__c is "Function for ATP__c + H2O__c + MG_068_MONOMER__c -MG_055_170_277_464_476_20MER__m, MG_072_DIMER__c-> ADP__c + H__c + MG_068_MONOMER__m + PI__c";

function Function_for_ATP__c___H2O__c___MG_395_MONOMER__c__MG_055_170_277_464_476_20MER__m__MG_072_DIMER__c___ADP__c___H__c___MG_395_MONOMER__m___PI__c(ATP__c, Km1_MG_395_MONOMER__c, Km2_ATP__c, MG_055_170_277_464_476_20MER__m, MG_072_DIMER__c, MG_395_MONOMER__c, mw06aec404_57a0_4f32_8972_f66657b11f6d_mwc1e85f8f_4098_40ea_9f5f_c3e6b531e9b4)
  mw06aec404_57a0_4f32_8972_f66657b11f6d_mwc1e85f8f_4098_40ea_9f5f_c3e6b531e9b4*MG_072_DIMER__c*MG_055_170_277_464_476_20MER__m*MG_395_MONOMER__c*ATP__c/((1 + MG_395_MONOMER__c/Km1_MG_395_MONOMER__c)*(1 + ATP__c/Km2_ATP__c));
end
Function_for_ATP__c___H2O__c___MG_395_MONOMER__c__MG_055_170_277_464_476_20MER__m__MG_072_DIMER__c___ADP__c___H__c___MG_395_MONOMER__m___PI__c is "Function for ATP__c + H2O__c + MG_395_MONOMER__c -MG_055_170_277_464_476_20MER__m, MG_072_DIMER__c-> ADP__c + H__c + MG_395_MONOMER__m + PI__c";

function Function_for_ATP__c___H2O__c___MG_320_MONOMER__c__MG_055_170_277_464_476_20MER__m__MG_072_DIMER__c___ADP__c___H__c___MG_320_MONOMER__m___PI__c(ATP__c, Km1_MG_320_MONOMER__c, Km2_ATP__c, MG_055_170_277_464_476_20MER__m, MG_072_DIMER__c, MG_320_MONOMER__c, mw10d68844_23c9_4468_8b17_246f834f2307_mw015718bc_81c2_497e_be8e_a56dd4b4c35b)
  mw10d68844_23c9_4468_8b17_246f834f2307_mw015718bc_81c2_497e_be8e_a56dd4b4c35b*MG_072_DIMER__c*MG_055_170_277_464_476_20MER__m*MG_320_MONOMER__c*ATP__c/((1 + MG_320_MONOMER__c/Km1_MG_320_MONOMER__c)*(1 + ATP__c/Km2_ATP__c));
end
Function_for_ATP__c___H2O__c___MG_320_MONOMER__c__MG_055_170_277_464_476_20MER__m__MG_072_DIMER__c___ADP__c___H__c___MG_320_MONOMER__m___PI__c is "Function for ATP__c + H2O__c + MG_320_MONOMER__c -MG_055_170_277_464_476_20MER__m, MG_072_DIMER__c-> ADP__c + H__c + MG_320_MONOMER__m + PI__c";

function Function_for_ATP__c___H2O__c___MG_186_MONOMER__c__MG_055_170_277_464_476_20MER__m__MG_072_DIMER__c___ADP__c___H__c___MG_186_MONOMER__e___PI__c(ATP__c, Km1_MG_186_MONOMER__c, Km2_ATP__c, MG_055_170_277_464_476_20MER__m, MG_072_DIMER__c, MG_186_MONOMER__c, mw13f3349b_4744_4ce0_a804_b8995595d92d_mw669a353c_691f_4958_bec8_bbb4a107ae7f)
  mw13f3349b_4744_4ce0_a804_b8995595d92d_mw669a353c_691f_4958_bec8_bbb4a107ae7f*MG_072_DIMER__c*MG_055_170_277_464_476_20MER__m*MG_186_MONOMER__c*ATP__c/((1 + MG_186_MONOMER__c/Km1_MG_186_MONOMER__c)*(1 + ATP__c/Km2_ATP__c));
end
Function_for_ATP__c___H2O__c___MG_186_MONOMER__c__MG_055_170_277_464_476_20MER__m__MG_072_DIMER__c___ADP__c___H__c___MG_186_MONOMER__e___PI__c is "Function for ATP__c + H2O__c + MG_186_MONOMER__c -MG_055_170_277_464_476_20MER__m, MG_072_DIMER__c-> ADP__c + H__c + MG_186_MONOMER__e + PI__c";

function Function_for_ATP__c___H2O__c___MG_515_MONOMER__c__MG_055_170_277_464_476_20MER__m__MG_072_DIMER__c___ADP__c___H__c___MG_515_MONOMER__m___PI__c(ATP__c, Km1_MG_515_MONOMER__c, Km2_ATP__c, MG_055_170_277_464_476_20MER__m, MG_072_DIMER__c, MG_515_MONOMER__c, mw1412b997_58e1_4029_8839_1dba64551bd4_mwa4960309_9047_4c95_8686_ec20e1904da1)
  mw1412b997_58e1_4029_8839_1dba64551bd4_mwa4960309_9047_4c95_8686_ec20e1904da1*MG_072_DIMER__c*MG_055_170_277_464_476_20MER__m*MG_515_MONOMER__c*ATP__c/((1 + MG_515_MONOMER__c/Km1_MG_515_MONOMER__c)*(1 + ATP__c/Km2_ATP__c));
end
Function_for_ATP__c___H2O__c___MG_515_MONOMER__c__MG_055_170_277_464_476_20MER__m__MG_072_DIMER__c___ADP__c___H__c___MG_515_MONOMER__m___PI__c is "Function for ATP__c + H2O__c + MG_515_MONOMER__c -MG_055_170_277_464_476_20MER__m, MG_072_DIMER__c-> ADP__c + H__c + MG_515_MONOMER__m + PI__c";

function Function_for_ATP__c___H2O__c___MG_043_MONOMER__c__MG_055_170_277_464_476_20MER__m__MG_072_DIMER__c___ADP__c___H__c___MG_043_MONOMER__m___PI__c(ATP__c, Km1_MG_043_MONOMER__c, Km2_ATP__c, MG_043_MONOMER__c, MG_055_170_277_464_476_20MER__m, MG_072_DIMER__c, mw18305a96_ee7f_45c1_b8eb_b0947e202349_mw2427812f_a126_493c_8155_747f446814d6)
  mw18305a96_ee7f_45c1_b8eb_b0947e202349_mw2427812f_a126_493c_8155_747f446814d6*MG_072_DIMER__c*MG_055_170_277_464_476_20MER__m*MG_043_MONOMER__c*ATP__c/((1 + MG_043_MONOMER__c/Km1_MG_043_MONOMER__c)*(1 + ATP__c/Km2_ATP__c));
end
Function_for_ATP__c___H2O__c___MG_043_MONOMER__c__MG_055_170_277_464_476_20MER__m__MG_072_DIMER__c___ADP__c___H__c___MG_043_MONOMER__m___PI__c is "Function for ATP__c + H2O__c + MG_043_MONOMER__c -MG_055_170_277_464_476_20MER__m, MG_072_DIMER__c-> ADP__c + H__c + MG_043_MONOMER__m + PI__c";

function Function_for_ATP__c___H2O__c___MG_390_MONOMER__c__MG_055_170_277_464_476_20MER__m__MG_072_DIMER__c___ADP__c___H__c___MG_390_MONOMER__m___PI__c(ATP__c, Km1_MG_390_MONOMER__c, Km2_ATP__c, MG_055_170_277_464_476_20MER__m, MG_072_DIMER__c, MG_390_MONOMER__c, mw18800e5c_5d2d_400e_80af_74f46d5b63f2_mw616456d5_2115_4f73_b6ed_2d7b2e9b3126)
  mw18800e5c_5d2d_400e_80af_74f46d5b63f2_mw616456d5_2115_4f73_b6ed_2d7b2e9b3126*MG_072_DIMER__c*MG_055_170_277_464_476_20MER__m*MG_390_MONOMER__c*ATP__c/((1 + MG_390_MONOMER__c/Km1_MG_390_MONOMER__c)*(1 + ATP__c/Km2_ATP__c));
end
Function_for_ATP__c___H2O__c___MG_390_MONOMER__c__MG_055_170_277_464_476_20MER__m__MG_072_DIMER__c___ADP__c___H__c___MG_390_MONOMER__m___PI__c is "Function for ATP__c + H2O__c + MG_390_MONOMER__c -MG_055_170_277_464_476_20MER__m, MG_072_DIMER__c-> ADP__c + H__c + MG_390_MONOMER__m + PI__c";

function Function_for_ATP__c___H2O__c___MG_212_MONOMER__c__MG_055_170_277_464_476_20MER__m__MG_072_DIMER__c___ADP__c___H__c___MG_212_MONOMER__m___PI__c(ATP__c, Km1_MG_212_MONOMER__c, Km2_ATP__c, MG_055_170_277_464_476_20MER__m, MG_072_DIMER__c, MG_212_MONOMER__c, mw1ab036ec_443c_4ada_a5d6_8e43c068872b_mwdab7082a_89da_42d9_aeac_2afe9a2a724d)
  mw1ab036ec_443c_4ada_a5d6_8e43c068872b_mwdab7082a_89da_42d9_aeac_2afe9a2a724d*MG_072_DIMER__c*MG_055_170_277_464_476_20MER__m*MG_212_MONOMER__c*ATP__c/((1 + MG_212_MONOMER__c/Km1_MG_212_MONOMER__c)*(1 + ATP__c/Km2_ATP__c));
end
Function_for_ATP__c___H2O__c___MG_212_MONOMER__c__MG_055_170_277_464_476_20MER__m__MG_072_DIMER__c___ADP__c___H__c___MG_212_MONOMER__m___PI__c is "Function for ATP__c + H2O__c + MG_212_MONOMER__c -MG_055_170_277_464_476_20MER__m, MG_072_DIMER__c-> ADP__c + H__c + MG_212_MONOMER__m + PI__c";

function Function_for_ATP__c___H2O__c___MG_146_MONOMER__c__MG_055_170_277_464_476_20MER__m__MG_072_DIMER__c___ADP__c___H__c___MG_146_MONOMER__e___PI__c(ATP__c, Km1_MG_146_MONOMER__c, Km2_ATP__c, MG_055_170_277_464_476_20MER__m, MG_072_DIMER__c, MG_146_MONOMER__c, mw1cd29efd_5383_4ef8_a29b_b174b4dbdcf6_mw3ffc7ced_3b4c_41c8_94a6_ece94158b492)
  mw1cd29efd_5383_4ef8_a29b_b174b4dbdcf6_mw3ffc7ced_3b4c_41c8_94a6_ece94158b492*MG_072_DIMER__c*MG_055_170_277_464_476_20MER__m*MG_146_MONOMER__c*ATP__c/((1 + MG_146_MONOMER__c/Km1_MG_146_MONOMER__c)*(1 + ATP__c/Km2_ATP__c));
end
Function_for_ATP__c___H2O__c___MG_146_MONOMER__c__MG_055_170_277_464_476_20MER__m__MG_072_DIMER__c___ADP__c___H__c___MG_146_MONOMER__e___PI__c is "Function for ATP__c + H2O__c + MG_146_MONOMER__c -MG_055_170_277_464_476_20MER__m, MG_072_DIMER__c-> ADP__c + H__c + MG_146_MONOMER__e + PI__c";

function Function_for_ATP__c___H2O__c___MG_064_MONOMER__c__MG_055_170_277_464_476_20MER__m__MG_072_DIMER__c___ADP__c___H__c___MG_064_MONOMER__m___PI__c(ATP__c, Km1_MG_064_MONOMER__c, Km2_ATP__c, MG_055_170_277_464_476_20MER__m, MG_064_MONOMER__c, MG_072_DIMER__c, mw1f8c3239_c0d8_4eec_a4a7_bf0fc43e6960_mwc8432b3e_2e1b_4e2f_84ec_97e27f723b64)
  mw1f8c3239_c0d8_4eec_a4a7_bf0fc43e6960_mwc8432b3e_2e1b_4e2f_84ec_97e27f723b64*MG_072_DIMER__c*MG_055_170_277_464_476_20MER__m*MG_064_MONOMER__c*ATP__c/((1 + MG_064_MONOMER__c/Km1_MG_064_MONOMER__c)*(1 + ATP__c/Km2_ATP__c));
end
Function_for_ATP__c___H2O__c___MG_064_MONOMER__c__MG_055_170_277_464_476_20MER__m__MG_072_DIMER__c___ADP__c___H__c___MG_064_MONOMER__m___PI__c is "Function for ATP__c + H2O__c + MG_064_MONOMER__c -MG_055_170_277_464_476_20MER__m, MG_072_DIMER__c-> ADP__c + H__c + MG_064_MONOMER__m + PI__c";

function Function_for_ATP__c___H2O__c___MG_404_MONOMER__c__MG_055_170_277_464_476_20MER__m__MG_072_DIMER__c___ADP__c___H__c___MG_404_MONOMER__m___PI__c(ATP__c, Km1_MG_404_MONOMER__c, Km2_ATP__c, MG_055_170_277_464_476_20MER__m, MG_072_DIMER__c, MG_404_MONOMER__c, mw20410a8c_0849_4648_96b1_ab9dcea54f8c_mwcb5b96d6_6421_4d78_ad9c_55981cfbeffb)
  mw20410a8c_0849_4648_96b1_ab9dcea54f8c_mwcb5b96d6_6421_4d78_ad9c_55981cfbeffb*MG_072_DIMER__c*MG_055_170_277_464_476_20MER__m*MG_404_MONOMER__c*ATP__c/((1 + MG_404_MONOMER__c/Km1_MG_404_MONOMER__c)*(1 + ATP__c/Km2_ATP__c));
end
Function_for_ATP__c___H2O__c___MG_404_MONOMER__c__MG_055_170_277_464_476_20MER__m__MG_072_DIMER__c___ADP__c___H__c___MG_404_MONOMER__m___PI__c is "Function for ATP__c + H2O__c + MG_404_MONOMER__c -MG_055_170_277_464_476_20MER__m, MG_072_DIMER__c-> ADP__c + H__c + MG_404_MONOMER__m + PI__c";

function Function_for_ATP__c___H2O__c___MG_045_MONOMER__c__MG_055_170_277_464_476_20MER__m__MG_072_DIMER__c___ADP__c___H__c___MG_045_MONOMER__e___PI__c(ATP__c, Km1_MG_045_MONOMER__c, Km2_ATP__c, MG_045_MONOMER__c, MG_055_170_277_464_476_20MER__m, MG_072_DIMER__c, mw2924d2d6_a628_4762_879d_02ada1fb53f8_mwe93d5795_061f_404f_99f0_8f848890ffc1)
  mw2924d2d6_a628_4762_879d_02ada1fb53f8_mwe93d5795_061f_404f_99f0_8f848890ffc1*MG_072_DIMER__c*MG_055_170_277_464_476_20MER__m*MG_045_MONOMER__c*ATP__c/((1 + MG_045_MONOMER__c/Km1_MG_045_MONOMER__c)*(1 + ATP__c/Km2_ATP__c));
end
Function_for_ATP__c___H2O__c___MG_045_MONOMER__c__MG_055_170_277_464_476_20MER__m__MG_072_DIMER__c___ADP__c___H__c___MG_045_MONOMER__e___PI__c is "Function for ATP__c + H2O__c + MG_045_MONOMER__c -MG_055_170_277_464_476_20MER__m, MG_072_DIMER__c-> ADP__c + H__c + MG_045_MONOMER__e + PI__c";

function Function_for_ATP__c___H2O__c___MG_275_MONOMER__c__MG_055_170_277_464_476_20MER__m__MG_072_DIMER__c___ADP__c___H__c___MG_275_MONOMER__m___PI__c(ATP__c, Km1_MG_275_MONOMER__c, Km2_ATP__c, MG_055_170_277_464_476_20MER__m, MG_072_DIMER__c, MG_275_MONOMER__c, mw2b8abec5_25af_4252_9332_442db47cb78a_mwbe60ac7f_29cb_48cc_8251_97388ccb8c9a)
  mw2b8abec5_25af_4252_9332_442db47cb78a_mwbe60ac7f_29cb_48cc_8251_97388ccb8c9a*MG_072_DIMER__c*MG_055_170_277_464_476_20MER__m*MG_275_MONOMER__c*ATP__c/((1 + MG_275_MONOMER__c/Km1_MG_275_MONOMER__c)*(1 + ATP__c/Km2_ATP__c));
end
Function_for_ATP__c___H2O__c___MG_275_MONOMER__c__MG_055_170_277_464_476_20MER__m__MG_072_DIMER__c___ADP__c___H__c___MG_275_MONOMER__m___PI__c is "Function for ATP__c + H2O__c + MG_275_MONOMER__c -MG_055_170_277_464_476_20MER__m, MG_072_DIMER__c-> ADP__c + H__c + MG_275_MONOMER__m + PI__c";

function Function_for_ATP__c___H2O__c___MG_170_MONOMER__c__MG_055_170_277_464_476_20MER__m__MG_072_DIMER__c___ADP__c___H__c___MG_170_MONOMER__m___PI__c(ATP__c, Km1_MG_170_MONOMER__c, Km2_ATP__c, MG_055_170_277_464_476_20MER__m, MG_072_DIMER__c, MG_170_MONOMER__c, mw2f01b35c_d9c5_4846_aa18_43529e5c9734_mw0bfe348d_8788_4530_a977_9eb3876f083b)
  mw2f01b35c_d9c5_4846_aa18_43529e5c9734_mw0bfe348d_8788_4530_a977_9eb3876f083b*MG_072_DIMER__c*MG_055_170_277_464_476_20MER__m*MG_170_MONOMER__c*ATP__c/((1 + MG_170_MONOMER__c/Km1_MG_170_MONOMER__c)*(1 + ATP__c/Km2_ATP__c));
end
Function_for_ATP__c___H2O__c___MG_170_MONOMER__c__MG_055_170_277_464_476_20MER__m__MG_072_DIMER__c___ADP__c___H__c___MG_170_MONOMER__m___PI__c is "Function for ATP__c + H2O__c + MG_170_MONOMER__c -MG_055_170_277_464_476_20MER__m, MG_072_DIMER__c-> ADP__c + H__c + MG_170_MONOMER__m + PI__c";

function Function_for_ATP__c___H2O__c___MG_040_MONOMER__c__MG_055_170_277_464_476_20MER__m__MG_072_DIMER__c___ADP__c___H__c___MG_040_MONOMER__e___PI__c(ATP__c, Km1_MG_040_MONOMER__c, Km2_ATP__c, MG_040_MONOMER__c, MG_055_170_277_464_476_20MER__m, MG_072_DIMER__c, mw32c7a4a4_0c45_4a9b_9c99_4efdc240dbf3_mw36b66044_3068_4579_ba4e_8e4c9bf65307)
  mw32c7a4a4_0c45_4a9b_9c99_4efdc240dbf3_mw36b66044_3068_4579_ba4e_8e4c9bf65307*MG_072_DIMER__c*MG_055_170_277_464_476_20MER__m*MG_040_MONOMER__c*ATP__c/((1 + MG_040_MONOMER__c/Km1_MG_040_MONOMER__c)*(1 + ATP__c/Km2_ATP__c));
end
Function_for_ATP__c___H2O__c___MG_040_MONOMER__c__MG_055_170_277_464_476_20MER__m__MG_072_DIMER__c___ADP__c___H__c___MG_040_MONOMER__e___PI__c is "Function for ATP__c + H2O__c + MG_040_MONOMER__c -MG_055_170_277_464_476_20MER__m, MG_072_DIMER__c-> ADP__c + H__c + MG_040_MONOMER__e + PI__c";

function Function_for_ATP__c___H2O__c___MG_220_MONOMER__c__MG_055_170_277_464_476_20MER__m__MG_072_DIMER__c___ADP__c___H__c___MG_220_MONOMER__e___PI__c(ATP__c, Km1_MG_220_MONOMER__c, Km2_ATP__c, MG_055_170_277_464_476_20MER__m, MG_072_DIMER__c, MG_220_MONOMER__c, mw3427eca0_2c97_46c0_b8e4_07d6e3bcf0b5_mw2ac94eca_7af8_430f_8ba8_7607e1bf3207)
  mw3427eca0_2c97_46c0_b8e4_07d6e3bcf0b5_mw2ac94eca_7af8_430f_8ba8_7607e1bf3207*MG_072_DIMER__c*MG_055_170_277_464_476_20MER__m*MG_220_MONOMER__c*ATP__c/((1 + MG_220_MONOMER__c/Km1_MG_220_MONOMER__c)*(1 + ATP__c/Km2_ATP__c));
end
Function_for_ATP__c___H2O__c___MG_220_MONOMER__c__MG_055_170_277_464_476_20MER__m__MG_072_DIMER__c___ADP__c___H__c___MG_220_MONOMER__e___PI__c is "Function for ATP__c + H2O__c + MG_220_MONOMER__c -MG_055_170_277_464_476_20MER__m, MG_072_DIMER__c-> ADP__c + H__c + MG_220_MONOMER__e + PI__c";

function Function_for_ATP__c___H2O__c___MG_075_MONOMER__c__MG_055_170_277_464_476_20MER__m__MG_072_DIMER__c___ADP__c___H__c___MG_075_MONOMER__m___PI__c(ATP__c, Km1_MG_075_MONOMER__c, Km2_ATP__c, MG_055_170_277_464_476_20MER__m, MG_072_DIMER__c, MG_075_MONOMER__c, mw3511c23c_8bf5_45e7_8f79_ba9f95358276_mw4104e6e3_1e63_4b75_8f6c_400b52cac829)
  mw3511c23c_8bf5_45e7_8f79_ba9f95358276_mw4104e6e3_1e63_4b75_8f6c_400b52cac829*MG_072_DIMER__c*MG_055_170_277_464_476_20MER__m*MG_075_MONOMER__c*ATP__c/((1 + MG_075_MONOMER__c/Km1_MG_075_MONOMER__c)*(1 + ATP__c/Km2_ATP__c));
end
Function_for_ATP__c___H2O__c___MG_075_MONOMER__c__MG_055_170_277_464_476_20MER__m__MG_072_DIMER__c___ADP__c___H__c___MG_075_MONOMER__m___PI__c is "Function for ATP__c + H2O__c + MG_075_MONOMER__c -MG_055_170_277_464_476_20MER__m, MG_072_DIMER__c-> ADP__c + H__c + MG_075_MONOMER__m + PI__c";

function Function_for_ATP__c___H2O__c___MG_135_MONOMER__c__MG_055_170_277_464_476_20MER__m__MG_072_DIMER__c___ADP__c___H__c___MG_135_MONOMER__m___PI__c(ATP__c, Km1_MG_135_MONOMER__c, Km2_ATP__c, MG_055_170_277_464_476_20MER__m, MG_072_DIMER__c, MG_135_MONOMER__c, mw3990625d_e189_41c1_8114_d543458b057d_mw45b50ad3_8bac_426b_ba9d_7853021b4f50)
  mw3990625d_e189_41c1_8114_d543458b057d_mw45b50ad3_8bac_426b_ba9d_7853021b4f50*MG_072_DIMER__c*MG_055_170_277_464_476_20MER__m*MG_135_MONOMER__c*ATP__c/((1 + MG_135_MONOMER__c/Km1_MG_135_MONOMER__c)*(1 + ATP__c/Km2_ATP__c));
end
Function_for_ATP__c___H2O__c___MG_135_MONOMER__c__MG_055_170_277_464_476_20MER__m__MG_072_DIMER__c___ADP__c___H__c___MG_135_MONOMER__m___PI__c is "Function for ATP__c + H2O__c + MG_135_MONOMER__c -MG_055_170_277_464_476_20MER__m, MG_072_DIMER__c-> ADP__c + H__c + MG_135_MONOMER__m + PI__c";

function Function_for_ATP__c___H2O__c___MG_096_MONOMER__c__MG_055_170_277_464_476_20MER__m__MG_072_DIMER__c___ADP__c___H__c___MG_096_MONOMER__e___PI__c(ATP__c, Km1_MG_096_MONOMER__c, Km2_ATP__c, MG_055_170_277_464_476_20MER__m, MG_072_DIMER__c, MG_096_MONOMER__c, mw40148050_09e0_4008_9f26_21719def89a9_mwa1a8430a_a9f7_4d3e_8317_1b53bf499a10)
  mw40148050_09e0_4008_9f26_21719def89a9_mwa1a8430a_a9f7_4d3e_8317_1b53bf499a10*MG_072_DIMER__c*MG_055_170_277_464_476_20MER__m*MG_096_MONOMER__c*ATP__c/((1 + MG_096_MONOMER__c/Km1_MG_096_MONOMER__c)*(1 + ATP__c/Km2_ATP__c));
end
Function_for_ATP__c___H2O__c___MG_096_MONOMER__c__MG_055_170_277_464_476_20MER__m__MG_072_DIMER__c___ADP__c___H__c___MG_096_MONOMER__e___PI__c is "Function for ATP__c + H2O__c + MG_096_MONOMER__c -MG_055_170_277_464_476_20MER__m, MG_072_DIMER__c-> ADP__c + H__c + MG_096_MONOMER__e + PI__c";

function Function_for_ATP__c___H2O__c___MG_319_MONOMER__c__MG_055_170_277_464_476_20MER__m__MG_072_DIMER__c___ADP__c___H__c___MG_319_MONOMER__m___PI__c(ATP__c, Km1_MG_319_MONOMER__c, Km2_ATP__c, MG_055_170_277_464_476_20MER__m, MG_072_DIMER__c, MG_319_MONOMER__c, mw46b11442_4b14_49a3_96fb_cb3954d8ce78_mw341bf054_6a64_42b2_af23_a42cea0600b9)
  mw46b11442_4b14_49a3_96fb_cb3954d8ce78_mw341bf054_6a64_42b2_af23_a42cea0600b9*MG_072_DIMER__c*MG_055_170_277_464_476_20MER__m*MG_319_MONOMER__c*ATP__c/((1 + MG_319_MONOMER__c/Km1_MG_319_MONOMER__c)*(1 + ATP__c/Km2_ATP__c));
end
Function_for_ATP__c___H2O__c___MG_319_MONOMER__c__MG_055_170_277_464_476_20MER__m__MG_072_DIMER__c___ADP__c___H__c___MG_319_MONOMER__m___PI__c is "Function for ATP__c + H2O__c + MG_319_MONOMER__c -MG_055_170_277_464_476_20MER__m, MG_072_DIMER__c-> ADP__c + H__c + MG_319_MONOMER__m + PI__c";

function Function_for_ATP__c___H2O__c___MG_406_MONOMER__c__MG_055_170_277_464_476_20MER__m__MG_072_DIMER__c___ADP__c___H__c___MG_406_MONOMER__m___PI__c(ATP__c, Km1_MG_406_MONOMER__c, Km2_ATP__c, MG_055_170_277_464_476_20MER__m, MG_072_DIMER__c, MG_406_MONOMER__c, mw498aea7d_2fd4_452c_9a0c_008cb959ac3b_mwa5ae15ef_3f87_438b_b034_5db22f0b43f5)
  mw498aea7d_2fd4_452c_9a0c_008cb959ac3b_mwa5ae15ef_3f87_438b_b034_5db22f0b43f5*MG_072_DIMER__c*MG_055_170_277_464_476_20MER__m*MG_406_MONOMER__c*ATP__c/((1 + MG_406_MONOMER__c/Km1_MG_406_MONOMER__c)*(1 + ATP__c/Km2_ATP__c));
end
Function_for_ATP__c___H2O__c___MG_406_MONOMER__c__MG_055_170_277_464_476_20MER__m__MG_072_DIMER__c___ADP__c___H__c___MG_406_MONOMER__m___PI__c is "Function for ATP__c + H2O__c + MG_406_MONOMER__c -MG_055_170_277_464_476_20MER__m, MG_072_DIMER__c-> ADP__c + H__c + MG_406_MONOMER__m + PI__c";

function Function_for_ATP__c___H2O__c___MG_452_MONOMER__c__MG_055_170_277_464_476_20MER__m__MG_072_DIMER__c___ADP__c___H__c___MG_452_MONOMER__m___PI__c(ATP__c, Km1_MG_452_MONOMER__c, Km2_ATP__c, MG_055_170_277_464_476_20MER__m, MG_072_DIMER__c, MG_452_MONOMER__c, mw4d12fb6f_53d0_4972_9474_dbc23f2008b8_mwbc089891_168f_4458_b9c3_303ce58b61b9)
  mw4d12fb6f_53d0_4972_9474_dbc23f2008b8_mwbc089891_168f_4458_b9c3_303ce58b61b9*MG_072_DIMER__c*MG_055_170_277_464_476_20MER__m*MG_452_MONOMER__c*ATP__c/((1 + MG_452_MONOMER__c/Km1_MG_452_MONOMER__c)*(1 + ATP__c/Km2_ATP__c));
end
Function_for_ATP__c___H2O__c___MG_452_MONOMER__c__MG_055_170_277_464_476_20MER__m__MG_072_DIMER__c___ADP__c___H__c___MG_452_MONOMER__m___PI__c is "Function for ATP__c + H2O__c + MG_452_MONOMER__c -MG_055_170_277_464_476_20MER__m, MG_072_DIMER__c-> ADP__c + H__c + MG_452_MONOMER__m + PI__c";

function Function_for_ATP__c___H2O__c___MG_277_MONOMER__c__MG_055_170_277_464_476_20MER__m__MG_072_DIMER__c___ADP__c___H__c___MG_277_MONOMER__m___PI__c(ATP__c, Km1_MG_277_MONOMER__c, Km2_ATP__c, MG_055_170_277_464_476_20MER__m, MG_072_DIMER__c, MG_277_MONOMER__c, mw5755e585_866b_46a9_a878_475f70e384d7_mwe239f53d_1f0c_48f6_bba9_b381eafc0c4c)
  mw5755e585_866b_46a9_a878_475f70e384d7_mwe239f53d_1f0c_48f6_bba9_b381eafc0c4c*MG_072_DIMER__c*MG_055_170_277_464_476_20MER__m*MG_277_MONOMER__c*ATP__c/((1 + MG_277_MONOMER__c/Km1_MG_277_MONOMER__c)*(1 + ATP__c/Km2_ATP__c));
end
Function_for_ATP__c___H2O__c___MG_277_MONOMER__c__MG_055_170_277_464_476_20MER__m__MG_072_DIMER__c___ADP__c___H__c___MG_277_MONOMER__m___PI__c is "Function for ATP__c + H2O__c + MG_277_MONOMER__c -MG_055_170_277_464_476_20MER__m, MG_072_DIMER__c-> ADP__c + H__c + MG_277_MONOMER__m + PI__c";

function Function_for_ATP__c___H2O__c___MG_256_MONOMER__c__MG_055_170_277_464_476_20MER__m__MG_072_DIMER__c___ADP__c___H__c___MG_256_MONOMER__m___PI__c(ATP__c, Km1_MG_256_MONOMER__c, Km2_ATP__c, MG_055_170_277_464_476_20MER__m, MG_072_DIMER__c, MG_256_MONOMER__c, mw576db2db_6152_4ab7_938f_438362f4c87c_mw5e82054b_b864_4d0b_8ba9_5dc6517c1184)
  mw576db2db_6152_4ab7_938f_438362f4c87c_mw5e82054b_b864_4d0b_8ba9_5dc6517c1184*MG_072_DIMER__c*MG_055_170_277_464_476_20MER__m*MG_256_MONOMER__c*ATP__c/((1 + MG_256_MONOMER__c/Km1_MG_256_MONOMER__c)*(1 + ATP__c/Km2_ATP__c));
end
Function_for_ATP__c___H2O__c___MG_256_MONOMER__c__MG_055_170_277_464_476_20MER__m__MG_072_DIMER__c___ADP__c___H__c___MG_256_MONOMER__m___PI__c is "Function for ATP__c + H2O__c + MG_256_MONOMER__c -MG_055_170_277_464_476_20MER__m, MG_072_DIMER__c-> ADP__c + H__c + MG_256_MONOMER__m + PI__c";

function Function_for_ATP__c___H2O__c___MG_414_MONOMER__c__MG_055_170_277_464_476_20MER__m__MG_072_DIMER__c___ADP__c___H__c___MG_414_MONOMER__e___PI__c(ATP__c, Km1_MG_414_MONOMER__c, Km2_ATP__c, MG_055_170_277_464_476_20MER__m, MG_072_DIMER__c, MG_414_MONOMER__c, mw5a984e03_bb3b_4c00_8ecb_ae79f961b747_mw88ff6775_d152_40a7_ad4b_dbe8ad78c7d1)
  mw5a984e03_bb3b_4c00_8ecb_ae79f961b747_mw88ff6775_d152_40a7_ad4b_dbe8ad78c7d1*MG_072_DIMER__c*MG_055_170_277_464_476_20MER__m*MG_414_MONOMER__c*ATP__c/((1 + MG_414_MONOMER__c/Km1_MG_414_MONOMER__c)*(1 + ATP__c/Km2_ATP__c));
end
Function_for_ATP__c___H2O__c___MG_414_MONOMER__c__MG_055_170_277_464_476_20MER__m__MG_072_DIMER__c___ADP__c___H__c___MG_414_MONOMER__e___PI__c is "Function for ATP__c + H2O__c + MG_414_MONOMER__c -MG_055_170_277_464_476_20MER__m, MG_072_DIMER__c-> ADP__c + H__c + MG_414_MONOMER__e + PI__c";

function Function_for_ATP__c___H2O__c___MG_062_MONOMER__c__MG_055_170_277_464_476_20MER__m__MG_072_DIMER__c___ADP__c___H__c___MG_062_MONOMER__m___PI__c(ATP__c, Km1_MG_062_MONOMER__c, Km2_ATP__c, MG_055_170_277_464_476_20MER__m, MG_062_MONOMER__c, MG_072_DIMER__c, mw5ae4c5e5_5d2c_46c6_9b29_e0773c802f60_mw0f505bd0_1790_45ad_9571_675b39eb1b6b)
  mw5ae4c5e5_5d2c_46c6_9b29_e0773c802f60_mw0f505bd0_1790_45ad_9571_675b39eb1b6b*MG_072_DIMER__c*MG_055_170_277_464_476_20MER__m*MG_062_MONOMER__c*ATP__c/((1 + MG_062_MONOMER__c/Km1_MG_062_MONOMER__c)*(1 + ATP__c/Km2_ATP__c));
end
Function_for_ATP__c___H2O__c___MG_062_MONOMER__c__MG_055_170_277_464_476_20MER__m__MG_072_DIMER__c___ADP__c___H__c___MG_062_MONOMER__m___PI__c is "Function for ATP__c + H2O__c + MG_062_MONOMER__c -MG_055_170_277_464_476_20MER__m, MG_072_DIMER__c-> ADP__c + H__c + MG_062_MONOMER__m + PI__c";

function Function_for_ATP__c___H2O__c___MG_321_MONOMER__c__MG_055_170_277_464_476_20MER__m__MG_072_DIMER__c___ADP__c___H__c___MG_321_MONOMER__e___PI__c(ATP__c, Km1_MG_321_MONOMER__c, Km2_ATP__c, MG_055_170_277_464_476_20MER__m, MG_072_DIMER__c, MG_321_MONOMER__c, mw5b680d22_3b3a_45d0_b28e_989194bac178_mwefc87403_60ff_4736_b2e4_41e9c5120159)
  mw5b680d22_3b3a_45d0_b28e_989194bac178_mwefc87403_60ff_4736_b2e4_41e9c5120159*MG_072_DIMER__c*MG_055_170_277_464_476_20MER__m*MG_321_MONOMER__c*ATP__c/((1 + MG_321_MONOMER__c/Km1_MG_321_MONOMER__c)*(1 + ATP__c/Km2_ATP__c));
end
Function_for_ATP__c___H2O__c___MG_321_MONOMER__c__MG_055_170_277_464_476_20MER__m__MG_072_DIMER__c___ADP__c___H__c___MG_321_MONOMER__e___PI__c is "Function for ATP__c + H2O__c + MG_321_MONOMER__c -MG_055_170_277_464_476_20MER__m, MG_072_DIMER__c-> ADP__c + H__c + MG_321_MONOMER__e + PI__c";

function Function_for_ATP__c___H2O__c___MG_478_MONOMER__c__MG_055_170_277_464_476_20MER__m__MG_072_DIMER__c___ADP__c___H__c___MG_478_MONOMER__m___PI__c(ATP__c, Km1_MG_478_MONOMER__c, Km2_ATP__c, MG_055_170_277_464_476_20MER__m, MG_072_DIMER__c, MG_478_MONOMER__c, mw5fe6e98e_5bf1_4779_87b5_7d809e963d27_mw0eca82b8_4786_4e35_9ce4_da73531ddc97)
  mw5fe6e98e_5bf1_4779_87b5_7d809e963d27_mw0eca82b8_4786_4e35_9ce4_da73531ddc97*MG_072_DIMER__c*MG_055_170_277_464_476_20MER__m*MG_478_MONOMER__c*ATP__c/((1 + MG_478_MONOMER__c/Km1_MG_478_MONOMER__c)*(1 + ATP__c/Km2_ATP__c));
end
Function_for_ATP__c___H2O__c___MG_478_MONOMER__c__MG_055_170_277_464_476_20MER__m__MG_072_DIMER__c___ADP__c___H__c___MG_478_MONOMER__m___PI__c is "Function for ATP__c + H2O__c + MG_478_MONOMER__c -MG_055_170_277_464_476_20MER__m, MG_072_DIMER__c-> ADP__c + H__c + MG_478_MONOMER__m + PI__c";

function Function_for_ATP__c___H2O__c___MG_067_MONOMER__c__MG_055_170_277_464_476_20MER__m__MG_072_DIMER__c___ADP__c___H__c___MG_067_MONOMER__m___PI__c(ATP__c, Km1_MG_067_MONOMER__c, Km2_ATP__c, MG_055_170_277_464_476_20MER__m, MG_067_MONOMER__c, MG_072_DIMER__c, mw627a615c_9c41_4de9_b176_8f803f4db669_mw2f7d3007_06a6_4a14_8883_91636abd02fa)
  mw627a615c_9c41_4de9_b176_8f803f4db669_mw2f7d3007_06a6_4a14_8883_91636abd02fa*MG_072_DIMER__c*MG_055_170_277_464_476_20MER__m*MG_067_MONOMER__c*ATP__c/((1 + MG_067_MONOMER__c/Km1_MG_067_MONOMER__c)*(1 + ATP__c/Km2_ATP__c));
end
Function_for_ATP__c___H2O__c___MG_067_MONOMER__c__MG_055_170_277_464_476_20MER__m__MG_072_DIMER__c___ADP__c___H__c___MG_067_MONOMER__m___PI__c is "Function for ATP__c + H2O__c + MG_067_MONOMER__c -MG_055_170_277_464_476_20MER__m, MG_072_DIMER__c-> ADP__c + H__c + MG_067_MONOMER__m + PI__c";

function Function_for_ATP__c___H2O__c___MG_279_MONOMER__c__MG_055_170_277_464_476_20MER__m__MG_072_DIMER__c___ADP__c___H__c___MG_279_MONOMER__m___PI__c(ATP__c, Km1_MG_279_MONOMER__c, Km2_ATP__c, MG_055_170_277_464_476_20MER__m, MG_072_DIMER__c, MG_279_MONOMER__c, mw62cc4c57_0a7f_4787_b71e_771d5b9f3612_mw2b10f5e3_f2d2_4a45_880e_75675078ed85)
  mw62cc4c57_0a7f_4787_b71e_771d5b9f3612_mw2b10f5e3_f2d2_4a45_880e_75675078ed85*MG_072_DIMER__c*MG_055_170_277_464_476_20MER__m*MG_279_MONOMER__c*ATP__c/((1 + MG_279_MONOMER__c/Km1_MG_279_MONOMER__c)*(1 + ATP__c/Km2_ATP__c));
end
Function_for_ATP__c___H2O__c___MG_279_MONOMER__c__MG_055_170_277_464_476_20MER__m__MG_072_DIMER__c___ADP__c___H__c___MG_279_MONOMER__m___PI__c is "Function for ATP__c + H2O__c + MG_279_MONOMER__c -MG_055_170_277_464_476_20MER__m, MG_072_DIMER__c-> ADP__c + H__c + MG_279_MONOMER__m + PI__c";

function Function_for_ATP__c___H2O__c___MG_095_MONOMER__c__MG_055_170_277_464_476_20MER__m__MG_072_DIMER__c___ADP__c___H__c___MG_095_MONOMER__m___PI__c(ATP__c, Km1_MG_095_MONOMER__c, Km2_ATP__c, MG_055_170_277_464_476_20MER__m, MG_072_DIMER__c, MG_095_MONOMER__c, mw6a533966_a2cf_46bc_9cf6_1faac5173e02_mw3ec2113a_0f59_4d1c_94e6_1822879ce3d0)
  mw6a533966_a2cf_46bc_9cf6_1faac5173e02_mw3ec2113a_0f59_4d1c_94e6_1822879ce3d0*MG_072_DIMER__c*MG_055_170_277_464_476_20MER__m*MG_095_MONOMER__c*ATP__c/((1 + MG_095_MONOMER__c/Km1_MG_095_MONOMER__c)*(1 + ATP__c/Km2_ATP__c));
end
Function_for_ATP__c___H2O__c___MG_095_MONOMER__c__MG_055_170_277_464_476_20MER__m__MG_072_DIMER__c___ADP__c___H__c___MG_095_MONOMER__m___PI__c is "Function for ATP__c + H2O__c + MG_095_MONOMER__c -MG_055_170_277_464_476_20MER__m, MG_072_DIMER__c-> ADP__c + H__c + MG_095_MONOMER__m + PI__c";

function Function_for_ATP__c___H2O__c___MG_313_MONOMER__c__MG_055_170_277_464_476_20MER__m__MG_072_DIMER__c___ADP__c___H__c___MG_313_MONOMER__m___PI__c(ATP__c, Km1_MG_313_MONOMER__c, Km2_ATP__c, MG_055_170_277_464_476_20MER__m, MG_072_DIMER__c, MG_313_MONOMER__c, mw6d4aee3b_c6c9_4dc9_a9db_48687ca2fed7_mwfa418999_f40b_4f82_98d8_1b85f599f21c)
  mw6d4aee3b_c6c9_4dc9_a9db_48687ca2fed7_mwfa418999_f40b_4f82_98d8_1b85f599f21c*MG_072_DIMER__c*MG_055_170_277_464_476_20MER__m*MG_313_MONOMER__c*ATP__c/((1 + MG_313_MONOMER__c/Km1_MG_313_MONOMER__c)*(1 + ATP__c/Km2_ATP__c));
end
Function_for_ATP__c___H2O__c___MG_313_MONOMER__c__MG_055_170_277_464_476_20MER__m__MG_072_DIMER__c___ADP__c___H__c___MG_313_MONOMER__m___PI__c is "Function for ATP__c + H2O__c + MG_313_MONOMER__c -MG_055_170_277_464_476_20MER__m, MG_072_DIMER__c-> ADP__c + H__c + MG_313_MONOMER__m + PI__c";

function Function_for_ATP__c___H2O__c___MG_123_MONOMER__c__MG_055_170_277_464_476_20MER__m__MG_072_DIMER__c___ADP__c___H__c___MG_123_MONOMER__m___PI__c(ATP__c, Km1_MG_123_MONOMER__c, Km2_ATP__c, MG_055_170_277_464_476_20MER__m, MG_072_DIMER__c, MG_123_MONOMER__c, mw6f26361b_1b94_4256_be16_fe8079165bfc_mwc6bda336_537b_4842_809f_791d7bb5eb7b)
  mw6f26361b_1b94_4256_be16_fe8079165bfc_mwc6bda336_537b_4842_809f_791d7bb5eb7b*MG_072_DIMER__c*MG_055_170_277_464_476_20MER__m*MG_123_MONOMER__c*ATP__c/((1 + MG_123_MONOMER__c/Km1_MG_123_MONOMER__c)*(1 + ATP__c/Km2_ATP__c));
end
Function_for_ATP__c___H2O__c___MG_123_MONOMER__c__MG_055_170_277_464_476_20MER__m__MG_072_DIMER__c___ADP__c___H__c___MG_123_MONOMER__m___PI__c is "Function for ATP__c + H2O__c + MG_123_MONOMER__c -MG_055_170_277_464_476_20MER__m, MG_072_DIMER__c-> ADP__c + H__c + MG_123_MONOMER__m + PI__c";

function Function_for_ATP__c___H2O__c___MG_439_MONOMER__c__MG_055_170_277_464_476_20MER__m__MG_072_DIMER__c___ADP__c___H__c___MG_439_MONOMER__m___PI__c(ATP__c, Km1_MG_439_MONOMER__c, Km2_ATP__c, MG_055_170_277_464_476_20MER__m, MG_072_DIMER__c, MG_439_MONOMER__c, mw71581900_c26e_42b1_bcf0_180efe6504d5_mw1c7f938f_d81c_408d_9458_02f2af1bab90)
  mw71581900_c26e_42b1_bcf0_180efe6504d5_mw1c7f938f_d81c_408d_9458_02f2af1bab90*MG_072_DIMER__c*MG_055_170_277_464_476_20MER__m*MG_439_MONOMER__c*ATP__c/((1 + MG_439_MONOMER__c/Km1_MG_439_MONOMER__c)*(1 + ATP__c/Km2_ATP__c));
end
Function_for_ATP__c___H2O__c___MG_439_MONOMER__c__MG_055_170_277_464_476_20MER__m__MG_072_DIMER__c___ADP__c___H__c___MG_439_MONOMER__m___PI__c is "Function for ATP__c + H2O__c + MG_439_MONOMER__c -MG_055_170_277_464_476_20MER__m, MG_072_DIMER__c-> ADP__c + H__c + MG_439_MONOMER__m + PI__c";

function Function_for_ATP__c___H2O__c___MG_354_MONOMER__c__MG_055_170_277_464_476_20MER__m__MG_072_DIMER__c___ADP__c___H__c___MG_354_MONOMER__m___PI__c(ATP__c, Km1_MG_354_MONOMER__c, Km2_ATP__c, MG_055_170_277_464_476_20MER__m, MG_072_DIMER__c, MG_354_MONOMER__c, mw731e0c4d_e480_464f_ae2e_42b5ff335de2_mw90cbfced_84fe_491c_ada4_5fb3b1a93b5c)
  mw731e0c4d_e480_464f_ae2e_42b5ff335de2_mw90cbfced_84fe_491c_ada4_5fb3b1a93b5c*MG_072_DIMER__c*MG_055_170_277_464_476_20MER__m*MG_354_MONOMER__c*ATP__c/((1 + MG_354_MONOMER__c/Km1_MG_354_MONOMER__c)*(1 + ATP__c/Km2_ATP__c));
end
Function_for_ATP__c___H2O__c___MG_354_MONOMER__c__MG_055_170_277_464_476_20MER__m__MG_072_DIMER__c___ADP__c___H__c___MG_354_MONOMER__m___PI__c is "Function for ATP__c + H2O__c + MG_354_MONOMER__c -MG_055_170_277_464_476_20MER__m, MG_072_DIMER__c-> ADP__c + H__c + MG_354_MONOMER__m + PI__c";

function Function_for_ATP__c___H2O__c___MG_456_MONOMER__c__MG_055_170_277_464_476_20MER__m__MG_072_DIMER__c___ADP__c___H__c___MG_456_MONOMER__m___PI__c(ATP__c, Km1_MG_456_MONOMER__c, Km2_ATP__c, MG_055_170_277_464_476_20MER__m, MG_072_DIMER__c, MG_456_MONOMER__c, mw76b5ebe7_c0e0_4c92_b122_fb557fc6f085_mwbac113ac_2984_4f15_a156_0d71970d510c)
  mw76b5ebe7_c0e0_4c92_b122_fb557fc6f085_mwbac113ac_2984_4f15_a156_0d71970d510c*MG_072_DIMER__c*MG_055_170_277_464_476_20MER__m*MG_456_MONOMER__c*ATP__c/((1 + MG_456_MONOMER__c/Km1_MG_456_MONOMER__c)*(1 + ATP__c/Km2_ATP__c));
end
Function_for_ATP__c___H2O__c___MG_456_MONOMER__c__MG_055_170_277_464_476_20MER__m__MG_072_DIMER__c___ADP__c___H__c___MG_456_MONOMER__m___PI__c is "Function for ATP__c + H2O__c + MG_456_MONOMER__c -MG_055_170_277_464_476_20MER__m, MG_072_DIMER__c-> ADP__c + H__c + MG_456_MONOMER__m + PI__c";

function Function_for_ATP__c___H2O__c___MG_524_MONOMER__c__MG_055_170_277_464_476_20MER__m__MG_072_DIMER__c___ADP__c___H__c___MG_524_MONOMER__m___PI__c(ATP__c, Km1_MG_524_MONOMER__c, Km2_ATP__c, MG_055_170_277_464_476_20MER__m, MG_072_DIMER__c, MG_524_MONOMER__c, mw7c92872e_3ad4_4f32_9161_f721594ee4c4_mw3fe629af_0d42_411f_8146_f75fabe1e25a)
  mw7c92872e_3ad4_4f32_9161_f721594ee4c4_mw3fe629af_0d42_411f_8146_f75fabe1e25a*MG_072_DIMER__c*MG_055_170_277_464_476_20MER__m*MG_524_MONOMER__c*ATP__c/((1 + MG_524_MONOMER__c/Km1_MG_524_MONOMER__c)*(1 + ATP__c/Km2_ATP__c));
end
Function_for_ATP__c___H2O__c___MG_524_MONOMER__c__MG_055_170_277_464_476_20MER__m__MG_072_DIMER__c___ADP__c___H__c___MG_524_MONOMER__m___PI__c is "Function for ATP__c + H2O__c + MG_524_MONOMER__c -MG_055_170_277_464_476_20MER__m, MG_072_DIMER__c-> ADP__c + H__c + MG_524_MONOMER__m + PI__c";

function Function_for_ATP__c___H2O__c___MG_307_MONOMER__c__MG_055_170_277_464_476_20MER__m__MG_072_DIMER__c___ADP__c___H__c___MG_307_MONOMER__m___PI__c(ATP__c, Km1_MG_307_MONOMER__c, Km2_ATP__c, MG_055_170_277_464_476_20MER__m, MG_072_DIMER__c, MG_307_MONOMER__c, mw84e0f2b1_1875_492f_afa5_16a38204fc8f_mw72825ae5_3215_4521_ad2a_e5945a59c01b)
  mw84e0f2b1_1875_492f_afa5_16a38204fc8f_mw72825ae5_3215_4521_ad2a_e5945a59c01b*MG_072_DIMER__c*MG_055_170_277_464_476_20MER__m*MG_307_MONOMER__c*ATP__c/((1 + MG_307_MONOMER__c/Km1_MG_307_MONOMER__c)*(1 + ATP__c/Km2_ATP__c));
end
Function_for_ATP__c___H2O__c___MG_307_MONOMER__c__MG_055_170_277_464_476_20MER__m__MG_072_DIMER__c___ADP__c___H__c___MG_307_MONOMER__m___PI__c is "Function for ATP__c + H2O__c + MG_307_MONOMER__c -MG_055_170_277_464_476_20MER__m, MG_072_DIMER__c-> ADP__c + H__c + MG_307_MONOMER__m + PI__c";

function Function_for_ATP__c___H2O__c___MG_411_MONOMER__c__MG_055_170_277_464_476_20MER__m__MG_072_DIMER__c___ADP__c___H__c___MG_411_MONOMER__m___PI__c(ATP__c, Km1_MG_411_MONOMER__c, Km2_ATP__c, MG_055_170_277_464_476_20MER__m, MG_072_DIMER__c, MG_411_MONOMER__c, mw89ed1da7_e15c_4c26_84f7_f2a7a25b5ebc_mw74da51a5_3473_427c_8836_9246c7418c16)
  mw89ed1da7_e15c_4c26_84f7_f2a7a25b5ebc_mw74da51a5_3473_427c_8836_9246c7418c16*MG_072_DIMER__c*MG_055_170_277_464_476_20MER__m*MG_411_MONOMER__c*ATP__c/((1 + MG_411_MONOMER__c/Km1_MG_411_MONOMER__c)*(1 + ATP__c/Km2_ATP__c));
end
Function_for_ATP__c___H2O__c___MG_411_MONOMER__c__MG_055_170_277_464_476_20MER__m__MG_072_DIMER__c___ADP__c___H__c___MG_411_MONOMER__m___PI__c is "Function for ATP__c + H2O__c + MG_411_MONOMER__c -MG_055_170_277_464_476_20MER__m, MG_072_DIMER__c-> ADP__c + H__c + MG_411_MONOMER__m + PI__c";

function Function_for_ATP__c___H2O__c___MG_061_MONOMER__c__MG_055_170_277_464_476_20MER__m__MG_072_DIMER__c___ADP__c___H__c___MG_061_MONOMER__m___PI__c(ATP__c, Km1_MG_061_MONOMER__c, Km2_ATP__c, MG_055_170_277_464_476_20MER__m, MG_061_MONOMER__c, MG_072_DIMER__c, mw8cc3bae6_1211_4d4d_87ed_cfe2c829aa21_mw6f425ad5_2a14_48fb_91fd_81d10ab3f0a6)
  mw8cc3bae6_1211_4d4d_87ed_cfe2c829aa21_mw6f425ad5_2a14_48fb_91fd_81d10ab3f0a6*MG_072_DIMER__c*MG_055_170_277_464_476_20MER__m*MG_061_MONOMER__c*ATP__c/((1 + MG_061_MONOMER__c/Km1_MG_061_MONOMER__c)*(1 + ATP__c/Km2_ATP__c));
end
Function_for_ATP__c___H2O__c___MG_061_MONOMER__c__MG_055_170_277_464_476_20MER__m__MG_072_DIMER__c___ADP__c___H__c___MG_061_MONOMER__m___PI__c is "Function for ATP__c + H2O__c + MG_061_MONOMER__c -MG_055_170_277_464_476_20MER__m, MG_072_DIMER__c-> ADP__c + H__c + MG_061_MONOMER__m + PI__c";

function Function_for_ATP__c___H2O__c___MG_121_MONOMER__c__MG_055_170_277_464_476_20MER__m__MG_072_DIMER__c___ADP__c___H__c___MG_121_MONOMER__m___PI__c(ATP__c, Km1_MG_121_MONOMER__c, Km2_ATP__c, MG_055_170_277_464_476_20MER__m, MG_072_DIMER__c, MG_121_MONOMER__c, mw914606c4_85d7_4f95_a4ae_7d361e47b24a_mw2893d8f8_f46c_4780_89d7_3a62bb1e7168)
  mw914606c4_85d7_4f95_a4ae_7d361e47b24a_mw2893d8f8_f46c_4780_89d7_3a62bb1e7168*MG_072_DIMER__c*MG_055_170_277_464_476_20MER__m*MG_121_MONOMER__c*ATP__c/((1 + MG_121_MONOMER__c/Km1_MG_121_MONOMER__c)*(1 + ATP__c/Km2_ATP__c));
end
Function_for_ATP__c___H2O__c___MG_121_MONOMER__c__MG_055_170_277_464_476_20MER__m__MG_072_DIMER__c___ADP__c___H__c___MG_121_MONOMER__m___PI__c is "Function for ATP__c + H2O__c + MG_121_MONOMER__c -MG_055_170_277_464_476_20MER__m, MG_072_DIMER__c-> ADP__c + H__c + MG_121_MONOMER__m + PI__c";

function Function_for_ATP__c___H2O__c___MG_055_MONOMER__c__MG_055_170_277_464_476_20MER__m__MG_072_DIMER__c___ADP__c___H__c___MG_055_MONOMER__m___PI__c(ATP__c, Km1_MG_055_MONOMER__c, Km2_ATP__c, MG_055_170_277_464_476_20MER__m, MG_055_MONOMER__c, MG_072_DIMER__c, mw98a11040_8b76_445e_907f_0d2e36bc489a_mw7e39a2a3_aa6a_4e5c_89f1_7d2249803ede)
  mw98a11040_8b76_445e_907f_0d2e36bc489a_mw7e39a2a3_aa6a_4e5c_89f1_7d2249803ede*MG_072_DIMER__c*MG_055_170_277_464_476_20MER__m*MG_055_MONOMER__c*ATP__c/((1 + MG_055_MONOMER__c/Km1_MG_055_MONOMER__c)*(1 + ATP__c/Km2_ATP__c));
end
Function_for_ATP__c___H2O__c___MG_055_MONOMER__c__MG_055_170_277_464_476_20MER__m__MG_072_DIMER__c___ADP__c___H__c___MG_055_MONOMER__m___PI__c is "Function for ATP__c + H2O__c + MG_055_MONOMER__c -MG_055_170_277_464_476_20MER__m, MG_072_DIMER__c-> ADP__c + H__c + MG_055_MONOMER__m + PI__c";

function Function_for_ATP__c___H2O__c___MG_069_MONOMER__c__MG_055_170_277_464_476_20MER__m__MG_072_DIMER__c___ADP__c___H__c___MG_069_MONOMER__m___PI__c(ATP__c, Km1_MG_069_MONOMER__c, Km2_ATP__c, MG_055_170_277_464_476_20MER__m, MG_069_MONOMER__c, MG_072_DIMER__c, mw9956c58c_c87f_4e9c_8b23_ffcea0518ba1_mwda6b5b0f_3116_443a_ad3c_eca261651a70)
  mw9956c58c_c87f_4e9c_8b23_ffcea0518ba1_mwda6b5b0f_3116_443a_ad3c_eca261651a70*MG_072_DIMER__c*MG_055_170_277_464_476_20MER__m*MG_069_MONOMER__c*ATP__c/((1 + MG_069_MONOMER__c/Km1_MG_069_MONOMER__c)*(1 + ATP__c/Km2_ATP__c));
end
Function_for_ATP__c___H2O__c___MG_069_MONOMER__c__MG_055_170_277_464_476_20MER__m__MG_072_DIMER__c___ADP__c___H__c___MG_069_MONOMER__m___PI__c is "Function for ATP__c + H2O__c + MG_069_MONOMER__c -MG_055_170_277_464_476_20MER__m, MG_072_DIMER__c-> ADP__c + H__c + MG_069_MONOMER__m + PI__c";

function Function_for_ATP__c___H2O__c___MG_294_MONOMER__c__MG_055_170_277_464_476_20MER__m__MG_072_DIMER__c___ADP__c___H__c___MG_294_MONOMER__m___PI__c(ATP__c, Km1_MG_294_MONOMER__c, Km2_ATP__c, MG_055_170_277_464_476_20MER__m, MG_072_DIMER__c, MG_294_MONOMER__c, mw9cd6faef_393f_4e11_a40e_13b2ad4f4c2d_mwd332800f_1b9d_40e1_a799_29e92685c2fd)
  mw9cd6faef_393f_4e11_a40e_13b2ad4f4c2d_mwd332800f_1b9d_40e1_a799_29e92685c2fd*MG_072_DIMER__c*MG_055_170_277_464_476_20MER__m*MG_294_MONOMER__c*ATP__c/((1 + MG_294_MONOMER__c/Km1_MG_294_MONOMER__c)*(1 + ATP__c/Km2_ATP__c));
end
Function_for_ATP__c___H2O__c___MG_294_MONOMER__c__MG_055_170_277_464_476_20MER__m__MG_072_DIMER__c___ADP__c___H__c___MG_294_MONOMER__m___PI__c is "Function for ATP__c + H2O__c + MG_294_MONOMER__c -MG_055_170_277_464_476_20MER__m, MG_072_DIMER__c-> ADP__c + H__c + MG_294_MONOMER__m + PI__c";

function Function_for_ATP__c___H2O__c___MG_306_MONOMER__c__MG_055_170_277_464_476_20MER__m__MG_072_DIMER__c___ADP__c___H__c___MG_306_MONOMER__m___PI__c(ATP__c, Km1_MG_306_MONOMER__c, Km2_ATP__c, MG_055_170_277_464_476_20MER__m, MG_072_DIMER__c, MG_306_MONOMER__c, mwa0a369ab_ce7a_4b6a_9f06_002aa7c470f0_mw2c8fc140_7ce8_490d_ab05_a10c2b7db8ca)
  mwa0a369ab_ce7a_4b6a_9f06_002aa7c470f0_mw2c8fc140_7ce8_490d_ab05_a10c2b7db8ca*MG_072_DIMER__c*MG_055_170_277_464_476_20MER__m*MG_306_MONOMER__c*ATP__c/((1 + MG_306_MONOMER__c/Km1_MG_306_MONOMER__c)*(1 + ATP__c/Km2_ATP__c));
end
Function_for_ATP__c___H2O__c___MG_306_MONOMER__c__MG_055_170_277_464_476_20MER__m__MG_072_DIMER__c___ADP__c___H__c___MG_306_MONOMER__m___PI__c is "Function for ATP__c + H2O__c + MG_306_MONOMER__c -MG_055_170_277_464_476_20MER__m, MG_072_DIMER__c-> ADP__c + H__c + MG_306_MONOMER__m + PI__c";

function Function_for_ATP__c___H2O__c___MG_397_MONOMER__c__MG_055_170_277_464_476_20MER__m__MG_072_DIMER__c___ADP__c___H__c___MG_397_MONOMER__e___PI__c(ATP__c, Km1_MG_397_MONOMER__c, Km2_ATP__c, MG_055_170_277_464_476_20MER__m, MG_072_DIMER__c, MG_397_MONOMER__c, mwa0e11e53_b154_4448_a260_27c460f7894a_mwcc68414c_ef80_4a82_8707_bd0443b5d7c6)
  mwa0e11e53_b154_4448_a260_27c460f7894a_mwcc68414c_ef80_4a82_8707_bd0443b5d7c6*MG_072_DIMER__c*MG_055_170_277_464_476_20MER__m*MG_397_MONOMER__c*ATP__c/((1 + MG_397_MONOMER__c/Km1_MG_397_MONOMER__c)*(1 + ATP__c/Km2_ATP__c));
end
Function_for_ATP__c___H2O__c___MG_397_MONOMER__c__MG_055_170_277_464_476_20MER__m__MG_072_DIMER__c___ADP__c___H__c___MG_397_MONOMER__e___PI__c is "Function for ATP__c + H2O__c + MG_397_MONOMER__c -MG_055_170_277_464_476_20MER__m, MG_072_DIMER__c-> ADP__c + H__c + MG_397_MONOMER__e + PI__c";

function Function_for_ATP__c___H2O__c___MG_241_MONOMER__c__MG_055_170_277_464_476_20MER__m__MG_072_DIMER__c___ADP__c___H__c___MG_241_MONOMER__m___PI__c(ATP__c, Km1_MG_241_MONOMER__c, Km2_ATP__c, MG_055_170_277_464_476_20MER__m, MG_072_DIMER__c, MG_241_MONOMER__c, mwa7323961_7675_449c_bee1_f83525e3135f_mwcde2fca7_9f37_4c54_bd96_178294666c02)
  mwa7323961_7675_449c_bee1_f83525e3135f_mwcde2fca7_9f37_4c54_bd96_178294666c02*MG_072_DIMER__c*MG_055_170_277_464_476_20MER__m*MG_241_MONOMER__c*ATP__c/((1 + MG_241_MONOMER__c/Km1_MG_241_MONOMER__c)*(1 + ATP__c/Km2_ATP__c));
end
Function_for_ATP__c___H2O__c___MG_241_MONOMER__c__MG_055_170_277_464_476_20MER__m__MG_072_DIMER__c___ADP__c___H__c___MG_241_MONOMER__m___PI__c is "Function for ATP__c + H2O__c + MG_241_MONOMER__c -MG_055_170_277_464_476_20MER__m, MG_072_DIMER__c-> ADP__c + H__c + MG_241_MONOMER__m + PI__c";

function Function_for_ATP__c___H2O__c___MG_280_MONOMER__c__MG_055_170_277_464_476_20MER__m__MG_072_DIMER__c___ADP__c___H__c___MG_280_MONOMER__m___PI__c(ATP__c, Km1_MG_280_MONOMER__c, Km2_ATP__c, MG_055_170_277_464_476_20MER__m, MG_072_DIMER__c, MG_280_MONOMER__c, mwae4f6c56_2284_4dcd_90bc_f2a5eaaad08e_mw940189b0_b9b2_4846_a5ce_83c68a6c5b83)
  mwae4f6c56_2284_4dcd_90bc_f2a5eaaad08e_mw940189b0_b9b2_4846_a5ce_83c68a6c5b83*MG_072_DIMER__c*MG_055_170_277_464_476_20MER__m*MG_280_MONOMER__c*ATP__c/((1 + MG_280_MONOMER__c/Km1_MG_280_MONOMER__c)*(1 + ATP__c/Km2_ATP__c));
end
Function_for_ATP__c___H2O__c___MG_280_MONOMER__c__MG_055_170_277_464_476_20MER__m__MG_072_DIMER__c___ADP__c___H__c___MG_280_MONOMER__m___PI__c is "Function for ATP__c + H2O__c + MG_280_MONOMER__c -MG_055_170_277_464_476_20MER__m, MG_072_DIMER__c-> ADP__c + H__c + MG_280_MONOMER__m + PI__c";

function Function_for_ATP__c___H2O__c___MG_281_MONOMER__c__MG_055_170_277_464_476_20MER__m__MG_072_DIMER__c___ADP__c___H__c___MG_281_MONOMER__e___PI__c(ATP__c, Km1_MG_281_MONOMER__c, Km2_ATP__c, MG_055_170_277_464_476_20MER__m, MG_072_DIMER__c, MG_281_MONOMER__c, mwaeb47bca_ac70_4da0_bf11_e6d1818b7ae5_mwa8f9a427_7347_4e8d_8426_6e3a8bc60452)
  mwaeb47bca_ac70_4da0_bf11_e6d1818b7ae5_mwa8f9a427_7347_4e8d_8426_6e3a8bc60452*MG_072_DIMER__c*MG_055_170_277_464_476_20MER__m*MG_281_MONOMER__c*ATP__c/((1 + MG_281_MONOMER__c/Km1_MG_281_MONOMER__c)*(1 + ATP__c/Km2_ATP__c));
end
Function_for_ATP__c___H2O__c___MG_281_MONOMER__c__MG_055_170_277_464_476_20MER__m__MG_072_DIMER__c___ADP__c___H__c___MG_281_MONOMER__e___PI__c is "Function for ATP__c + H2O__c + MG_281_MONOMER__c -MG_055_170_277_464_476_20MER__m, MG_072_DIMER__c-> ADP__c + H__c + MG_281_MONOMER__e + PI__c";

function Function_for_ATP__c___H2O__c___MG_028_MONOMER__c__MG_055_170_277_464_476_20MER__m__MG_072_DIMER__c___ADP__c___H__c___MG_028_MONOMER__m___PI__c(ATP__c, Km1_MG_028_MONOMER__c, Km2_ATP__c, MG_028_MONOMER__c, MG_055_170_277_464_476_20MER__m, MG_072_DIMER__c, mwb1f07fc3_6224_4193_9fc8_1dd67185fd52_mw2dbbb1cc_2982_42a5_b321_2edc366b41d0)
  mwb1f07fc3_6224_4193_9fc8_1dd67185fd52_mw2dbbb1cc_2982_42a5_b321_2edc366b41d0*MG_072_DIMER__c*MG_055_170_277_464_476_20MER__m*MG_028_MONOMER__c*ATP__c/((1 + MG_028_MONOMER__c/Km1_MG_028_MONOMER__c)*(1 + ATP__c/Km2_ATP__c));
end
Function_for_ATP__c___H2O__c___MG_028_MONOMER__c__MG_055_170_277_464_476_20MER__m__MG_072_DIMER__c___ADP__c___H__c___MG_028_MONOMER__m___PI__c is "Function for ATP__c + H2O__c + MG_028_MONOMER__c -MG_055_170_277_464_476_20MER__m, MG_072_DIMER__c-> ADP__c + H__c + MG_028_MONOMER__m + PI__c";

function Function_for_ATP__c___H2O__c___MG_432_MONOMER__c__MG_055_170_277_464_476_20MER__m__MG_072_DIMER__c___ADP__c___H__c___MG_432_MONOMER__m___PI__c(ATP__c, Km1_MG_432_MONOMER__c, Km2_ATP__c, MG_055_170_277_464_476_20MER__m, MG_072_DIMER__c, MG_432_MONOMER__c, mwb2055382_2a10_408f_9a42_4c7282124b8d_mw02d7b1ca_224d_4f8b_9c7e_3aae85f0e765)
  mwb2055382_2a10_408f_9a42_4c7282124b8d_mw02d7b1ca_224d_4f8b_9c7e_3aae85f0e765*MG_072_DIMER__c*MG_055_170_277_464_476_20MER__m*MG_432_MONOMER__c*ATP__c/((1 + MG_432_MONOMER__c/Km1_MG_432_MONOMER__c)*(1 + ATP__c/Km2_ATP__c));
end
Function_for_ATP__c___H2O__c___MG_432_MONOMER__c__MG_055_170_277_464_476_20MER__m__MG_072_DIMER__c___ADP__c___H__c___MG_432_MONOMER__m___PI__c is "Function for ATP__c + H2O__c + MG_432_MONOMER__c -MG_055_170_277_464_476_20MER__m, MG_072_DIMER__c-> ADP__c + H__c + MG_432_MONOMER__m + PI__c";

function Function_for_ATP__c___H2O__c___MG_225_MONOMER__c__MG_055_170_277_464_476_20MER__m__MG_072_DIMER__c___ADP__c___H__c___MG_225_MONOMER__m___PI__c(ATP__c, Km1_MG_225_MONOMER__c, Km2_ATP__c, MG_055_170_277_464_476_20MER__m, MG_072_DIMER__c, MG_225_MONOMER__c, mwb71a6dce_3c95_4a2d_a963_5490b3925b3f_mw2dd7d67c_9134_4aa1_94ad_7441218fc26e)
  mwb71a6dce_3c95_4a2d_a963_5490b3925b3f_mw2dd7d67c_9134_4aa1_94ad_7441218fc26e*MG_072_DIMER__c*MG_055_170_277_464_476_20MER__m*MG_225_MONOMER__c*ATP__c/((1 + MG_225_MONOMER__c/Km1_MG_225_MONOMER__c)*(1 + ATP__c/Km2_ATP__c));
end
Function_for_ATP__c___H2O__c___MG_225_MONOMER__c__MG_055_170_277_464_476_20MER__m__MG_072_DIMER__c___ADP__c___H__c___MG_225_MONOMER__m___PI__c is "Function for ATP__c + H2O__c + MG_225_MONOMER__c -MG_055_170_277_464_476_20MER__m, MG_072_DIMER__c-> ADP__c + H__c + MG_225_MONOMER__m + PI__c";

function Function_for_ATP__c___H2O__c___MG_457_MONOMER__c__MG_055_170_277_464_476_20MER__m__MG_072_DIMER__c___ADP__c___H__c___MG_457_MONOMER__m___PI__c(ATP__c, Km1_MG_457_MONOMER__c, Km2_ATP__c, MG_055_170_277_464_476_20MER__m, MG_072_DIMER__c, MG_457_MONOMER__c, mwb8e77d5e_8425_4276_89a0_9b613392c53b_mw22255b4b_b579_4333_af5e_749a01be15ef)
  mwb8e77d5e_8425_4276_89a0_9b613392c53b_mw22255b4b_b579_4333_af5e_749a01be15ef*MG_072_DIMER__c*MG_055_170_277_464_476_20MER__m*MG_457_MONOMER__c*ATP__c/((1 + MG_457_MONOMER__c/Km1_MG_457_MONOMER__c)*(1 + ATP__c/Km2_ATP__c));
end
Function_for_ATP__c___H2O__c___MG_457_MONOMER__c__MG_055_170_277_464_476_20MER__m__MG_072_DIMER__c___ADP__c___H__c___MG_457_MONOMER__m___PI__c is "Function for ATP__c + H2O__c + MG_457_MONOMER__c -MG_055_170_277_464_476_20MER__m, MG_072_DIMER__c-> ADP__c + H__c + MG_457_MONOMER__m + PI__c";

function Function_for_ATP__c___H2O__c___MG_521_MONOMER__c__MG_055_170_277_464_476_20MER__m__MG_072_DIMER__c___ADP__c___H__c___MG_521_MONOMER__m___PI__c(ATP__c, Km1_MG_521_MONOMER__c, Km2_ATP__c, MG_055_170_277_464_476_20MER__m, MG_072_DIMER__c, MG_521_MONOMER__c, mwbc04e67d_2c78_4a69_8d5b_81a2b6a0657f_mwa79d19e6_dbc8_4cb0_a044_686c42f88c3a)
  mwbc04e67d_2c78_4a69_8d5b_81a2b6a0657f_mwa79d19e6_dbc8_4cb0_a044_686c42f88c3a*MG_072_DIMER__c*MG_055_170_277_464_476_20MER__m*MG_521_MONOMER__c*ATP__c/((1 + MG_521_MONOMER__c/Km1_MG_521_MONOMER__c)*(1 + ATP__c/Km2_ATP__c));
end
Function_for_ATP__c___H2O__c___MG_521_MONOMER__c__MG_055_170_277_464_476_20MER__m__MG_072_DIMER__c___ADP__c___H__c___MG_521_MONOMER__m___PI__c is "Function for ATP__c + H2O__c + MG_521_MONOMER__c -MG_055_170_277_464_476_20MER__m, MG_072_DIMER__c-> ADP__c + H__c + MG_521_MONOMER__m + PI__c";

function Function_for_ATP__c___H2O__c___MG_309_MONOMER__c__MG_055_170_277_464_476_20MER__m__MG_072_DIMER__c___ADP__c___H__c___MG_309_MONOMER__m___PI__c(ATP__c, Km1_MG_309_MONOMER__c, Km2_ATP__c, MG_055_170_277_464_476_20MER__m, MG_072_DIMER__c, MG_309_MONOMER__c, mwbe06e593_d008_475f_9e61_75bed67b4bab_mwdef91057_28f5_4c09_945d_13073ac6c21b)
  mwbe06e593_d008_475f_9e61_75bed67b4bab_mwdef91057_28f5_4c09_945d_13073ac6c21b*MG_072_DIMER__c*MG_055_170_277_464_476_20MER__m*MG_309_MONOMER__c*ATP__c/((1 + MG_309_MONOMER__c/Km1_MG_309_MONOMER__c)*(1 + ATP__c/Km2_ATP__c));
end
Function_for_ATP__c___H2O__c___MG_309_MONOMER__c__MG_055_170_277_464_476_20MER__m__MG_072_DIMER__c___ADP__c___H__c___MG_309_MONOMER__m___PI__c is "Function for ATP__c + H2O__c + MG_309_MONOMER__c -MG_055_170_277_464_476_20MER__m, MG_072_DIMER__c-> ADP__c + H__c + MG_309_MONOMER__m + PI__c";

function Function_for_ATP__c___H2O__c___MG_322_MONOMER__c__MG_055_170_277_464_476_20MER__m__MG_072_DIMER__c___ADP__c___H__c___MG_322_MONOMER__m___PI__c(ATP__c, Km1_MG_322_MONOMER__c, Km2_ATP__c, MG_055_170_277_464_476_20MER__m, MG_072_DIMER__c, MG_322_MONOMER__c, mwc3bde18e_cc23_45a6_a6b6_7d91062e7678_mwe43c7ef1_f9ae_470b_a950_6f28de0e1561)
  mwc3bde18e_cc23_45a6_a6b6_7d91062e7678_mwe43c7ef1_f9ae_470b_a950_6f28de0e1561*MG_072_DIMER__c*MG_055_170_277_464_476_20MER__m*MG_322_MONOMER__c*ATP__c/((1 + MG_322_MONOMER__c/Km1_MG_322_MONOMER__c)*(1 + ATP__c/Km2_ATP__c));
end
Function_for_ATP__c___H2O__c___MG_322_MONOMER__c__MG_055_170_277_464_476_20MER__m__MG_072_DIMER__c___ADP__c___H__c___MG_322_MONOMER__m___PI__c is "Function for ATP__c + H2O__c + MG_322_MONOMER__c -MG_055_170_277_464_476_20MER__m, MG_072_DIMER__c-> ADP__c + H__c + MG_322_MONOMER__m + PI__c";

function Function_for_ATP__c___H2O__c___MG_077_MONOMER__c__MG_055_170_277_464_476_20MER__m__MG_072_DIMER__c___ADP__c___H__c___MG_077_MONOMER__m___PI__c(ATP__c, Km1_MG_077_MONOMER__c, Km2_ATP__c, MG_055_170_277_464_476_20MER__m, MG_072_DIMER__c, MG_077_MONOMER__c, mwc8ac7e73_2d08_4839_b3f7_71a5eb961f86_mw272cd6f3_832b_4e22_83e2_0669f6171017)
  mwc8ac7e73_2d08_4839_b3f7_71a5eb961f86_mw272cd6f3_832b_4e22_83e2_0669f6171017*MG_072_DIMER__c*MG_055_170_277_464_476_20MER__m*MG_077_MONOMER__c*ATP__c/((1 + MG_077_MONOMER__c/Km1_MG_077_MONOMER__c)*(1 + ATP__c/Km2_ATP__c));
end
Function_for_ATP__c___H2O__c___MG_077_MONOMER__c__MG_055_170_277_464_476_20MER__m__MG_072_DIMER__c___ADP__c___H__c___MG_077_MONOMER__m___PI__c is "Function for ATP__c + H2O__c + MG_077_MONOMER__c -MG_055_170_277_464_476_20MER__m, MG_072_DIMER__c-> ADP__c + H__c + MG_077_MONOMER__m + PI__c";

function Function_for_ATP__c___H2O__c___MG_405_MONOMER__c__MG_055_170_277_464_476_20MER__m__MG_072_DIMER__c___ADP__c___H__c___MG_405_MONOMER__m___PI__c(ATP__c, Km1_MG_405_MONOMER__c, Km2_ATP__c, MG_055_170_277_464_476_20MER__m, MG_072_DIMER__c, MG_405_MONOMER__c, mwca087d8c_b24e_4682_9943_ab54907ef9e7_mwb80aae3b_e132_4106_9279_b8ebd7797c4b)
  mwca087d8c_b24e_4682_9943_ab54907ef9e7_mwb80aae3b_e132_4106_9279_b8ebd7797c4b*MG_072_DIMER__c*MG_055_170_277_464_476_20MER__m*MG_405_MONOMER__c*ATP__c/((1 + MG_405_MONOMER__c/Km1_MG_405_MONOMER__c)*(1 + ATP__c/Km2_ATP__c));
end
Function_for_ATP__c___H2O__c___MG_405_MONOMER__c__MG_055_170_277_464_476_20MER__m__MG_072_DIMER__c___ADP__c___H__c___MG_405_MONOMER__m___PI__c is "Function for ATP__c + H2O__c + MG_405_MONOMER__c -MG_055_170_277_464_476_20MER__m, MG_072_DIMER__c-> ADP__c + H__c + MG_405_MONOMER__m + PI__c";

function Function_for_ATP__c___H2O__c___MG_086_MONOMER__c__MG_055_170_277_464_476_20MER__m__MG_072_DIMER__c___ADP__c___H__c___MG_086_MONOMER__m___PI__c(ATP__c, Km1_MG_086_MONOMER__c, Km2_ATP__c, MG_055_170_277_464_476_20MER__m, MG_072_DIMER__c, MG_086_MONOMER__c, mwcbf4da38_e9cd_40f4_bf0b_b0eabf973c4f_mwe44ba274_998f_4032_a713_5d08d4ee148f)
  mwcbf4da38_e9cd_40f4_bf0b_b0eabf973c4f_mwe44ba274_998f_4032_a713_5d08d4ee148f*MG_072_DIMER__c*MG_055_170_277_464_476_20MER__m*MG_086_MONOMER__c*ATP__c/((1 + MG_086_MONOMER__c/Km1_MG_086_MONOMER__c)*(1 + ATP__c/Km2_ATP__c));
end
Function_for_ATP__c___H2O__c___MG_086_MONOMER__c__MG_055_170_277_464_476_20MER__m__MG_072_DIMER__c___ADP__c___H__c___MG_086_MONOMER__m___PI__c is "Function for ATP__c + H2O__c + MG_086_MONOMER__c -MG_055_170_277_464_476_20MER__m, MG_072_DIMER__c-> ADP__c + H__c + MG_086_MONOMER__m + PI__c";

function Function_for_ATP__c___H2O__c___MG_348_MONOMER__c__MG_055_170_277_464_476_20MER__m__MG_072_DIMER__c___ADP__c___H__c___MG_348_MONOMER__m___PI__c(ATP__c, Km1_MG_348_MONOMER__c, Km2_ATP__c, MG_055_170_277_464_476_20MER__m, MG_072_DIMER__c, MG_348_MONOMER__c, mwd026f4e8_d82c_4fad_a8be_923e1178c437_mw79b48654_d158_4790_bdb1_47125fccd1a7)
  mwd026f4e8_d82c_4fad_a8be_923e1178c437_mw79b48654_d158_4790_bdb1_47125fccd1a7*MG_072_DIMER__c*MG_055_170_277_464_476_20MER__m*MG_348_MONOMER__c*ATP__c/((1 + MG_348_MONOMER__c/Km1_MG_348_MONOMER__c)*(1 + ATP__c/Km2_ATP__c));
end
Function_for_ATP__c___H2O__c___MG_348_MONOMER__c__MG_055_170_277_464_476_20MER__m__MG_072_DIMER__c___ADP__c___H__c___MG_348_MONOMER__m___PI__c is "Function for ATP__c + H2O__c + MG_348_MONOMER__c -MG_055_170_277_464_476_20MER__m, MG_072_DIMER__c-> ADP__c + H__c + MG_348_MONOMER__m + PI__c";

function Function_for_ATP__c___H2O__c___MG_247_MONOMER__c__MG_055_170_277_464_476_20MER__m__MG_072_DIMER__c___ADP__c___H__c___MG_247_MONOMER__m___PI__c(ATP__c, Km1_MG_247_MONOMER__c, Km2_ATP__c, MG_055_170_277_464_476_20MER__m, MG_072_DIMER__c, MG_247_MONOMER__c, mwd03247aa_2e55_477b_85c0_9c0b414f858e_mw28747366_fb1c_4ec1_848e_b7316d2e15ae)
  mwd03247aa_2e55_477b_85c0_9c0b414f858e_mw28747366_fb1c_4ec1_848e_b7316d2e15ae*MG_072_DIMER__c*MG_055_170_277_464_476_20MER__m*MG_247_MONOMER__c*ATP__c/((1 + MG_247_MONOMER__c/Km1_MG_247_MONOMER__c)*(1 + ATP__c/Km2_ATP__c));
end
Function_for_ATP__c___H2O__c___MG_247_MONOMER__c__MG_055_170_277_464_476_20MER__m__MG_072_DIMER__c___ADP__c___H__c___MG_247_MONOMER__m___PI__c is "Function for ATP__c + H2O__c + MG_247_MONOMER__c -MG_055_170_277_464_476_20MER__m, MG_072_DIMER__c-> ADP__c + H__c + MG_247_MONOMER__m + PI__c";

function Function_for_ATP__c___H2O__c___MG_447_MONOMER__c__MG_055_170_277_464_476_20MER__m__MG_072_DIMER__c___ADP__c___H__c___MG_447_MONOMER__m___PI__c(ATP__c, Km1_MG_447_MONOMER__c, Km2_ATP__c, MG_055_170_277_464_476_20MER__m, MG_072_DIMER__c, MG_447_MONOMER__c, mwd0f2fd5e_3219_4b83_9a80_2d0e147b98bb_mwacdaacbb_69f7_464e_8f4e_22e62b03797d)
  mwd0f2fd5e_3219_4b83_9a80_2d0e147b98bb_mwacdaacbb_69f7_464e_8f4e_22e62b03797d*MG_072_DIMER__c*MG_055_170_277_464_476_20MER__m*MG_447_MONOMER__c*ATP__c/((1 + MG_447_MONOMER__c/Km1_MG_447_MONOMER__c)*(1 + ATP__c/Km2_ATP__c));
end
Function_for_ATP__c___H2O__c___MG_447_MONOMER__c__MG_055_170_277_464_476_20MER__m__MG_072_DIMER__c___ADP__c___H__c___MG_447_MONOMER__m___PI__c is "Function for ATP__c + H2O__c + MG_447_MONOMER__c -MG_055_170_277_464_476_20MER__m, MG_072_DIMER__c-> ADP__c + H__c + MG_447_MONOMER__m + PI__c";

function Function_for_ATP__c___H2O__c___MG_071_MONOMER__c__MG_055_170_277_464_476_20MER__m__MG_072_DIMER__c___ADP__c___H__c___MG_071_MONOMER__m___PI__c(ATP__c, Km1_MG_071_MONOMER__c, Km2_ATP__c, MG_055_170_277_464_476_20MER__m, MG_071_MONOMER__c, MG_072_DIMER__c, mwd51828a2_81dd_4d1d_b298_ae01b8c28d7b_mwe022097f_87be_4074_be72_c6533747e430)
  mwd51828a2_81dd_4d1d_b298_ae01b8c28d7b_mwe022097f_87be_4074_be72_c6533747e430*MG_072_DIMER__c*MG_055_170_277_464_476_20MER__m*MG_071_MONOMER__c*ATP__c/((1 + MG_071_MONOMER__c/Km1_MG_071_MONOMER__c)*(1 + ATP__c/Km2_ATP__c));
end
Function_for_ATP__c___H2O__c___MG_071_MONOMER__c__MG_055_170_277_464_476_20MER__m__MG_072_DIMER__c___ADP__c___H__c___MG_071_MONOMER__m___PI__c is "Function for ATP__c + H2O__c + MG_071_MONOMER__c -MG_055_170_277_464_476_20MER__m, MG_072_DIMER__c-> ADP__c + H__c + MG_071_MONOMER__m + PI__c";

function Function_for_ATP__c___H2O__c___MG_314_MONOMER__c__MG_055_170_277_464_476_20MER__m__MG_072_DIMER__c___ADP__c___H__c___MG_314_MONOMER__m___PI__c(ATP__c, Km1_MG_314_MONOMER__c, Km2_ATP__c, MG_055_170_277_464_476_20MER__m, MG_072_DIMER__c, MG_314_MONOMER__c, mwd5cf4645_824b_4730_9259_50d63e7f9383_mwfb44cb3c_76ec_4fcf_b495_d43d194bb6d4)
  mwd5cf4645_824b_4730_9259_50d63e7f9383_mwfb44cb3c_76ec_4fcf_b495_d43d194bb6d4*MG_072_DIMER__c*MG_055_170_277_464_476_20MER__m*MG_314_MONOMER__c*ATP__c/((1 + MG_314_MONOMER__c/Km1_MG_314_MONOMER__c)*(1 + ATP__c/Km2_ATP__c));
end
Function_for_ATP__c___H2O__c___MG_314_MONOMER__c__MG_055_170_277_464_476_20MER__m__MG_072_DIMER__c___ADP__c___H__c___MG_314_MONOMER__m___PI__c is "Function for ATP__c + H2O__c + MG_314_MONOMER__c -MG_055_170_277_464_476_20MER__m, MG_072_DIMER__c-> ADP__c + H__c + MG_314_MONOMER__m + PI__c";

function Function_for_ATP__c___H2O__c___MG_131_MONOMER__c__MG_055_170_277_464_476_20MER__m__MG_072_DIMER__c___ADP__c___H__c___MG_131_MONOMER__m___PI__c(ATP__c, Km1_MG_131_MONOMER__c, Km2_ATP__c, MG_055_170_277_464_476_20MER__m, MG_072_DIMER__c, MG_131_MONOMER__c, mwd5eb53f9_7ba6_4148_ba37_bac1b763e776_mw203aacc0_79d4_4a39_ab98_5416123078e9)
  mwd5eb53f9_7ba6_4148_ba37_bac1b763e776_mw203aacc0_79d4_4a39_ab98_5416123078e9*MG_072_DIMER__c*MG_055_170_277_464_476_20MER__m*MG_131_MONOMER__c*ATP__c/((1 + MG_131_MONOMER__c/Km1_MG_131_MONOMER__c)*(1 + ATP__c/Km2_ATP__c));
end
Function_for_ATP__c___H2O__c___MG_131_MONOMER__c__MG_055_170_277_464_476_20MER__m__MG_072_DIMER__c___ADP__c___H__c___MG_131_MONOMER__m___PI__c is "Function for ATP__c + H2O__c + MG_131_MONOMER__c -MG_055_170_277_464_476_20MER__m, MG_072_DIMER__c-> ADP__c + H__c + MG_131_MONOMER__m + PI__c";

function Function_for_ATP__c___H2O__c___MG_327_MONOMER__c__MG_055_170_277_464_476_20MER__m__MG_072_DIMER__c___ADP__c___H__c___MG_327_MONOMER__e___PI__c(ATP__c, Km1_MG_327_MONOMER__c, Km2_ATP__c, MG_055_170_277_464_476_20MER__m, MG_072_DIMER__c, MG_327_MONOMER__c, mwd6bf57ab_88bf_45ec_abcc_757e8be9be04_mwa66c8f84_63dc_467b_b683_f38e4fd08da2)
  mwd6bf57ab_88bf_45ec_abcc_757e8be9be04_mwa66c8f84_63dc_467b_b683_f38e4fd08da2*MG_072_DIMER__c*MG_055_170_277_464_476_20MER__m*MG_327_MONOMER__c*ATP__c/((1 + MG_327_MONOMER__c/Km1_MG_327_MONOMER__c)*(1 + ATP__c/Km2_ATP__c));
end
Function_for_ATP__c___H2O__c___MG_327_MONOMER__c__MG_055_170_277_464_476_20MER__m__MG_072_DIMER__c___ADP__c___H__c___MG_327_MONOMER__e___PI__c is "Function for ATP__c + H2O__c + MG_327_MONOMER__c -MG_055_170_277_464_476_20MER__m, MG_072_DIMER__c-> ADP__c + H__c + MG_327_MONOMER__e + PI__c";

function Function_for_ATP__c___H2O__c___MG_286_MONOMER__c__MG_055_170_277_464_476_20MER__m__MG_072_DIMER__c___ADP__c___H__c___MG_286_MONOMER__e___PI__c(ATP__c, Km1_MG_286_MONOMER__c, Km2_ATP__c, MG_055_170_277_464_476_20MER__m, MG_072_DIMER__c, MG_286_MONOMER__c, mwd9a9bea8_cfa4_4b3f_89e7_e43da84d573f_mw3f65d0d5_3b8b_499a_b758_d66d6fca0adc)
  mwd9a9bea8_cfa4_4b3f_89e7_e43da84d573f_mw3f65d0d5_3b8b_499a_b758_d66d6fca0adc*MG_072_DIMER__c*MG_055_170_277_464_476_20MER__m*MG_286_MONOMER__c*ATP__c/((1 + MG_286_MONOMER__c/Km1_MG_286_MONOMER__c)*(1 + ATP__c/Km2_ATP__c));
end
Function_for_ATP__c___H2O__c___MG_286_MONOMER__c__MG_055_170_277_464_476_20MER__m__MG_072_DIMER__c___ADP__c___H__c___MG_286_MONOMER__e___PI__c is "Function for ATP__c + H2O__c + MG_286_MONOMER__c -MG_055_170_277_464_476_20MER__m, MG_072_DIMER__c-> ADP__c + H__c + MG_286_MONOMER__e + PI__c";

function Function_for_ATP__c___H2O__c___MG_210_MONOMER__c__MG_055_170_277_464_476_20MER__m__MG_072_DIMER__c___ADP__c___H__c___MG_210_MONOMER__m___PI__c(ATP__c, Km1_MG_210_MONOMER__c, Km2_ATP__c, MG_055_170_277_464_476_20MER__m, MG_072_DIMER__c, MG_210_MONOMER__c, mwdd02747f_7d58_4876_8f02_87867711ac6c_mw010add1e_e52e_40c1_9d51_4433dd175653)
  mwdd02747f_7d58_4876_8f02_87867711ac6c_mw010add1e_e52e_40c1_9d51_4433dd175653*MG_072_DIMER__c*MG_055_170_277_464_476_20MER__m*MG_210_MONOMER__c*ATP__c/((1 + MG_210_MONOMER__c/Km1_MG_210_MONOMER__c)*(1 + ATP__c/Km2_ATP__c));
end
Function_for_ATP__c___H2O__c___MG_210_MONOMER__c__MG_055_170_277_464_476_20MER__m__MG_072_DIMER__c___ADP__c___H__c___MG_210_MONOMER__m___PI__c is "Function for ATP__c + H2O__c + MG_210_MONOMER__c -MG_055_170_277_464_476_20MER__m, MG_072_DIMER__c-> ADP__c + H__c + MG_210_MONOMER__m + PI__c";

function Function_for_ATP__c___H2O__c___MG_338_MONOMER__c__MG_055_170_277_464_476_20MER__m__MG_072_DIMER__c___ADP__c___H__c___MG_338_MONOMER__m___PI__c(ATP__c, Km1_MG_338_MONOMER__c, Km2_ATP__c, MG_055_170_277_464_476_20MER__m, MG_072_DIMER__c, MG_338_MONOMER__c, mwdeeea4dc_9942_4ede_93e0_d3a9d4946888_mwcd661af4_c6db_4b23_b087_2281f5ac4b4e)
  mwdeeea4dc_9942_4ede_93e0_d3a9d4946888_mwcd661af4_c6db_4b23_b087_2281f5ac4b4e*MG_072_DIMER__c*MG_055_170_277_464_476_20MER__m*MG_338_MONOMER__c*ATP__c/((1 + MG_338_MONOMER__c/Km1_MG_338_MONOMER__c)*(1 + ATP__c/Km2_ATP__c));
end
Function_for_ATP__c___H2O__c___MG_338_MONOMER__c__MG_055_170_277_464_476_20MER__m__MG_072_DIMER__c___ADP__c___H__c___MG_338_MONOMER__m___PI__c is "Function for ATP__c + H2O__c + MG_338_MONOMER__c -MG_055_170_277_464_476_20MER__m, MG_072_DIMER__c-> ADP__c + H__c + MG_338_MONOMER__m + PI__c";

function Function_for_ATP__c___H2O__c___MG_243_MONOMER__c__MG_055_170_277_464_476_20MER__m__MG_072_DIMER__c___ADP__c___H__c___MG_243_MONOMER__m___PI__c(ATP__c, Km1_MG_243_MONOMER__c, Km2_ATP__c, MG_055_170_277_464_476_20MER__m, MG_072_DIMER__c, MG_243_MONOMER__c, mwedb5b7d8_fa19_4b96_9726_fca71967de71_mweae32c09_5ed0_4d69_8218_6646bafac886)
  mwedb5b7d8_fa19_4b96_9726_fca71967de71_mweae32c09_5ed0_4d69_8218_6646bafac886*MG_072_DIMER__c*MG_055_170_277_464_476_20MER__m*MG_243_MONOMER__c*ATP__c/((1 + MG_243_MONOMER__c/Km1_MG_243_MONOMER__c)*(1 + ATP__c/Km2_ATP__c));
end
Function_for_ATP__c___H2O__c___MG_243_MONOMER__c__MG_055_170_277_464_476_20MER__m__MG_072_DIMER__c___ADP__c___H__c___MG_243_MONOMER__m___PI__c is "Function for ATP__c + H2O__c + MG_243_MONOMER__c -MG_055_170_277_464_476_20MER__m, MG_072_DIMER__c-> ADP__c + H__c + MG_243_MONOMER__m + PI__c";

function Function_for_ATP__c___H2O__c___MG_133_MONOMER__c__MG_055_170_277_464_476_20MER__m__MG_072_DIMER__c___ADP__c___H__c___MG_133_MONOMER__m___PI__c(ATP__c, Km1_MG_133_MONOMER__c, Km2_ATP__c, MG_055_170_277_464_476_20MER__m, MG_072_DIMER__c, MG_133_MONOMER__c, mwf6fb8fc5_260f_43f4_9832_ccec480e08fc_mw919fef45_a406_4216_afde_5a9dc4ae63cc)
  mwf6fb8fc5_260f_43f4_9832_ccec480e08fc_mw919fef45_a406_4216_afde_5a9dc4ae63cc*MG_072_DIMER__c*MG_055_170_277_464_476_20MER__m*MG_133_MONOMER__c*ATP__c/((1 + MG_133_MONOMER__c/Km1_MG_133_MONOMER__c)*(1 + ATP__c/Km2_ATP__c));
end
Function_for_ATP__c___H2O__c___MG_133_MONOMER__c__MG_055_170_277_464_476_20MER__m__MG_072_DIMER__c___ADP__c___H__c___MG_133_MONOMER__m___PI__c is "Function for ATP__c + H2O__c + MG_133_MONOMER__c -MG_055_170_277_464_476_20MER__m, MG_072_DIMER__c-> ADP__c + H__c + MG_133_MONOMER__m + PI__c";

function Function_for_ATP__c___H2O__c___MG_242_MONOMER__c__MG_055_170_277_464_476_20MER__m__MG_072_DIMER__c___ADP__c___H__c___MG_242_MONOMER__m___PI__c(ATP__c, Km1_MG_242_MONOMER__c, Km2_ATP__c, MG_055_170_277_464_476_20MER__m, MG_072_DIMER__c, MG_242_MONOMER__c, mwf7098517_c312_43bf_92a1_158a0ecb489a_mw2597d960_a6c2_4d72_bb35_ce8029faf7df)
  mwf7098517_c312_43bf_92a1_158a0ecb489a_mw2597d960_a6c2_4d72_bb35_ce8029faf7df*MG_072_DIMER__c*MG_055_170_277_464_476_20MER__m*MG_242_MONOMER__c*ATP__c/((1 + MG_242_MONOMER__c/Km1_MG_242_MONOMER__c)*(1 + ATP__c/Km2_ATP__c));
end
Function_for_ATP__c___H2O__c___MG_242_MONOMER__c__MG_055_170_277_464_476_20MER__m__MG_072_DIMER__c___ADP__c___H__c___MG_242_MONOMER__m___PI__c is "Function for ATP__c + H2O__c + MG_242_MONOMER__c -MG_055_170_277_464_476_20MER__m, MG_072_DIMER__c-> ADP__c + H__c + MG_242_MONOMER__m + PI__c";

function Function_for_ATP__c___H2O__c___MG_344_MONOMER__c__MG_055_170_277_464_476_20MER__m__MG_072_DIMER__c___ADP__c___H__c___MG_344_MONOMER__e___PI__c(ATP__c, Km1_MG_344_MONOMER__c, Km2_ATP__c, MG_055_170_277_464_476_20MER__m, MG_072_DIMER__c, MG_344_MONOMER__c, mwf7d8d0de_bf7e_4d5d_9f38_79cd451b943a_mw95c536cd_1004_45da_aca3_86a05790681b)
  mwf7d8d0de_bf7e_4d5d_9f38_79cd451b943a_mw95c536cd_1004_45da_aca3_86a05790681b*MG_072_DIMER__c*MG_055_170_277_464_476_20MER__m*MG_344_MONOMER__c*ATP__c/((1 + MG_344_MONOMER__c/Km1_MG_344_MONOMER__c)*(1 + ATP__c/Km2_ATP__c));
end
Function_for_ATP__c___H2O__c___MG_344_MONOMER__c__MG_055_170_277_464_476_20MER__m__MG_072_DIMER__c___ADP__c___H__c___MG_344_MONOMER__e___PI__c is "Function for ATP__c + H2O__c + MG_344_MONOMER__c -MG_055_170_277_464_476_20MER__m, MG_072_DIMER__c-> ADP__c + H__c + MG_344_MONOMER__e + PI__c";

function Function_for_ATP__c___H2O__c___MG_130_MONOMER__c__MG_055_170_277_464_476_20MER__m__MG_072_DIMER__c___ADP__c___H__c___MG_130_MONOMER__m___PI__c(ATP__c, Km1_MG_130_MONOMER__c, Km2_ATP__c, MG_055_170_277_464_476_20MER__m, MG_072_DIMER__c, MG_130_MONOMER__c, mwfffcc060_5a0c_4565_9c3b_8590fb91f516_mw529e64f5_f411_4ac6_b8ff_e54f4d38f813)
  mwfffcc060_5a0c_4565_9c3b_8590fb91f516_mw529e64f5_f411_4ac6_b8ff_e54f4d38f813*MG_072_DIMER__c*MG_055_170_277_464_476_20MER__m*MG_130_MONOMER__c*ATP__c/((1 + MG_130_MONOMER__c/Km1_MG_130_MONOMER__c)*(1 + ATP__c/Km2_ATP__c));
end
Function_for_ATP__c___H2O__c___MG_130_MONOMER__c__MG_055_170_277_464_476_20MER__m__MG_072_DIMER__c___ADP__c___H__c___MG_130_MONOMER__m___PI__c is "Function for ATP__c + H2O__c + MG_130_MONOMER__c -MG_055_170_277_464_476_20MER__m, MG_072_DIMER__c-> ADP__c + H__c + MG_130_MONOMER__m + PI__c";

function Function_for_ATP__c___H2O__c___MG_015_MONOMER__c__MG_055_170_277_464_476_20MER__m__MG_072_DIMER__c___ADP__c___H__c___MG_015_MONOMER__m___PI__c(ATP__c, Km1_MG_015_MONOMER__c, Km2_ATP__c, MG_015_MONOMER__c, MG_055_170_277_464_476_20MER__m, MG_072_DIMER__c, mw04879626_522f_4ff1_a4e6_bd0b359eee12_mwf381e780_1ad9_4957_9424_4ff41281fd5a)
  mw04879626_522f_4ff1_a4e6_bd0b359eee12_mwf381e780_1ad9_4957_9424_4ff41281fd5a*MG_072_DIMER__c*MG_055_170_277_464_476_20MER__m*MG_015_MONOMER__c*ATP__c/((1 + MG_015_MONOMER__c/Km1_MG_015_MONOMER__c)*(1 + ATP__c/Km2_ATP__c));
end
Function_for_ATP__c___H2O__c___MG_015_MONOMER__c__MG_055_170_277_464_476_20MER__m__MG_072_DIMER__c___ADP__c___H__c___MG_015_MONOMER__m___PI__c is "Function for ATP__c + H2O__c + MG_015_MONOMER__c -MG_055_170_277_464_476_20MER__m, MG_072_DIMER__c-> ADP__c + H__c + MG_015_MONOMER__m + PI__c";

function Function_for_ATP__c___H2O__c___MG_476_MONOMER__c__MG_055_170_277_464_476_20MER__m__MG_072_DIMER__c___ADP__c___H__c___MG_476_MONOMER__m___PI__c(ATP__c, Km1_MG_476_MONOMER__c, Km2_ATP__c, MG_055_170_277_464_476_20MER__m, MG_072_DIMER__c, MG_476_MONOMER__c, mw05f18bf3_ff9f_498f_98e0_9c90cce8ca48_mw0454fdf0_88e2_4d8c_9eee_16603e50f644)
  mw05f18bf3_ff9f_498f_98e0_9c90cce8ca48_mw0454fdf0_88e2_4d8c_9eee_16603e50f644*MG_072_DIMER__c*MG_055_170_277_464_476_20MER__m*MG_476_MONOMER__c*ATP__c/((1 + MG_476_MONOMER__c/Km1_MG_476_MONOMER__c)*(1 + ATP__c/Km2_ATP__c));
end
Function_for_ATP__c___H2O__c___MG_476_MONOMER__c__MG_055_170_277_464_476_20MER__m__MG_072_DIMER__c___ADP__c___H__c___MG_476_MONOMER__m___PI__c is "Function for ATP__c + H2O__c + MG_476_MONOMER__c -MG_055_170_277_464_476_20MER__m, MG_072_DIMER__c-> ADP__c + H__c + MG_476_MONOMER__m + PI__c";

function Function_for_ATP__c___H2O__c___MG_474_MONOMER__c__MG_055_170_277_464_476_20MER__m__MG_072_DIMER__c___ADP__c___H__c___MG_474_MONOMER__m___PI__c(ATP__c, Km1_MG_474_MONOMER__c, Km2_ATP__c, MG_055_170_277_464_476_20MER__m, MG_072_DIMER__c, MG_474_MONOMER__c, mw1bd76e06_77be_4007_b04e_9e3e94d1d388_mwf3de89ab_05b8_43fd_8428_53ff96725bec)
  mw1bd76e06_77be_4007_b04e_9e3e94d1d388_mwf3de89ab_05b8_43fd_8428_53ff96725bec*MG_072_DIMER__c*MG_055_170_277_464_476_20MER__m*MG_474_MONOMER__c*ATP__c/((1 + MG_474_MONOMER__c/Km1_MG_474_MONOMER__c)*(1 + ATP__c/Km2_ATP__c));
end
Function_for_ATP__c___H2O__c___MG_474_MONOMER__c__MG_055_170_277_464_476_20MER__m__MG_072_DIMER__c___ADP__c___H__c___MG_474_MONOMER__m___PI__c is "Function for ATP__c + H2O__c + MG_474_MONOMER__c -MG_055_170_277_464_476_20MER__m, MG_072_DIMER__c-> ADP__c + H__c + MG_474_MONOMER__m + PI__c";

function Function_for_ATP__c___H2O__c___MG_226_MONOMER__c__MG_055_170_277_464_476_20MER__m__MG_072_DIMER__c___ADP__c___H__c___MG_226_MONOMER__m___PI__c(ATP__c, Km1_MG_226_MONOMER__c, Km2_ATP__c, MG_055_170_277_464_476_20MER__m, MG_072_DIMER__c, MG_226_MONOMER__c, mw1c7465d1_1eb0_4c15_af39_3a32b27de536_mwaf481887_bd48_4e61_882e_41d036d4564f)
  mw1c7465d1_1eb0_4c15_af39_3a32b27de536_mwaf481887_bd48_4e61_882e_41d036d4564f*MG_072_DIMER__c*MG_055_170_277_464_476_20MER__m*MG_226_MONOMER__c*ATP__c/((1 + MG_226_MONOMER__c/Km1_MG_226_MONOMER__c)*(1 + ATP__c/Km2_ATP__c));
end
Function_for_ATP__c___H2O__c___MG_226_MONOMER__c__MG_055_170_277_464_476_20MER__m__MG_072_DIMER__c___ADP__c___H__c___MG_226_MONOMER__m___PI__c is "Function for ATP__c + H2O__c + MG_226_MONOMER__c -MG_055_170_277_464_476_20MER__m, MG_072_DIMER__c-> ADP__c + H__c + MG_226_MONOMER__m + PI__c";

function Function_for_ATP__c___H2O__c___MG_440_MONOMER__c__MG_055_170_277_464_476_20MER__m__MG_072_DIMER__c___ADP__c___H__c___MG_440_MONOMER__m___PI__c(ATP__c, Km1_MG_440_MONOMER__c, Km2_ATP__c, MG_055_170_277_464_476_20MER__m, MG_072_DIMER__c, MG_440_MONOMER__c, mw1f523642_709a_4908_bfe0_1b301772c67f_mw8e3a2830_1ba0_453f_aeff_07fc5ce9f9ab)
  mw1f523642_709a_4908_bfe0_1b301772c67f_mw8e3a2830_1ba0_453f_aeff_07fc5ce9f9ab*MG_072_DIMER__c*MG_055_170_277_464_476_20MER__m*MG_440_MONOMER__c*ATP__c/((1 + MG_440_MONOMER__c/Km1_MG_440_MONOMER__c)*(1 + ATP__c/Km2_ATP__c));
end
Function_for_ATP__c___H2O__c___MG_440_MONOMER__c__MG_055_170_277_464_476_20MER__m__MG_072_DIMER__c___ADP__c___H__c___MG_440_MONOMER__m___PI__c is "Function for ATP__c + H2O__c + MG_440_MONOMER__c -MG_055_170_277_464_476_20MER__m, MG_072_DIMER__c-> ADP__c + H__c + MG_440_MONOMER__m + PI__c";

function Function_for_ATP__c___H2O__c___MG_441_MONOMER__c__MG_055_170_277_464_476_20MER__m__MG_072_DIMER__c___ADP__c___H__c___MG_441_MONOMER__m___PI__c(ATP__c, Km1_MG_441_MONOMER__c, Km2_ATP__c, MG_055_170_277_464_476_20MER__m, MG_072_DIMER__c, MG_441_MONOMER__c, mw21be5f78_d4be_423a_a6c8_b72c5e843c4d_mw6ab703be_abdc_4e7f_871e_a58eeb853d34)
  mw21be5f78_d4be_423a_a6c8_b72c5e843c4d_mw6ab703be_abdc_4e7f_871e_a58eeb853d34*MG_072_DIMER__c*MG_055_170_277_464_476_20MER__m*MG_441_MONOMER__c*ATP__c/((1 + MG_441_MONOMER__c/Km1_MG_441_MONOMER__c)*(1 + ATP__c/Km2_ATP__c));
end
Function_for_ATP__c___H2O__c___MG_441_MONOMER__c__MG_055_170_277_464_476_20MER__m__MG_072_DIMER__c___ADP__c___H__c___MG_441_MONOMER__m___PI__c is "Function for ATP__c + H2O__c + MG_441_MONOMER__c -MG_055_170_277_464_476_20MER__m, MG_072_DIMER__c-> ADP__c + H__c + MG_441_MONOMER__m + PI__c";

function Function_for_ATP__c___H2O__c___MG_316_MONOMER__c__MG_055_170_277_464_476_20MER__m__MG_072_DIMER__c___ADP__c___H__c___MG_316_MONOMER__m___PI__c(ATP__c, Km1_MG_316_MONOMER__c, Km2_ATP__c, MG_055_170_277_464_476_20MER__m, MG_072_DIMER__c, MG_316_MONOMER__c, mw2878c3d7_39ba_496d_8ea4_45bc1652041b_mwaa7b25a0_579c_409e_b294_6cc87ca4a174)
  mw2878c3d7_39ba_496d_8ea4_45bc1652041b_mwaa7b25a0_579c_409e_b294_6cc87ca4a174*MG_072_DIMER__c*MG_055_170_277_464_476_20MER__m*MG_316_MONOMER__c*ATP__c/((1 + MG_316_MONOMER__c/Km1_MG_316_MONOMER__c)*(1 + ATP__c/Km2_ATP__c));
end
Function_for_ATP__c___H2O__c___MG_316_MONOMER__c__MG_055_170_277_464_476_20MER__m__MG_072_DIMER__c___ADP__c___H__c___MG_316_MONOMER__m___PI__c is "Function for ATP__c + H2O__c + MG_316_MONOMER__c -MG_055_170_277_464_476_20MER__m, MG_072_DIMER__c-> ADP__c + H__c + MG_316_MONOMER__m + PI__c";

function Function_for_ATP__c___H2O__c___MG_078_MONOMER__c__MG_055_170_277_464_476_20MER__m__MG_072_DIMER__c___ADP__c___H__c___MG_078_MONOMER__m___PI__c(ATP__c, Km1_MG_078_MONOMER__c, Km2_ATP__c, MG_055_170_277_464_476_20MER__m, MG_072_DIMER__c, MG_078_MONOMER__c, mw28aca57a_177a_4c39_a787_1c41a6a2b6e2_mwc5e02c04_7277_4114_9248_be82b6955cdd)
  mw28aca57a_177a_4c39_a787_1c41a6a2b6e2_mwc5e02c04_7277_4114_9248_be82b6955cdd*MG_072_DIMER__c*MG_055_170_277_464_476_20MER__m*MG_078_MONOMER__c*ATP__c/((1 + MG_078_MONOMER__c/Km1_MG_078_MONOMER__c)*(1 + ATP__c/Km2_ATP__c));
end
Function_for_ATP__c___H2O__c___MG_078_MONOMER__c__MG_055_170_277_464_476_20MER__m__MG_072_DIMER__c___ADP__c___H__c___MG_078_MONOMER__m___PI__c is "Function for ATP__c + H2O__c + MG_078_MONOMER__c -MG_055_170_277_464_476_20MER__m, MG_072_DIMER__c-> ADP__c + H__c + MG_078_MONOMER__m + PI__c";

function Function_for_ATP__c___H2O__c___MG_291_MONOMER__c__MG_055_170_277_464_476_20MER__m__MG_072_DIMER__c___ADP__c___H__c___MG_291_MONOMER__m___PI__c(ATP__c, Km1_MG_291_MONOMER__c, Km2_ATP__c, MG_055_170_277_464_476_20MER__m, MG_072_DIMER__c, MG_291_MONOMER__c, mw2942e237_e3c6_4158_8a7d_9dbdbd0b550e_mw56f261b3_6175_4903_b233_aabb7565f9c8)
  mw2942e237_e3c6_4158_8a7d_9dbdbd0b550e_mw56f261b3_6175_4903_b233_aabb7565f9c8*MG_072_DIMER__c*MG_055_170_277_464_476_20MER__m*MG_291_MONOMER__c*ATP__c/((1 + MG_291_MONOMER__c/Km1_MG_291_MONOMER__c)*(1 + ATP__c/Km2_ATP__c));
end
Function_for_ATP__c___H2O__c___MG_291_MONOMER__c__MG_055_170_277_464_476_20MER__m__MG_072_DIMER__c___ADP__c___H__c___MG_291_MONOMER__m___PI__c is "Function for ATP__c + H2O__c + MG_291_MONOMER__c -MG_055_170_277_464_476_20MER__m, MG_072_DIMER__c-> ADP__c + H__c + MG_291_MONOMER__m + PI__c";

function Function_for_ATP__c___H2O__c___MG_189_MONOMER__c__MG_055_170_277_464_476_20MER__m__MG_072_DIMER__c___ADP__c___H__c___MG_189_MONOMER__m___PI__c(ATP__c, Km1_MG_189_MONOMER__c, Km2_ATP__c, MG_055_170_277_464_476_20MER__m, MG_072_DIMER__c, MG_189_MONOMER__c, mw32116cc5_a83e_4030_9249_dc19990d0e07_mw2f417a5e_33e4_4bc3_be1b_23380db4334b)
  mw32116cc5_a83e_4030_9249_dc19990d0e07_mw2f417a5e_33e4_4bc3_be1b_23380db4334b*MG_072_DIMER__c*MG_055_170_277_464_476_20MER__m*MG_189_MONOMER__c*ATP__c/((1 + MG_189_MONOMER__c/Km1_MG_189_MONOMER__c)*(1 + ATP__c/Km2_ATP__c));
end
Function_for_ATP__c___H2O__c___MG_189_MONOMER__c__MG_055_170_277_464_476_20MER__m__MG_072_DIMER__c___ADP__c___H__c___MG_189_MONOMER__m___PI__c is "Function for ATP__c + H2O__c + MG_189_MONOMER__c -MG_055_170_277_464_476_20MER__m, MG_072_DIMER__c-> ADP__c + H__c + MG_189_MONOMER__m + PI__c";

function Function_for_ATP__c___H2O__c___MG_364_MONOMER__c__MG_055_170_277_464_476_20MER__m__MG_072_DIMER__c___ADP__c___H__c___MG_364_MONOMER__m___PI__c(ATP__c, Km1_MG_364_MONOMER__c, Km2_ATP__c, MG_055_170_277_464_476_20MER__m, MG_072_DIMER__c, MG_364_MONOMER__c, mw3cc941f8_7759_4f05_a3e6_f11a546f2e50_mw65d83991_beaa_492b_8aa1_188d23190a9b)
  mw3cc941f8_7759_4f05_a3e6_f11a546f2e50_mw65d83991_beaa_492b_8aa1_188d23190a9b*MG_072_DIMER__c*MG_055_170_277_464_476_20MER__m*MG_364_MONOMER__c*ATP__c/((1 + MG_364_MONOMER__c/Km1_MG_364_MONOMER__c)*(1 + ATP__c/Km2_ATP__c));
end
Function_for_ATP__c___H2O__c___MG_364_MONOMER__c__MG_055_170_277_464_476_20MER__m__MG_072_DIMER__c___ADP__c___H__c___MG_364_MONOMER__m___PI__c is "Function for ATP__c + H2O__c + MG_364_MONOMER__c -MG_055_170_277_464_476_20MER__m, MG_072_DIMER__c-> ADP__c + H__c + MG_364_MONOMER__m + PI__c";

function Function_for_ATP__c___H2O__c___MG_109_MONOMER__c__MG_055_170_277_464_476_20MER__m__MG_072_DIMER__c___ADP__c___H__c___MG_109_MONOMER__m___PI__c(ATP__c, Km1_MG_109_MONOMER__c, Km2_ATP__c, MG_055_170_277_464_476_20MER__m, MG_072_DIMER__c, MG_109_MONOMER__c, mw4655cbbd_bf9c_4636_8dcf_f22811d63e07_mw9d63ba3e_fd4f_45af_9c1e_86177ace9c8a)
  mw4655cbbd_bf9c_4636_8dcf_f22811d63e07_mw9d63ba3e_fd4f_45af_9c1e_86177ace9c8a*MG_072_DIMER__c*MG_055_170_277_464_476_20MER__m*MG_109_MONOMER__c*ATP__c/((1 + MG_109_MONOMER__c/Km1_MG_109_MONOMER__c)*(1 + ATP__c/Km2_ATP__c));
end
Function_for_ATP__c___H2O__c___MG_109_MONOMER__c__MG_055_170_277_464_476_20MER__m__MG_072_DIMER__c___ADP__c___H__c___MG_109_MONOMER__m___PI__c is "Function for ATP__c + H2O__c + MG_109_MONOMER__c -MG_055_170_277_464_476_20MER__m, MG_072_DIMER__c-> ADP__c + H__c + MG_109_MONOMER__m + PI__c";

function Function_for_ATP__c___H2O__c___MG_144_MONOMER__c__MG_055_170_277_464_476_20MER__m__MG_072_DIMER__c___ADP__c___H__c___MG_144_MONOMER__m___PI__c(ATP__c, Km1_MG_144_MONOMER__c, Km2_ATP__c, MG_055_170_277_464_476_20MER__m, MG_072_DIMER__c, MG_144_MONOMER__c, mw4a255144_7557_419f_99f4_2f424130abce_mw7c247b9e_4c1f_4264_a894_c27b362095c0)
  mw4a255144_7557_419f_99f4_2f424130abce_mw7c247b9e_4c1f_4264_a894_c27b362095c0*MG_072_DIMER__c*MG_055_170_277_464_476_20MER__m*MG_144_MONOMER__c*ATP__c/((1 + MG_144_MONOMER__c/Km1_MG_144_MONOMER__c)*(1 + ATP__c/Km2_ATP__c));
end
Function_for_ATP__c___H2O__c___MG_144_MONOMER__c__MG_055_170_277_464_476_20MER__m__MG_072_DIMER__c___ADP__c___H__c___MG_144_MONOMER__m___PI__c is "Function for ATP__c + H2O__c + MG_144_MONOMER__c -MG_055_170_277_464_476_20MER__m, MG_072_DIMER__c-> ADP__c + H__c + MG_144_MONOMER__m + PI__c";

function Function_for_ATP__c___H2O__c___MG_148_MONOMER__c__MG_055_170_277_464_476_20MER__m__MG_072_DIMER__c___ADP__c___H__c___MG_148_MONOMER__m___PI__c(ATP__c, Km1_MG_148_MONOMER__c, Km2_ATP__c, MG_055_170_277_464_476_20MER__m, MG_072_DIMER__c, MG_148_MONOMER__c, mw56d94b7e_7bba_4743_8605_baa8951852d0_mw7b8ffc45_0ec8_47fb_9f5c_888b1f237520)
  mw56d94b7e_7bba_4743_8605_baa8951852d0_mw7b8ffc45_0ec8_47fb_9f5c_888b1f237520*MG_072_DIMER__c*MG_055_170_277_464_476_20MER__m*MG_148_MONOMER__c*ATP__c/((1 + MG_148_MONOMER__c/Km1_MG_148_MONOMER__c)*(1 + ATP__c/Km2_ATP__c));
end
Function_for_ATP__c___H2O__c___MG_148_MONOMER__c__MG_055_170_277_464_476_20MER__m__MG_072_DIMER__c___ADP__c___H__c___MG_148_MONOMER__m___PI__c is "Function for ATP__c + H2O__c + MG_148_MONOMER__c -MG_055_170_277_464_476_20MER__m, MG_072_DIMER__c-> ADP__c + H__c + MG_148_MONOMER__m + PI__c";

function Function_for_ATP__c___H2O__c___MG_076_MONOMER__c__MG_055_170_277_464_476_20MER__m__MG_072_DIMER__c___ADP__c___H__c___MG_076_MONOMER__m___PI__c(ATP__c, Km1_MG_076_MONOMER__c, Km2_ATP__c, MG_055_170_277_464_476_20MER__m, MG_072_DIMER__c, MG_076_MONOMER__c, mw57f6ad6c_40c1_4e24_9a53_f524a3d80ffa_mw2306a2e4_cbbd_4686_8a84_2cbf55b937fa)
  mw57f6ad6c_40c1_4e24_9a53_f524a3d80ffa_mw2306a2e4_cbbd_4686_8a84_2cbf55b937fa*MG_072_DIMER__c*MG_055_170_277_464_476_20MER__m*MG_076_MONOMER__c*ATP__c/((1 + MG_076_MONOMER__c/Km1_MG_076_MONOMER__c)*(1 + ATP__c/Km2_ATP__c));
end
Function_for_ATP__c___H2O__c___MG_076_MONOMER__c__MG_055_170_277_464_476_20MER__m__MG_072_DIMER__c___ADP__c___H__c___MG_076_MONOMER__m___PI__c is "Function for ATP__c + H2O__c + MG_076_MONOMER__c -MG_055_170_277_464_476_20MER__m, MG_072_DIMER__c-> ADP__c + H__c + MG_076_MONOMER__m + PI__c";

function Function_for_ATP__c___H2O__c___MG_464_MONOMER__c__MG_055_170_277_464_476_20MER__m__MG_072_DIMER__c___ADP__c___H__c___MG_464_MONOMER__m___PI__c(ATP__c, Km1_MG_464_MONOMER__c, Km2_ATP__c, MG_055_170_277_464_476_20MER__m, MG_072_DIMER__c, MG_464_MONOMER__c, mw5c453a53_4962_4245_831d_1e9bcda35e18_mw9d719afb_e144_4d5b_8fa9_88ac86a34d0c)
  mw5c453a53_4962_4245_831d_1e9bcda35e18_mw9d719afb_e144_4d5b_8fa9_88ac86a34d0c*MG_072_DIMER__c*MG_055_170_277_464_476_20MER__m*MG_464_MONOMER__c*ATP__c/((1 + MG_464_MONOMER__c/Km1_MG_464_MONOMER__c)*(1 + ATP__c/Km2_ATP__c));
end
Function_for_ATP__c___H2O__c___MG_464_MONOMER__c__MG_055_170_277_464_476_20MER__m__MG_072_DIMER__c___ADP__c___H__c___MG_464_MONOMER__m___PI__c is "Function for ATP__c + H2O__c + MG_464_MONOMER__c -MG_055_170_277_464_476_20MER__m, MG_072_DIMER__c-> ADP__c + H__c + MG_464_MONOMER__m + PI__c";

function Function_for_ATP__c___H2O__c___MG_188_MONOMER__c__MG_055_170_277_464_476_20MER__m__MG_072_DIMER__c___ADP__c___H__c___MG_188_MONOMER__m___PI__c(ATP__c, Km1_MG_188_MONOMER__c, Km2_ATP__c, MG_055_170_277_464_476_20MER__m, MG_072_DIMER__c, MG_188_MONOMER__c, mw689d5be0_fc63_45b7_9c83_1ca03e3360b2_mw15c72270_5f3e_4884_9d87_dbcb355fa955)
  mw689d5be0_fc63_45b7_9c83_1ca03e3360b2_mw15c72270_5f3e_4884_9d87_dbcb355fa955*MG_072_DIMER__c*MG_055_170_277_464_476_20MER__m*MG_188_MONOMER__c*ATP__c/((1 + MG_188_MONOMER__c/Km1_MG_188_MONOMER__c)*(1 + ATP__c/Km2_ATP__c));
end
Function_for_ATP__c___H2O__c___MG_188_MONOMER__c__MG_055_170_277_464_476_20MER__m__MG_072_DIMER__c___ADP__c___H__c___MG_188_MONOMER__m___PI__c is "Function for ATP__c + H2O__c + MG_188_MONOMER__c -MG_055_170_277_464_476_20MER__m, MG_072_DIMER__c-> ADP__c + H__c + MG_188_MONOMER__m + PI__c";

function Function_for_ATP__c___H2O__c___MG_032_MONOMER__c__MG_055_170_277_464_476_20MER__m__MG_072_DIMER__c___ADP__c___H__c___MG_032_MONOMER__e___PI__c(ATP__c, Km1_MG_032_MONOMER__c, Km2_ATP__c, MG_032_MONOMER__c, MG_055_170_277_464_476_20MER__m, MG_072_DIMER__c, mw6c285924_1785_410d_b64c_f0ad6c5d4d82_mw30efd2dd_0ef1_40fb_9c6f_1b97a6af5345)
  mw6c285924_1785_410d_b64c_f0ad6c5d4d82_mw30efd2dd_0ef1_40fb_9c6f_1b97a6af5345*MG_072_DIMER__c*MG_055_170_277_464_476_20MER__m*MG_032_MONOMER__c*ATP__c/((1 + MG_032_MONOMER__c/Km1_MG_032_MONOMER__c)*(1 + ATP__c/Km2_ATP__c));
end
Function_for_ATP__c___H2O__c___MG_032_MONOMER__c__MG_055_170_277_464_476_20MER__m__MG_072_DIMER__c___ADP__c___H__c___MG_032_MONOMER__e___PI__c is "Function for ATP__c + H2O__c + MG_032_MONOMER__c -MG_055_170_277_464_476_20MER__m, MG_072_DIMER__c-> ADP__c + H__c + MG_032_MONOMER__e + PI__c";

function Function_for_ATP__c___H2O__c___MG_129_MONOMER__c__MG_055_170_277_464_476_20MER__m__MG_072_DIMER__c___ADP__c___H__c___MG_129_MONOMER__e___PI__c(ATP__c, Km1_MG_129_MONOMER__c, Km2_ATP__c, MG_055_170_277_464_476_20MER__m, MG_072_DIMER__c, MG_129_MONOMER__c, mw6c601d3d_7705_4b9a_8c57_2dd4f7a17c9e_mw0a01ac0c_fc32_4966_80d8_143eb5174807)
  mw6c601d3d_7705_4b9a_8c57_2dd4f7a17c9e_mw0a01ac0c_fc32_4966_80d8_143eb5174807*MG_072_DIMER__c*MG_055_170_277_464_476_20MER__m*MG_129_MONOMER__c*ATP__c/((1 + MG_129_MONOMER__c/Km1_MG_129_MONOMER__c)*(1 + ATP__c/Km2_ATP__c));
end
Function_for_ATP__c___H2O__c___MG_129_MONOMER__c__MG_055_170_277_464_476_20MER__m__MG_072_DIMER__c___ADP__c___H__c___MG_129_MONOMER__e___PI__c is "Function for ATP__c + H2O__c + MG_129_MONOMER__c -MG_055_170_277_464_476_20MER__m, MG_072_DIMER__c-> ADP__c + H__c + MG_129_MONOMER__e + PI__c";

function Function_for_ATP__c___H2O__c___MG_310_MONOMER__c__MG_055_170_277_464_476_20MER__m__MG_072_DIMER__c___ADP__c___H__c___MG_310_MONOMER__e___PI__c(ATP__c, Km1_MG_310_MONOMER__c, Km2_ATP__c, MG_055_170_277_464_476_20MER__m, MG_072_DIMER__c, MG_310_MONOMER__c, mw7b0bce5d_1f1d_4ac3_a99d_20da485ab2fe_mw09bea1a1_1df8_4018_a5e2_00ebed3fcf01)
  mw7b0bce5d_1f1d_4ac3_a99d_20da485ab2fe_mw09bea1a1_1df8_4018_a5e2_00ebed3fcf01*MG_072_DIMER__c*MG_055_170_277_464_476_20MER__m*MG_310_MONOMER__c*ATP__c/((1 + MG_310_MONOMER__c/Km1_MG_310_MONOMER__c)*(1 + ATP__c/Km2_ATP__c));
end
Function_for_ATP__c___H2O__c___MG_310_MONOMER__c__MG_055_170_277_464_476_20MER__m__MG_072_DIMER__c___ADP__c___H__c___MG_310_MONOMER__e___PI__c is "Function for ATP__c + H2O__c + MG_310_MONOMER__c -MG_055_170_277_464_476_20MER__m, MG_072_DIMER__c-> ADP__c + H__c + MG_310_MONOMER__e + PI__c";

function Function_for_ATP__c___H2O__c___MG_437_MONOMER__c__MG_055_170_277_464_476_20MER__m__MG_072_DIMER__c___ADP__c___H__c___MG_437_MONOMER__m___PI__c(ATP__c, Km1_MG_437_MONOMER__c, Km2_ATP__c, MG_055_170_277_464_476_20MER__m, MG_072_DIMER__c, MG_437_MONOMER__c, mw7f9cc0e4_e6c0_4390_973b_11837927efc4_mwa0325caa_f47d_4059_aebe_31b56efdc264)
  mw7f9cc0e4_e6c0_4390_973b_11837927efc4_mwa0325caa_f47d_4059_aebe_31b56efdc264*MG_072_DIMER__c*MG_055_170_277_464_476_20MER__m*MG_437_MONOMER__c*ATP__c/((1 + MG_437_MONOMER__c/Km1_MG_437_MONOMER__c)*(1 + ATP__c/Km2_ATP__c));
end
Function_for_ATP__c___H2O__c___MG_437_MONOMER__c__MG_055_170_277_464_476_20MER__m__MG_072_DIMER__c___ADP__c___H__c___MG_437_MONOMER__m___PI__c is "Function for ATP__c + H2O__c + MG_437_MONOMER__c -MG_055_170_277_464_476_20MER__m, MG_072_DIMER__c-> ADP__c + H__c + MG_437_MONOMER__m + PI__c";

function Function_for_ATP__c___H2O__c___MG_412_MONOMER__c__MG_055_170_277_464_476_20MER__m__MG_072_DIMER__c___ADP__c___H__c___MG_412_MONOMER__e___PI__c(ATP__c, Km1_MG_412_MONOMER__c, Km2_ATP__c, MG_055_170_277_464_476_20MER__m, MG_072_DIMER__c, MG_412_MONOMER__c, mw81ccd7c4_7457_4e3e_b36c_d6fc3912d9cf_mw8d328eee_04f6_4b26_ae37_e0d7212bd47c)
  mw81ccd7c4_7457_4e3e_b36c_d6fc3912d9cf_mw8d328eee_04f6_4b26_ae37_e0d7212bd47c*MG_072_DIMER__c*MG_055_170_277_464_476_20MER__m*MG_412_MONOMER__c*ATP__c/((1 + MG_412_MONOMER__c/Km1_MG_412_MONOMER__c)*(1 + ATP__c/Km2_ATP__c));
end
Function_for_ATP__c___H2O__c___MG_412_MONOMER__c__MG_055_170_277_464_476_20MER__m__MG_072_DIMER__c___ADP__c___H__c___MG_412_MONOMER__e___PI__c is "Function for ATP__c + H2O__c + MG_412_MONOMER__c -MG_055_170_277_464_476_20MER__m, MG_072_DIMER__c-> ADP__c + H__c + MG_412_MONOMER__e + PI__c";

function Function_for_ATP__c___H2O__c___MG_331_MONOMER__c__MG_055_170_277_464_476_20MER__m__MG_072_DIMER__c___ADP__c___H__c___MG_331_MONOMER__m___PI__c(ATP__c, Km1_MG_331_MONOMER__c, Km2_ATP__c, MG_055_170_277_464_476_20MER__m, MG_072_DIMER__c, MG_331_MONOMER__c, mw8fec7448_6d8b_4daf_b35e_ee5f56df9af8_mw39e210d8_e2b4_43f6_b024_837588ef423b)
  mw8fec7448_6d8b_4daf_b35e_ee5f56df9af8_mw39e210d8_e2b4_43f6_b024_837588ef423b*MG_072_DIMER__c*MG_055_170_277_464_476_20MER__m*MG_331_MONOMER__c*ATP__c/((1 + MG_331_MONOMER__c/Km1_MG_331_MONOMER__c)*(1 + ATP__c/Km2_ATP__c));
end
Function_for_ATP__c___H2O__c___MG_331_MONOMER__c__MG_055_170_277_464_476_20MER__m__MG_072_DIMER__c___ADP__c___H__c___MG_331_MONOMER__m___PI__c is "Function for ATP__c + H2O__c + MG_331_MONOMER__c -MG_055_170_277_464_476_20MER__m, MG_072_DIMER__c-> ADP__c + H__c + MG_331_MONOMER__m + PI__c";

function Function_for_ATP__c___H2O__c___MG_033_MONOMER__c__MG_055_170_277_464_476_20MER__m__MG_072_DIMER__c___ADP__c___H__c___MG_033_MONOMER__m___PI__c(ATP__c, Km1_MG_033_MONOMER__c, Km2_ATP__c, MG_033_MONOMER__c, MG_055_170_277_464_476_20MER__m, MG_072_DIMER__c, mw922df075_e339_44a6_8aa2_105189450ad2_mwc8549bae_c8f6_4fbc_9832_6b5497164e13)
  mw922df075_e339_44a6_8aa2_105189450ad2_mwc8549bae_c8f6_4fbc_9832_6b5497164e13*MG_072_DIMER__c*MG_055_170_277_464_476_20MER__m*MG_033_MONOMER__c*ATP__c/((1 + MG_033_MONOMER__c/Km1_MG_033_MONOMER__c)*(1 + ATP__c/Km2_ATP__c));
end
Function_for_ATP__c___H2O__c___MG_033_MONOMER__c__MG_055_170_277_464_476_20MER__m__MG_072_DIMER__c___ADP__c___H__c___MG_033_MONOMER__m___PI__c is "Function for ATP__c + H2O__c + MG_033_MONOMER__c -MG_055_170_277_464_476_20MER__m, MG_072_DIMER__c-> ADP__c + H__c + MG_033_MONOMER__m + PI__c";

function Function_for_ATP__c___H2O__c___MG_267_MONOMER__c__MG_055_170_277_464_476_20MER__m__MG_072_DIMER__c___ADP__c___H__c___MG_267_MONOMER__m___PI__c(ATP__c, Km1_MG_267_MONOMER__c, Km2_ATP__c, MG_055_170_277_464_476_20MER__m, MG_072_DIMER__c, MG_267_MONOMER__c, mw96cef4da_8acc_413a_b292_80eeb40bf68c_mw0b2666fa_6e6c_48f3_a60f_115909c329f9)
  mw96cef4da_8acc_413a_b292_80eeb40bf68c_mw0b2666fa_6e6c_48f3_a60f_115909c329f9*MG_072_DIMER__c*MG_055_170_277_464_476_20MER__m*MG_267_MONOMER__c*ATP__c/((1 + MG_267_MONOMER__c/Km1_MG_267_MONOMER__c)*(1 + ATP__c/Km2_ATP__c));
end
Function_for_ATP__c___H2O__c___MG_267_MONOMER__c__MG_055_170_277_464_476_20MER__m__MG_072_DIMER__c___ADP__c___H__c___MG_267_MONOMER__m___PI__c is "Function for ATP__c + H2O__c + MG_267_MONOMER__c -MG_055_170_277_464_476_20MER__m, MG_072_DIMER__c-> ADP__c + H__c + MG_267_MONOMER__m + PI__c";

function Function_for_ATP__c___H2O__c___MG_181_MONOMER__c__MG_055_170_277_464_476_20MER__m__MG_072_DIMER__c___ADP__c___H__c___MG_181_MONOMER__m___PI__c(ATP__c, Km1_MG_181_MONOMER__c, Km2_ATP__c, MG_055_170_277_464_476_20MER__m, MG_072_DIMER__c, MG_181_MONOMER__c, mwab3b1122_21d6_46f5_8d98_ae647ac42df9_mw5d908c31_5057_48cc_9299_7694542ead69)
  mwab3b1122_21d6_46f5_8d98_ae647ac42df9_mw5d908c31_5057_48cc_9299_7694542ead69*MG_072_DIMER__c*MG_055_170_277_464_476_20MER__m*MG_181_MONOMER__c*ATP__c/((1 + MG_181_MONOMER__c/Km1_MG_181_MONOMER__c)*(1 + ATP__c/Km2_ATP__c));
end
Function_for_ATP__c___H2O__c___MG_181_MONOMER__c__MG_055_170_277_464_476_20MER__m__MG_072_DIMER__c___ADP__c___H__c___MG_181_MONOMER__m___PI__c is "Function for ATP__c + H2O__c + MG_181_MONOMER__c -MG_055_170_277_464_476_20MER__m, MG_072_DIMER__c-> ADP__c + H__c + MG_181_MONOMER__m + PI__c";

function Function_for_ATP__c___H2O__c___MG_302_MONOMER__c__MG_055_170_277_464_476_20MER__m__MG_072_DIMER__c___ADP__c___H__c___MG_302_MONOMER__m___PI__c(ATP__c, Km1_MG_302_MONOMER__c, Km2_ATP__c, MG_055_170_277_464_476_20MER__m, MG_072_DIMER__c, MG_302_MONOMER__c, mwb43a9a7e_3c8c_4a7e_80cf_9c20f0683bf6_mwf4d9af31_44a8_46cb_b18a_5b57f3f3ae49)
  mwb43a9a7e_3c8c_4a7e_80cf_9c20f0683bf6_mwf4d9af31_44a8_46cb_b18a_5b57f3f3ae49*MG_072_DIMER__c*MG_055_170_277_464_476_20MER__m*MG_302_MONOMER__c*ATP__c/((1 + MG_302_MONOMER__c/Km1_MG_302_MONOMER__c)*(1 + ATP__c/Km2_ATP__c));
end
Function_for_ATP__c___H2O__c___MG_302_MONOMER__c__MG_055_170_277_464_476_20MER__m__MG_072_DIMER__c___ADP__c___H__c___MG_302_MONOMER__m___PI__c is "Function for ATP__c + H2O__c + MG_302_MONOMER__c -MG_055_170_277_464_476_20MER__m, MG_072_DIMER__c-> ADP__c + H__c + MG_302_MONOMER__m + PI__c";

function Function_for_ATP__c___H2O__c___MG_468_MONOMER__c__MG_055_170_277_464_476_20MER__m__MG_072_DIMER__c___ADP__c___H__c___MG_468_MONOMER__m___PI__c(ATP__c, Km1_MG_468_MONOMER__c, Km2_ATP__c, MG_055_170_277_464_476_20MER__m, MG_072_DIMER__c, MG_468_MONOMER__c, mwb4caf68d_9540_4da0_8fc7_8beb41affe61_mwe5f64ba3_c3c2_4d7c_8a10_21b198c8ed86)
  mwb4caf68d_9540_4da0_8fc7_8beb41affe61_mwe5f64ba3_c3c2_4d7c_8a10_21b198c8ed86*MG_072_DIMER__c*MG_055_170_277_464_476_20MER__m*MG_468_MONOMER__c*ATP__c/((1 + MG_468_MONOMER__c/Km1_MG_468_MONOMER__c)*(1 + ATP__c/Km2_ATP__c));
end
Function_for_ATP__c___H2O__c___MG_468_MONOMER__c__MG_055_170_277_464_476_20MER__m__MG_072_DIMER__c___ADP__c___H__c___MG_468_MONOMER__m___PI__c is "Function for ATP__c + H2O__c + MG_468_MONOMER__c -MG_055_170_277_464_476_20MER__m, MG_072_DIMER__c-> ADP__c + H__c + MG_468_MONOMER__m + PI__c";

function Function_for_ATP__c___H2O__c___MG_318_MONOMER__c__MG_055_170_277_464_476_20MER__m__MG_072_DIMER__c___ADP__c___H__c___MG_318_MONOMER__m___PI__c(ATP__c, Km1_MG_318_MONOMER__c, Km2_ATP__c, MG_055_170_277_464_476_20MER__m, MG_072_DIMER__c, MG_318_MONOMER__c, mwb8ce06bf_690d_4689_8998_53c5d1a7d96c_mw8906a7bb_3d42_4764_b40f_a43a32d781bb)
  mwb8ce06bf_690d_4689_8998_53c5d1a7d96c_mw8906a7bb_3d42_4764_b40f_a43a32d781bb*MG_072_DIMER__c*MG_055_170_277_464_476_20MER__m*MG_318_MONOMER__c*ATP__c/((1 + MG_318_MONOMER__c/Km1_MG_318_MONOMER__c)*(1 + ATP__c/Km2_ATP__c));
end
Function_for_ATP__c___H2O__c___MG_318_MONOMER__c__MG_055_170_277_464_476_20MER__m__MG_072_DIMER__c___ADP__c___H__c___MG_318_MONOMER__m___PI__c is "Function for ATP__c + H2O__c + MG_318_MONOMER__c -MG_055_170_277_464_476_20MER__m, MG_072_DIMER__c-> ADP__c + H__c + MG_318_MONOMER__m + PI__c";

function Function_for_ATP__c___H2O__c___MG_185_MONOMER__c__MG_055_170_277_464_476_20MER__m__MG_072_DIMER__c___ADP__c___H__c___MG_185_MONOMER__m___PI__c(ATP__c, Km1_MG_185_MONOMER__c, Km2_ATP__c, MG_055_170_277_464_476_20MER__m, MG_072_DIMER__c, MG_185_MONOMER__c, mwba21af05_7d71_483c_be58_e047b7872cee_mw05c2894d_55ed_4d50_b2d4_c6132500a753)
  mwba21af05_7d71_483c_be58_e047b7872cee_mw05c2894d_55ed_4d50_b2d4_c6132500a753*MG_072_DIMER__c*MG_055_170_277_464_476_20MER__m*MG_185_MONOMER__c*ATP__c/((1 + MG_185_MONOMER__c/Km1_MG_185_MONOMER__c)*(1 + ATP__c/Km2_ATP__c));
end
Function_for_ATP__c___H2O__c___MG_185_MONOMER__c__MG_055_170_277_464_476_20MER__m__MG_072_DIMER__c___ADP__c___H__c___MG_185_MONOMER__m___PI__c is "Function for ATP__c + H2O__c + MG_185_MONOMER__c -MG_055_170_277_464_476_20MER__m, MG_072_DIMER__c-> ADP__c + H__c + MG_185_MONOMER__m + PI__c";

function Function_for_ATP__c___H2O__c___MG_403_MONOMER__c__MG_055_170_277_464_476_20MER__m__MG_072_DIMER__c___ADP__c___H__c___MG_403_MONOMER__m___PI__c(ATP__c, Km1_MG_403_MONOMER__c, Km2_ATP__c, MG_055_170_277_464_476_20MER__m, MG_072_DIMER__c, MG_403_MONOMER__c, mwc05821b1_4a05_4a36_b96c_1ceb0d19cd1a_mwd399ad40_6c1d_475f_aa2e_dc9326e7107c)
  mwc05821b1_4a05_4a36_b96c_1ceb0d19cd1a_mwd399ad40_6c1d_475f_aa2e_dc9326e7107c*MG_072_DIMER__c*MG_055_170_277_464_476_20MER__m*MG_403_MONOMER__c*ATP__c/((1 + MG_403_MONOMER__c/Km1_MG_403_MONOMER__c)*(1 + ATP__c/Km2_ATP__c));
end
Function_for_ATP__c___H2O__c___MG_403_MONOMER__c__MG_055_170_277_464_476_20MER__m__MG_072_DIMER__c___ADP__c___H__c___MG_403_MONOMER__m___PI__c is "Function for ATP__c + H2O__c + MG_403_MONOMER__c -MG_055_170_277_464_476_20MER__m, MG_072_DIMER__c-> ADP__c + H__c + MG_403_MONOMER__m + PI__c";

function Function_for_ATP__c___H2O__c___MG_014_MONOMER__c__MG_055_170_277_464_476_20MER__m__MG_072_DIMER__c___ADP__c___H__c___MG_014_MONOMER__m___PI__c(ATP__c, Km1_MG_014_MONOMER__c, Km2_ATP__c, MG_014_MONOMER__c, MG_055_170_277_464_476_20MER__m, MG_072_DIMER__c, mwc71b6669_b8ef_4553_8bf2_afd8589ec27d_mwce25c328_2b4c_4373_b790_7014eb1a2e24)
  mwc71b6669_b8ef_4553_8bf2_afd8589ec27d_mwce25c328_2b4c_4373_b790_7014eb1a2e24*MG_072_DIMER__c*MG_055_170_277_464_476_20MER__m*MG_014_MONOMER__c*ATP__c/((1 + MG_014_MONOMER__c/Km1_MG_014_MONOMER__c)*(1 + ATP__c/Km2_ATP__c));
end
Function_for_ATP__c___H2O__c___MG_014_MONOMER__c__MG_055_170_277_464_476_20MER__m__MG_072_DIMER__c___ADP__c___H__c___MG_014_MONOMER__m___PI__c is "Function for ATP__c + H2O__c + MG_014_MONOMER__c -MG_055_170_277_464_476_20MER__m, MG_072_DIMER__c-> ADP__c + H__c + MG_014_MONOMER__m + PI__c";

function Function_for_ATP__c___H2O__c___MG_192_MONOMER__c__MG_055_170_277_464_476_20MER__m__MG_072_DIMER__c___ADP__c___H__c___MG_192_MONOMER__m___PI__c(ATP__c, Km1_MG_192_MONOMER__c, Km2_ATP__c, MG_055_170_277_464_476_20MER__m, MG_072_DIMER__c, MG_192_MONOMER__c, mwcb2f9e25_32cc_4c14_8e52_289861798e79_mw75e67499_dc92_468f_82ef_13a1c57f3f14)
  mwcb2f9e25_32cc_4c14_8e52_289861798e79_mw75e67499_dc92_468f_82ef_13a1c57f3f14*MG_072_DIMER__c*MG_055_170_277_464_476_20MER__m*MG_192_MONOMER__c*ATP__c/((1 + MG_192_MONOMER__c/Km1_MG_192_MONOMER__c)*(1 + ATP__c/Km2_ATP__c));
end
Function_for_ATP__c___H2O__c___MG_192_MONOMER__c__MG_055_170_277_464_476_20MER__m__MG_072_DIMER__c___ADP__c___H__c___MG_192_MONOMER__m___PI__c is "Function for ATP__c + H2O__c + MG_192_MONOMER__c -MG_055_170_277_464_476_20MER__m, MG_072_DIMER__c-> ADP__c + H__c + MG_192_MONOMER__m + PI__c";

function Function_for_ATP__c___H2O__c___MG_191_MONOMER__c__MG_055_170_277_464_476_20MER__m__MG_072_DIMER__c___ADP__c___H__c___MG_191_MONOMER__m___PI__c(ATP__c, Km1_MG_191_MONOMER__c, Km2_ATP__c, MG_055_170_277_464_476_20MER__m, MG_072_DIMER__c, MG_191_MONOMER__c, mwcc3e7871_2a60_446b_9da1_9e3f88f96d1d_mw20e97f4d_ef5d_4cbc_ae20_b237a531ac2d)
  mwcc3e7871_2a60_446b_9da1_9e3f88f96d1d_mw20e97f4d_ef5d_4cbc_ae20_b237a531ac2d*MG_072_DIMER__c*MG_055_170_277_464_476_20MER__m*MG_191_MONOMER__c*ATP__c/((1 + MG_191_MONOMER__c/Km1_MG_191_MONOMER__c)*(1 + ATP__c/Km2_ATP__c));
end
Function_for_ATP__c___H2O__c___MG_191_MONOMER__c__MG_055_170_277_464_476_20MER__m__MG_072_DIMER__c___ADP__c___H__c___MG_191_MONOMER__m___PI__c is "Function for ATP__c + H2O__c + MG_191_MONOMER__c -MG_055_170_277_464_476_20MER__m, MG_072_DIMER__c-> ADP__c + H__c + MG_191_MONOMER__m + PI__c";

function Function_for_ATP__c___H2O__c___MG_260_MONOMER__c__MG_055_170_277_464_476_20MER__m__MG_072_DIMER__c___ADP__c___H__c___MG_260_MONOMER__m___PI__c(ATP__c, Km1_MG_260_MONOMER__c, Km2_ATP__c, MG_055_170_277_464_476_20MER__m, MG_072_DIMER__c, MG_260_MONOMER__c, mwcc704ab4_307a_43f1_99a4_6e80ca66e271_mw98d1acbe_506e_4ddb_8a24_210ffe4d7936)
  mwcc704ab4_307a_43f1_99a4_6e80ca66e271_mw98d1acbe_506e_4ddb_8a24_210ffe4d7936*MG_072_DIMER__c*MG_055_170_277_464_476_20MER__m*MG_260_MONOMER__c*ATP__c/((1 + MG_260_MONOMER__c/Km1_MG_260_MONOMER__c)*(1 + ATP__c/Km2_ATP__c));
end
Function_for_ATP__c___H2O__c___MG_260_MONOMER__c__MG_055_170_277_464_476_20MER__m__MG_072_DIMER__c___ADP__c___H__c___MG_260_MONOMER__m___PI__c is "Function for ATP__c + H2O__c + MG_260_MONOMER__c -MG_055_170_277_464_476_20MER__m, MG_072_DIMER__c-> ADP__c + H__c + MG_260_MONOMER__m + PI__c";

function Function_for_ATP__c___H2O__c___MG_255_MONOMER__c__MG_055_170_277_464_476_20MER__m__MG_072_DIMER__c___ADP__c___H__c___MG_255_MONOMER__m___PI__c(ATP__c, Km1_MG_255_MONOMER__c, Km2_ATP__c, MG_055_170_277_464_476_20MER__m, MG_072_DIMER__c, MG_255_MONOMER__c, mwdb0b7659_3fb3_454f_bc25_c8d3a249bd5e_mw86c4d348_8649_4c24_bef3_012564cf3a9e)
  mwdb0b7659_3fb3_454f_bc25_c8d3a249bd5e_mw86c4d348_8649_4c24_bef3_012564cf3a9e*MG_072_DIMER__c*MG_055_170_277_464_476_20MER__m*MG_255_MONOMER__c*ATP__c/((1 + MG_255_MONOMER__c/Km1_MG_255_MONOMER__c)*(1 + ATP__c/Km2_ATP__c));
end
Function_for_ATP__c___H2O__c___MG_255_MONOMER__c__MG_055_170_277_464_476_20MER__m__MG_072_DIMER__c___ADP__c___H__c___MG_255_MONOMER__m___PI__c is "Function for ATP__c + H2O__c + MG_255_MONOMER__c -MG_055_170_277_464_476_20MER__m, MG_072_DIMER__c-> ADP__c + H__c + MG_255_MONOMER__m + PI__c";

function Function_for_ATP__c___H2O__c___MG_443_MONOMER__c__MG_055_170_277_464_476_20MER__m__MG_072_DIMER__c___ADP__c___H__c___MG_443_MONOMER__m___PI__c(ATP__c, Km1_MG_443_MONOMER__c, Km2_ATP__c, MG_055_170_277_464_476_20MER__m, MG_072_DIMER__c, MG_443_MONOMER__c, mwdebe02ee_43fd_427b_8bad_ae80d86b8c9e_mw55bb4f53_3e92_453f_afb8_e948e74c5f95)
  mwdebe02ee_43fd_427b_8bad_ae80d86b8c9e_mw55bb4f53_3e92_453f_afb8_e948e74c5f95*MG_072_DIMER__c*MG_055_170_277_464_476_20MER__m*MG_443_MONOMER__c*ATP__c/((1 + MG_443_MONOMER__c/Km1_MG_443_MONOMER__c)*(1 + ATP__c/Km2_ATP__c));
end
Function_for_ATP__c___H2O__c___MG_443_MONOMER__c__MG_055_170_277_464_476_20MER__m__MG_072_DIMER__c___ADP__c___H__c___MG_443_MONOMER__m___PI__c is "Function for ATP__c + H2O__c + MG_443_MONOMER__c -MG_055_170_277_464_476_20MER__m, MG_072_DIMER__c-> ADP__c + H__c + MG_443_MONOMER__m + PI__c";

function Function_for_ATP__c___H2O__c___MG_149_MONOMER__c__MG_055_170_277_464_476_20MER__m__MG_072_DIMER__c___ADP__c___H__c___MG_149_MONOMER__m___PI__c(ATP__c, Km1_MG_149_MONOMER__c, Km2_ATP__c, MG_055_170_277_464_476_20MER__m, MG_072_DIMER__c, MG_149_MONOMER__c, mwe313ead8_dd4a_44fb_bd91_836297162968_mw60c1acd7_1f99_4595_9052_953c29e7690f)
  mwe313ead8_dd4a_44fb_bd91_836297162968_mw60c1acd7_1f99_4595_9052_953c29e7690f*MG_072_DIMER__c*MG_055_170_277_464_476_20MER__m*MG_149_MONOMER__c*ATP__c/((1 + MG_149_MONOMER__c/Km1_MG_149_MONOMER__c)*(1 + ATP__c/Km2_ATP__c));
end
Function_for_ATP__c___H2O__c___MG_149_MONOMER__c__MG_055_170_277_464_476_20MER__m__MG_072_DIMER__c___ADP__c___H__c___MG_149_MONOMER__m___PI__c is "Function for ATP__c + H2O__c + MG_149_MONOMER__c -MG_055_170_277_464_476_20MER__m, MG_072_DIMER__c-> ADP__c + H__c + MG_149_MONOMER__m + PI__c";

function Function_for_ATP__c___H2O__c___MG_044_MONOMER__c__MG_055_170_277_464_476_20MER__m__MG_072_DIMER__c___ADP__c___H__c___MG_044_MONOMER__m___PI__c(ATP__c, Km1_MG_044_MONOMER__c, Km2_ATP__c, MG_044_MONOMER__c, MG_055_170_277_464_476_20MER__m, MG_072_DIMER__c, mwe6b7a06c_c003_4e40_b66a_83edf102c05a_mw3101aa51_7e9b_4605_8593_6c510decc1c0)
  mwe6b7a06c_c003_4e40_b66a_83edf102c05a_mw3101aa51_7e9b_4605_8593_6c510decc1c0*MG_072_DIMER__c*MG_055_170_277_464_476_20MER__m*MG_044_MONOMER__c*ATP__c/((1 + MG_044_MONOMER__c/Km1_MG_044_MONOMER__c)*(1 + ATP__c/Km2_ATP__c));
end
Function_for_ATP__c___H2O__c___MG_044_MONOMER__c__MG_055_170_277_464_476_20MER__m__MG_072_DIMER__c___ADP__c___H__c___MG_044_MONOMER__m___PI__c is "Function for ATP__c + H2O__c + MG_044_MONOMER__c -MG_055_170_277_464_476_20MER__m, MG_072_DIMER__c-> ADP__c + H__c + MG_044_MONOMER__m + PI__c";
function Function_for_ATP__c___H2O__c___MG_120_MONOMER__c__MG_055_170_277_464_476_20MER__m__MG_072_DIMER__c___ADP__c___H__c___MG_120_MONOMER__m___PI__c(ATP__c, Km1_MG_120_MONOMER__c, Km2_ATP__c, MG_055_170_277_464_476_20MER__m, MG_072_DIMER__c, MG_120_MONOMER__c, mwe7aee207_1704_4e58_9a85_aef0776ce60d_mw7322cb63_b9d9_4fb9_abfc_0c429ade526d)
  mwe7aee207_1704_4e58_9a85_aef0776ce60d_mw7322cb63_b9d9_4fb9_abfc_0c429ade526d*MG_072_DIMER__c*MG_055_170_277_464_476_20MER__m*MG_120_MONOMER__c*ATP__c/((1 + MG_120_MONOMER__c/Km1_MG_120_MONOMER__c)*(1 + ATP__c/Km2_ATP__c));
end
Function_for_ATP__c___H2O__c___MG_120_MONOMER__c__MG_055_170_277_464_476_20MER__m__MG_072_DIMER__c___ADP__c___H__c___MG_120_MONOMER__m___PI__c is "Function for ATP__c + H2O__c + MG_120_MONOMER__c -MG_055_170_277_464_476_20MER__m, MG_072_DIMER__c-> ADP__c + H__c + MG_120_MONOMER__m + PI__c";

function Function_for_ATP__c___H2O__c___MG_289_MONOMER__c__MG_055_170_277_464_476_20MER__m__MG_072_DIMER__c___ADP__c___H__c___MG_289_MONOMER__e___PI__c(ATP__c, Km1_MG_289_MONOMER__c, Km2_ATP__c, MG_055_170_277_464_476_20MER__m, MG_072_DIMER__c, MG_289_MONOMER__c, mwe95617b3_564c_4c7f_a96a_636a4fb74d54_mw3a899d5c_147b_4c1d_8213_4b38e5c90bd1)
  mwe95617b3_564c_4c7f_a96a_636a4fb74d54_mw3a899d5c_147b_4c1d_8213_4b38e5c90bd1*MG_072_DIMER__c*MG_055_170_277_464_476_20MER__m*MG_289_MONOMER__c*ATP__c/((1 + MG_289_MONOMER__c/Km1_MG_289_MONOMER__c)*(1 + ATP__c/Km2_ATP__c));
end
Function_for_ATP__c___H2O__c___MG_289_MONOMER__c__MG_055_170_277_464_476_20MER__m__MG_072_DIMER__c___ADP__c___H__c___MG_289_MONOMER__e___PI__c is "Function for ATP__c + H2O__c + MG_289_MONOMER__c -MG_055_170_277_464_476_20MER__m, MG_072_DIMER__c-> ADP__c + H__c + MG_289_MONOMER__e + PI__c";

function Function_for_ATP__c___H2O__c___MG_074_MONOMER__c__MG_055_170_277_464_476_20MER__m__MG_072_DIMER__c___ADP__c___H__c___MG_074_MONOMER__e___PI__c(ATP__c, Km1_MG_074_MONOMER__c, Km2_ATP__c, MG_055_170_277_464_476_20MER__m, MG_072_DIMER__c, MG_074_MONOMER__c, mwf0062c5f_03f3_4812_9cbb_b3ecb3061e20_mw5fbd4daf_77f4_4231_b8c3_ace2a12e5290)
  mwf0062c5f_03f3_4812_9cbb_b3ecb3061e20_mw5fbd4daf_77f4_4231_b8c3_ace2a12e5290*MG_072_DIMER__c*MG_055_170_277_464_476_20MER__m*MG_074_MONOMER__c*ATP__c/((1 + MG_074_MONOMER__c/Km1_MG_074_MONOMER__c)*(1 + ATP__c/Km2_ATP__c));
end
Function_for_ATP__c___H2O__c___MG_074_MONOMER__c__MG_055_170_277_464_476_20MER__m__MG_072_DIMER__c___ADP__c___H__c___MG_074_MONOMER__e___PI__c is "Function for ATP__c + H2O__c + MG_074_MONOMER__c -MG_055_170_277_464_476_20MER__m, MG_072_DIMER__c-> ADP__c + H__c + MG_074_MONOMER__e + PI__c";

function Function_for_ATP__c___H2O__c___MG_114_MONOMER__c__MG_055_170_277_464_476_20MER__m__MG_072_DIMER__c___ADP__c___H__c___MG_114_MONOMER__m___PI__c(ATP__c, Km1_MG_114_MONOMER__c, Km2_ATP__c, MG_055_170_277_464_476_20MER__m, MG_072_DIMER__c, MG_114_MONOMER__c, mwf7de5321_f42e_44e0_8c4f_b52cbfff7b94_mwa5e78af7_d1af_4a48_b4b8_a9b35369d040)
  mwf7de5321_f42e_44e0_8c4f_b52cbfff7b94_mwa5e78af7_d1af_4a48_b4b8_a9b35369d040*MG_072_DIMER__c*MG_055_170_277_464_476_20MER__m*MG_114_MONOMER__c*ATP__c/((1 + MG_114_MONOMER__c/Km1_MG_114_MONOMER__c)*(1 + ATP__c/Km2_ATP__c));
end
Function_for_ATP__c___H2O__c___MG_114_MONOMER__c__MG_055_170_277_464_476_20MER__m__MG_072_DIMER__c___ADP__c___H__c___MG_114_MONOMER__m___PI__c is "Function for ATP__c + H2O__c + MG_114_MONOMER__c -MG_055_170_277_464_476_20MER__m, MG_072_DIMER__c-> ADP__c + H__c + MG_114_MONOMER__m + PI__c";

function Function_for_ATP__c___H2O__c___MG_389_MONOMER__c__MG_055_170_277_464_476_20MER__m__MG_072_DIMER__c___ADP__c___H__c___MG_389_MONOMER__e___PI__c(ATP__c, Km1_MG_389_MONOMER__c, Km2_ATP__c, MG_055_170_277_464_476_20MER__m, MG_072_DIMER__c, MG_389_MONOMER__c, mwfd8a9675_dd2d_4d4c_b754_430c14e3af37_mwfe629141_d2cf_4c43_a01e_eb4cf494b38d)
  mwfd8a9675_dd2d_4d4c_b754_430c14e3af37_mwfe629141_d2cf_4c43_a01e_eb4cf494b38d*MG_072_DIMER__c*MG_055_170_277_464_476_20MER__m*MG_389_MONOMER__c*ATP__c/((1 + MG_389_MONOMER__c/Km1_MG_389_MONOMER__c)*(1 + ATP__c/Km2_ATP__c));
end
Function_for_ATP__c___H2O__c___MG_389_MONOMER__c__MG_055_170_277_464_476_20MER__m__MG_072_DIMER__c___ADP__c___H__c___MG_389_MONOMER__e___PI__c is "Function for ATP__c + H2O__c + MG_389_MONOMER__c -MG_055_170_277_464_476_20MER__m, MG_072_DIMER__c-> ADP__c + H__c + MG_389_MONOMER__e + PI__c";

model tRNAAminoacylation()
  // tRNAAminoacylation module

  // Compartments:
  compartment c = 1;
  compartment m = 1;
  compartment e = 1;

  // Species:
  species MG485__c in c = 0;
  species MG_428_DIMER__c in c = 10/c; MG_428_DIMER__c is "LuxR bacterial regulatory protein, putative";
  species MG_118_DIMER__c in c = 12/c; MG_118_DIMER__c is "UDP-glucose 4-epimerase";
  species MG493_aa__c in c = 51/c; MG493_aa__c is "MG493-AA";
  species MG_043_MONOMER__c in c = 5;
  species MG_375_DIMER__c in c = 124/c; MG_375_DIMER__c is "threonyl-tRNA synthetase";
  species MG_133_MONOMER__c in c = 5;
  species MG_205_MONOMER__c in c = 1/c; MG_205_MONOMER__c is "heat-inducible transcription repressor HrcA, putative";
  species MG_241_MONOMER__m in m = 0;
  species MG488__c in c = 0;
  species MG_331_MONOMER__m in m = 0;
  species MG_481_MONOMER__c in c = 119/c; MG_481_MONOMER__c is "30S ribosomal protein S21";
  species MG_407_MONOMER__c in c = 0; MG_407_MONOMER__c is "enolase";
  species MG_255_MONOMER__c in c = 5;
  species MG_460_MONOMER__c in c = 0; MG_460_MONOMER__c is "L-lactate dehydrogenase/malate dehydrogenase";
  species MG_119_MONOMER__c in c = 37/c; MG_119_MONOMER__c is "Monosaccharide (riboside/galactoside) ABC transporter, ATP-binding protein";
  species MG472_aa__c in c = 72/c; MG472_aa__c is "MG472-AA";
  species MG_272_MONOMER__c in c = 91/c; MG_272_MONOMER__c is "dihydrolipoamide acetyltransferase";
  species MG_071_MONOMER__m in m = 0;
  species MG514_aa__c in c = 56/c; MG514_aa__c is "MG514-AA";
  species MG_412_MONOMER__c in c = 5;
  species MG_0003_465__c in c = 25/c; MG_0003_465__c is "ribonuclease P";
  species MG508_aa__c in c = 61/c; MG508_aa__c is "MG508-AA";
  species MG496_aa__c in c = 9/c; MG496_aa__c is "MG496-AA";
  species GLU__c in c = 9518/c; GLU__c is "L-Glutamate";
  species MG_281_MONOMER__e in e = 0;
  species MG_274_MONOMER__c in c = 38/c; MG_274_MONOMER__c is "pyruvate dehydrogenase component E1, alpha subunit";
  species MG_216_MONOMER__c in c = 2/c; MG_216_MONOMER__c is "pyruvate kinase";
  species MG_437_DIMER__m in m = 13/m; MG_437_DIMER__m is "phosphatidate cytidylyltransferase";
  species MG_406_MONOMER__m in m = 0;
  species MG_456_MONOMER__m in m = 0;
  species MG_168_MONOMER__c in c = 105/c; MG_168_MONOMER__c is "ribosomal protein S5";
  species MG_414_MONOMER__c in c = 5;
  species MG_395_MONOMER__m in m = 0;
  species MG_348_MONOMER__m in m = 0;
  species MG_203_MONOMER__c in c = 1/c; MG_203_MONOMER__c is "DNA topoisomerase IV, B subunit";
  species MG_096_MONOMER__c in c = 5;
  species MG_368_MONOMER__c in c = 1/c; MG_368_MONOMER__c is "fatty acid/phospholipid synthesis protein PlsX";
  species RIBOSOME_50S__c in c = 12/c; RIBOSOME_50S__c is "50S ribosomal subunit";
  species MG_019_DIMER__c in c = 25/c; MG_019_DIMER__c is "chaperone protein DnaJ";
  species MG_286_MONOMER__c in c = 5;
  species MG_084_MONOMER__c in c = 3/c; MG_084_MONOMER__c is "tRNA(Ile)-lysidine synthetase";
  species MG_220_MONOMER__c in c = 5;
  species MG506_aa__c in c = 16/c; MG506_aa__c is "MG506-AA";
  species MG_229_231_TETRAMER_ox__c in c = 0; MG_229_231_TETRAMER_ox__c is "oxidized ribonucleoside-diphosphate reductase";
  species MG_447_MONOMER__m in m = 0;
  species MG_419_MONOMER__c in c = 2/c; MG_419_MONOMER__c is "DNA polymerase III, subunit gamma and tau";
  species MG_251_MONOMER__c in c = 1/c; MG_251_MONOMER__c is "glycyl-tRNA synthetase";
  species MG_053_MONOMER__c in c = 0; MG_053_MONOMER__c is "phosphoglucomutase/phosphomannomutase, putative";
  species MG_458_TETRAMER__c in c = 17/c; MG_458_TETRAMER__c is "hypoxanthine phosphoribosyltransferase";
  species MG_068_MONOMER__c in c = 5;
  species MG_188_MONOMER__m in m = 0;
  species FTHF10__c in c = 2895/c; FTHF10__c is "10-formyl-tetrahydrofolate";
  species MG_250_MONOMER__c in c = 33/c; MG_250_MONOMER__c is "DNA primase";
  species MG_441_MONOMER__c in c = 5;
  species MG_378_MONOMER__c in c = 33/c; MG_378_MONOMER__c is "arginyl-tRNA synthetase";
  species MG520_aa__c in c = 33/c; MG520_aa__c is "MG520-AA";
  species MG_023_MONOMER__c in c = 1/c; MG_023_MONOMER__c is "fructose-1,6-bisphosphate aldolase, class II";
  species MG_306_MONOMER__c in c = 5;
  species RNA_POLYMERASE_HOLOENZYME__c in c = 0; RNA_POLYMERASE_HOLOENZYME__c is "DNA-directed RNA polymerase holoenzyme";
  species MG_136_DIMER__c in c = 23/c; MG_136_DIMER__c is "lysyl-tRNA synthetase";
  species MG_182_DIMER__c in c = 13/c; MG_182_DIMER__c is "Pseudouridylate synthase";
  species MG_318_MONOMER__c in c = 5;
  species MG_478_MONOMER__c in c = 5;
  species MG_114_MONOMER__c in c = 5;
  species MG_320_MONOMER__m in m = 0;
  species H__c in c = 0;
  species MG_073_206_421_TETRAMER__c in c = 16/c; MG_073_206_421_TETRAMER__c is "DNA incision complex";
  species MG_061_MONOMER__m in m = 0;
  species MG_102_MONOMER__c in c = 0; MG_102_MONOMER__c is "thioredoxin-disulfide reductase";
  species MG_291_MONOMER__m in m = 0;
  species MG_310_MONOMER__c in c = 5;
  species MG_184_MONOMER__c in c = 1/c; MG_184_MONOMER__c is "adenine-specific DNA modification methylase";
  species MG_221_OCTAMER__c in c = 12/c; MG_221_OCTAMER__c is "mraZ protein";
  species MG_177_MONOMER__c in c = 126/c; MG_177_MONOMER__c is "DNA-directed RNA polymerase, alpha subunit";
  species MG_445_MONOMER__c in c = 1/c; MG_445_MONOMER__c is "tRNA (guanine-N1)-methyltransferase";
  species RIBOSOME_30S__c in c = 25/c; RIBOSOME_30S__c is "30S ribosomal subunit";
  species MG_405_MONOMER__c in c = 5;
  species MG471_aa__c in c = 72/c; MG471_aa__c is "MG471-AA";
  species MG_046_MONOMER__c in c = 0; MG_046_MONOMER__c is "metalloendopeptidase";
  species MG_271_MONOMER__c in c = 628/c; MG_271_MONOMER__c is "dihydrolipoamide dehydrogenase";
  species MG_096_MONOMER__e in e = 0;
  species REPLISOME__c in c = 0; REPLISOME__c is "Replisome";
  species MG_293_MONOMER__c in c = 1/c; MG_293_MONOMER__c is "glycerophosphoryl diester phosphodiesterase";
  species MG_457_MONOMER__c in c = 5;
  species MG_065_MONOMER__c in c = 1/c; MG_065_MONOMER__c is "ABC transporter, ATP-binding protein";
  species MG_208_DIMER__c in c = 24/c; MG_208_DIMER__c is "glycoprotease family protein";
  species MG_469_7MER_6ATP_ADP__c in c = 0; MG_469_7MER_6ATP_ADP__c is "DnaA 7mer-(6)ATP-(1)ADP";
  species MG_224_MONOMER__c in c = 0; MG_224_MONOMER__c is "cell division protein FtsZ";
  species MG_287_MONOMER_palmACP__c in c = 0; MG_287_MONOMER_palmACP__c is "Palmitoyl-ACP (n-C16:0ACP)";
  species MG_062_MONOMER__m in m = 0;
  species MG487__c in c = 0;
  species MG492_aa__c in c = 13/c; MG492_aa__c is "MG492-AA";
  species MG495__c in c = 0;
  species MG487_aa__c in c = 20/c; MG487_aa__c is "MG487-AA";
  species MG519__c in c = 0;
  species MG497__c in c = 0;
  species MG_046_DIMER__c in c = 21/c; MG_046_DIMER__c is "metalloendopeptidase";
  species MG_271_272_273_274_192MER__c in c = 11/c; MG_271_272_273_274_192MER__c is "pyruvate dehydrogenase";
  species MG_014_MONOMER__m in m = 0;
  species MG_319_MONOMER__c in c = 5;
  species MG_293_DIMER__c in c = 33/c; MG_293_DIMER__c is "glycerophosphoryl diester phosphodiesterase family protein";
  species MG_441_MONOMER__m in m = 0;
  species MG_362_MONOMER__c in c = 118/c; MG_362_MONOMER__c is "ribosomal protein L7/L12";
  species MG_086_MONOMER__c in c = 5;
  species MG_354_MONOMER__m in m = 0;
  species MG_184_DIMER__c in c = 29/c; MG_184_DIMER__c is "adenine-specific DNA modification methylase";
  species MG_162_MONOMER__c in c = 128/c; MG_162_MONOMER__c is "ribosomal protein L24";
  species MG507__c in c = 0;
  species MG_318_MONOMER__m in m = 0;
  species MG_170_MONOMER__m in m = 0;
  species MG_322_323_TETRAMER__m in m = 10/m; MG_322_323_TETRAMER__m is "potassium uptake protein, TrkH family, putative";
  species MG_090_MONOMER__c in c = 120/c; MG_090_MONOMER__c is "ribosomal protein S6";
  species MG_153_MONOMER__c in c = 142/c; MG_153_MONOMER__c is "ribosomal protein L23";
  species MG_321_MONOMER__e in e = 0;
  species MG_464_MONOMER__c in c = 5;
  species LEU__c in c = 17971/c; LEU__c is "L-Leucine";
  species MG_455_MONOMER__c in c = 1/c; MG_455_MONOMER__c is "tyrosyl-tRNA synthetase";
  species MG_098_099_100_TRIMER__c in c = 139/c; MG_098_099_100_TRIMER__c is "glutamyl-tRNA(Gln) and/or aspartyl-tRNA(Asn) amidotransferase";
  species MG_131_MONOMER__c in c = 5;
  species MG_383_MONOMER__c in c = 0; MG_383_MONOMER__c is "NH(3)-dependent NAD+ synthetase, putative";
  species MG_447_MONOMER__c in c = 5;
  species MG_189_MONOMER__m in m = 0;
  species MG_322_MONOMER__m in m = 0;
  species MG_427_MONOMER__c in c = 0; MG_427_MONOMER__c is "osmotically inducible peroxidase";
  species MG_192_MONOMER__m in m = 0;
  species MG_292_MONOMER__c in c = 2/c; MG_292_MONOMER__c is "alanyl-tRNA synthetase";
  species MG_313_MONOMER__m in m = 0;
  species MG_224_5MER_GTP__c in c = 3/c; MG_224_5MER_GTP__c is "cell division protein ftsZ activated 5mer";
  species MG_460_TETRAMER__c in c = 13/c; MG_460_TETRAMER__c is "L-lactate dehydrogenase/malate dehydrogenase";
  species MG_004_MONOMER__c in c = 1/c; MG_004_MONOMER__c is "DNA gyrase, A subunit";
  species MG_462_MONOMER__c in c = 81/c; MG_462_MONOMER__c is "glutamyl-tRNA synthetase";
  species MG_385_DIMER__c in c = 10/c; MG_385_DIMER__c is "glycerophosphoryl diester phosphodiesterase family protein";
  species MG_239_MONOMER__c in c = 5/c; MG_239_MONOMER__c is "ATP-dependent protease La";
  species DNA_GYRASE__c in c = 50/c; DNA_GYRASE__c is "DNA gyrase";
  species MG_111_MONOMER__c in c = 0; MG_111_MONOMER__c is "glucose-6-phosphate isomerase";
  species MG_150_MONOMER__c in c = 131/c; MG_150_MONOMER__c is "ribosomal protein S10";
  species MG_429_MONOMER__c in c = 0; MG_429_MONOMER__c is "PTS system, E1";
  species MG_114_DIMER__m in m = 19/m; MG_114_DIMER__m is "CDP-diacylglycerol--glycerol-3-phosphate 3-phosphatidyltransferase";
  species MET__c in c = 2792/c; MET__c is "L-Methionine";
  species MG_159_MONOMER__c in c = 159/c; MG_159_MONOMER__c is "ribosomal protein L29";
  species MG_045_MONOMER__e in e = 0;
  species MG_191_MONOMER__c in c = 5;
  species MG_019_MONOMER__c in c = 1/c; MG_019_MONOMER__c is "chaperone protein DnaJ";
  species MG_295_MONOMER_ox__c in c = 0; MG_295_MONOMER_ox__c is "oxidized tRNA U34 sulfurtransferase";
  species MG_021_MONOMER__c in c = 0; MG_021_MONOMER__c is "methionyl-tRNA synthetase";
  species MG_277_MONOMER__c in c = 5;
  species MG_394_TETRAMER__c in c = 14/c; MG_394_TETRAMER__c is "serine hydroxymethyltransferase";
  species MG_042_MONOMER__c in c = 1/c; MG_042_MONOMER__c is "spermidine/putrescine (polyamine) ABC transporter, ATP-binding protein, putative";
  species MG_336_DIMER__c in c = 15/c; MG_336_DIMER__c is "cysteine desulfurase";
  species MG_107_DIMER__c in c = 25/c; MG_107_DIMER__c is "guanylate kinase";
  species MG_105_MONOMER__c in c = 4/c; MG_105_MONOMER__c is "putative DNA integrity scanning protein";
  species MG_283_DIMER__c in c = 14/c; MG_283_DIMER__c is "prolyl-tRNA synthetase";
  species MG_181_MONOMER__m in m = 0;
  species MG_112_DIMER__c in c = 19/c; MG_112_DIMER__c is "ribulose-phosphate 3-epimerase";
  species MG_028_MONOMER__c in c = 5;
  species MG_167_MONOMER__c in c = 94/c; MG_167_MONOMER__c is "ribosomal protein L18";
  species MG_015_MONOMER__c in c = 5;
  species MG_229_MONOMER__c in c = 2/c; MG_229_MONOMER__c is "ribonucleoside-diphosphate reductase, beta chain";
  species MG_066_DIMER__c in c = 24/c; MG_066_DIMER__c is "transketolase";
  species MG_028_MONOMER__m in m = 0;
  species MG_224_3MER_GTP__c in c = 1/c; MG_224_3MER_GTP__c is "cell division protein ftsZ activated 3mer";
  species MG_186_187_188_189_PENTAMER__m in m = 18/m; MG_186_187_188_189_PENTAMER__m is "Oligosaccharide or polyol ABC transporter";
  species MG_431_DIMER__c in c = 25/c; MG_431_DIMER__c is "triosephosphate isomerase";
  species MG_212_MONOMER__c in c = 5;
  species MG_364_MONOMER__c in c = 5;
  species MG_175_MONOMER__c in c = 120/c; MG_175_MONOMER__c is "ribosomal protein S13";
  species MG_358_359_10MER__c in c = 13/c; MG_358_359_10MER__c is "Holliday junction DNA helicase";
  species MG_0003__c in c = 0; MG_0003__c is "Rnase P RNA, MCS5, M1 RNA";
  species MG_053_TRIMER__c in c = 23/c; MG_053_TRIMER__c is "phosphoglucomutase/phosphomannomutase, putative";
  species MG_206_MONOMER__c in c = 7/c; MG_206_MONOMER__c is "excinuclease ABC, C subunit";
  species MG_094_HEXAMER__c in c = 36/c; MG_094_HEXAMER__c is "replicative DNA helicase";
  species MG_476_MONOMER__c in c = 5;
  species MG_354_MONOMER__c in c = 5;
  species MG_014_MONOMER__c in c = 5;
  species MG_155_MONOMER__c in c = 130/c; MG_155_MONOMER__c is "ribosomal protein S19";
  species MG_482_DIMER__c in c = 13/c; MG_482_DIMER__c is "holo-(acyl-carrier-protein) synthase";
  species MGrrnA5S__c in c = 29/c; MGrrnA5S__c is "5S ribosomal rRNA";
  species MG_452_MONOMER__m in m = 0;
  species MG_280_MONOMER__c in c = 5;
  species MG_084_TETRAMER__c in c = 18/c; MG_084_TETRAMER__c is "tRNA(Ile)-lysidine synthetase";
  species MG_085_HEXAMER__c in c = 14/c; MG_085_HEXAMER__c is "HPr(Ser) kinase/phosphatase";
  species MG_146_MONOMER__c in c = 5;
  species MG_521_MONOMER__m in m = 0;
  species MG_294_MONOMER__c in c = 5;
  species MG_031_MONOMER__c in c = 9/c; MG_031_MONOMER__c is "DNA polymerase III, alpha subunit, Gram-positive type";
  species MG_368_DIMER__c in c = 14/c; MG_368_DIMER__c is "fatty acid/phospholipid synthesis protein PlsX";
  species MG_473_MONOMER__c in c = 133/c; MG_473_MONOMER__c is "ribosomal protein L33 type 2";
  species MG_299_DIMER__c in c = 22/c; MG_299_DIMER__c is "phosphate acetyltransferase";
  species MG_001_DIMER__c in c = 0; MG_001_DIMER__c is "DNA polymerase III, beta clamp";
  species MG_139_MONOMER__c in c = 0; MG_139_MONOMER__c is "ribonuclease J";
  species MG507_aa__c in c = 23/c; MG507_aa__c is "MG507-AA";
  species MG_068_MONOMER__m in m = 0;
  species MG_224_8MER_GTP__c in c = 12/c; MG_224_8MER_GTP__c is "cell division protein ftsZ activated 8mer";
  species MG_102_DIMER_ox__c in c = 0; MG_102_DIMER_ox__c is "oxidized thioredoxin-disulfide reductase";
  species MG_427_DIMER__c in c = 17/c; MG_427_DIMER__c is "osmotically inducible peroxidase";
  species MG_231_MONOMER__c in c = 0; MG_231_MONOMER__c is "ribonucleoside-diphosphate reductase, alpha chain";
  species RNA_POLYMERASE__c in c = 40/c; RNA_POLYMERASE__c is "DNA-directed RNA polymerase";
  species MG_392_393_21MER__c in c = 13/c; MG_392_393_21MER__c is "GroEL-GroES chaperonin complex";
  species MG_070_MONOMER__c in c = 127/c; MG_070_MONOMER__c is "ribosomal protein S2";
  species MG_164_MONOMER__c in c = 97/c; MG_164_MONOMER__c is "ribosomal protein S14";
  species MG_290_MONOMER__c in c = 1/c; MG_290_MONOMER__c is "phosphonate ABC transporter, ATP-binding protein, putative";
  species MG_358_MONOMER__c in c = 35/c; MG_358_MONOMER__c is "Holliday junction DNA helicase";
  species MG_147_MONOMER__c in c = 5;
  species MG_404_MONOMER__c in c = 5;
  species MG_229_231_TETRAMER__c in c = 30/c; MG_229_231_TETRAMER__c is "ribonucleoside-diphosphate reductase";
  species MG_301_TETRAMER__c in c = 15/c; MG_301_TETRAMER__c is "glyceraldehyde-3-phosphate dehydrogenase, type I";
  species MG_0001__c in c = 0; MG_0001__c is "scRNA, signal recognition particle 4.5S RNA, MCS1";
  species MG_253_MONOMER__c in c = 16/c; MG_253_MONOMER__c is "cysteinyl-tRNA synthetase";
  species MG_075_MONOMER__m in m = 0;
  species MG_247_MONOMER__m in m = 0;
  species MG_307_MONOMER__m in m = 0;
  species AMP__c in c = 1449/c;
  species MG_355_MONOMER__c in c = 2/c; MG_355_MONOMER__c is "ATP-dependent Clp protease, ATPase subunit";
  species MG_469_MONOMER__c in c = 0; MG_469_MONOMER__c is "chromosomal replication initiator protein DnaA";
  species MG_396_DIMER__c in c = 27/c; MG_396_DIMER__c is "ribose 5-phosphate isomerase B";
  species MG_225_DIMER__m in m = 15/m; MG_225_DIMER__m is "amino acid transporter";
  species MG_163_MONOMER__c in c = 161/c; MG_163_MONOMER__c is "ribosomal protein L5";
  species MG490__c in c = 0;
  species MG502_aa__c in c = 75/c; MG502_aa__c is "MG502-AA";
  species MG_469_1MER_ATP__c in c = 25/c; MG_469_1MER_ATP__c is "DnaA-ATP";
  species MG484_aa__c in c = 61/c; MG484_aa__c is "MG484-AA";
  species MG_295_MONOMER__c in c = 39/c; MG_295_MONOMER__c is "tRNA U34 sulfurtransferase";
  species MG_252_DIMER__c in c = 9/c; MG_252_DIMER__c is "23S rRNA methyltransferase";
  species MG_515_MONOMER__m in m = 0;
  species MG_038_TETRAMER__c in c = 15/c; MG_038_TETRAMER__c is "glycerol kinase";
  species MG510__c in c = 0;
  species MG_049_HEXAMER__c in c = 21/c; MG_049_HEXAMER__c is "purine nucleoside phosphorylase";
  species MG479_aa__c in c = 25/c; MG479_aa__c is "MG479-AA";
  species MG_033_MONOMER__m in m = 0;
  species MG_128_HEXAMER__c in c = 9/c; MG_128_HEXAMER__c is "inorganic polyphosphate/ATP-NAD kinase, probable";
  species MG_063_DIMER__c in c = 20/c; MG_063_DIMER__c is "1-phosphofructokinase, putative";
  species MG_041_062_429_PENTAMER__m in m = 17/m; MG_041_062_429_PENTAMER__m is "PTS system, fructose-specific";
  species MG_260_MONOMER__c in c = 5;
  species MG_151_MONOMER__c in c = 146/c; MG_151_MONOMER__c is "ribosomal protein L3";
  species MG_123_DIMER__m in m = 11/m; MG_123_DIMER__m is "arginine deaminase";
  species MG523__c in c = 0;
  species MG_213_MONOMER__c in c = 0; MG_213_MONOMER__c is "segregation and condensation protein A";
  species MG_013_DIMER__c in c = 9/c; MG_013_DIMER__c is "methylenetetrahydrofolate dehydrogenase/methylenetetrahydrofolate cyclohydrolase";
  species MG_379_MONOMER__c in c = 0; MG_379_MONOMER__c is "tRNA uridine 5-carboxymethylaminomethyl modification enzyme GidA";
  species MG_433_DIMER__c in c = 122/c; MG_433_DIMER__c is "translation elongation factor Ts";
  species MG_007_MONOMER__c in c = 235/c; MG_007_MONOMER__c is "DNA polymerase III delta prime subunit, putative";
  species MG_095_MONOMER__c in c = 5;
  species MG_045_MONOMER__c in c = 5;
  species MG_078_MONOMER__c in c = 5;
  species MG_469_3MER_2ATP_ADP__c in c = 0; MG_469_3MER_2ATP_ADP__c is "DnaA 3mer-(2)ATP-(1)ADP";
  species MG_066_MONOMER__c in c = 0; MG_066_MONOMER__c is "transketolase";
  species MG_390_MONOMER__c in c = 5;
  species MG_001_MONOMER__c in c = 60/c; MG_001_MONOMER__c is "DNA polymerase III, beta subunit";
  species MG_311_MONOMER__c in c = 97/c; MG_311_MONOMER__c is "ribosomal protein S4";
  species MG_465_MONOMER__c in c = 11/c; MG_465_MONOMER__c is "ribonuclease P protein component";
  species MG_226_DIMER__m in m = 14/m; MG_226_DIMER__m is "amino acid transporter";
  species MG_275_MONOMER__m in m = 0;
  species MG_405_MONOMER__m in m = 0;
  species MG_043_MONOMER__m in m = 0;
  species MG_030_TRIMER__c in c = 15/c; MG_030_TRIMER__c is "uracil phosphoribosyltransferase";
  species MG_331_MONOMER__c in c = 5;
  species MG_005_MONOMER__c in c = 1/c; MG_005_MONOMER__c is "seryl-tRNA synthetase";
  species MG_392_MONOMER__c in c = 3/c; MG_392_MONOMER__c is "chaperonin";
  species DNA_POLYMERASE_CORE__c in c = 26/c; DNA_POLYMERASE_CORE__c is "DNA-directed DNA polymerase";
  species MG_032_MONOMER__c in c = 5;
  species MG_452_MONOMER__c in c = 5;
  species MG_357_MONOMER__c in c = 1/c; MG_357_MONOMER__c is "acetate kinase";
  species MG_165_MONOMER__c in c = 89/c; MG_165_MONOMER__c is "ribosomal protein S8";
  species MG_224_9MER_GTP__c in c = 20/c; MG_224_9MER_GTP__c is "cell division protein ftsZ activated 9mer";
  species MG_227_MONOMER__c in c = 0; MG_227_MONOMER__c is "thymidylate synthase";
  species MG_302_303_304_TETRAMER__m in m = 16/m; MG_302_303_304_TETRAMER__m is "metal ion (cobalt) ABC transporter";
  species MG_005_DIMER__c in c = 118/c; MG_005_DIMER__c is "seryl-tRNA synthetase";
  species MG_259_MONOMER__c in c = 2/c; MG_259_MONOMER__c is "modification methylase";
  species MG_064_065_TETRAMER__m in m = 16/m; MG_064_065_TETRAMER__m is "ABC transporter";
  species ATP__c in c = 100000;
  species MG_055_MONOMER__m in m = 0;
  species MG_015_MONOMER__m in m = 0;
  species MG_302_MONOMER__m in m = 0;
  species MG_439_MONOMER__c in c = 5;
  species MG_123_MONOMER__c in c = 5;
  species MG_137_MONOMER__c in c = 0; MG_137_MONOMER__c is "UDP-galactopyranose mutase";
  species MG_289_290_291_PENTAMER__m in m = 15/m; MG_289_290_291_PENTAMER__m is "phosphonate ABC transporter";
  species MG489__c in c = 0;
  species MG_376_MONOMER__c in c = 3/c;
  species MG_265_MONOMER__c in c = 1/c; MG_265_MONOMER__c is "sugar phosphatase";
  species MG_261_MONOMER__c in c = 0; MG_261_MONOMER__c is "DNA polymerase III, alpha subunit";
  species MG_365_MONOMER__c in c = 18/c; MG_365_MONOMER__c is "methionyl-tRNA formyltransferase";
  species MG_291_MONOMER__c in c = 5;
  species MG_022_MONOMER__c in c = 176/c; MG_022_MONOMER__c is "DNA-directed RNA polymerase, delta subunit";
  species MG_130_MONOMER__c in c = 5;
  species MG_044_MONOMER__c in c = 5;
  species MG_149_MONOMER__m in m = 0;
  species MG_406_MONOMER__c in c = 5;
  species MG508__c in c = 0;
  species MG_333_MONOMER__c in c = 1/c; MG_333_MONOMER__c is "FMN-dependent NADH-azoreductase, putative";
  species MG_266_MONOMER__c in c = 62/c; MG_266_MONOMER__c is "leucyl-tRNA synthetase";
  species MG_256_MONOMER__c in c = 5;
  species SER__c in c = 8749/c; SER__c is "L-Serine";
  species MG_039_MONOMER__c in c = 0; MG_039_MONOMER__c is "FAD-dependent glycerol-3-phosphate dehydrogenase, putative";
  species MG_469_1MER_ADP__c in c = 0; MG_469_1MER_ADP__c is "DnaA-ADP";
  species MG_040_119_120_121_PENTAMER__m in m = 44/m; MG_040_119_120_121_PENTAMER__m is "Monosaccharide (riboside/galactoside) ABC transporter";
  species MG_333_DIMER__c in c = 15/c; MG_333_DIMER__c is "FMN-dependent NADH-azoreductase, putative";
  species MG_088_MONOMER__c in c = 164/c; MG_088_MONOMER__c is "ribosomal protein S7";
  species MG_225_MONOMER__c in c = 5;
  species MG_469_5MER_4ATP_ADP__c in c = 0; MG_469_5MER_4ATP_ADP__c is "DnaA 5mer-(4)ATP-(1)ADP";
  species MG501__c in c = 0;
  species MG_440_MONOMER__m in m = 0;
  species MG_469_4MER_3ATP_ADP__c in c = 0; MG_469_4MER_3ATP_ADP__c is "DnaA 4mer-(3)ATP-(1)ADP";
  species MG_453_TETRAMER__c in c = 9/c; MG_453_TETRAMER__c is "UTP-glucose-1-phosphate uridylyltransferase";
  species MG_353_DIMER__c in c = 16/c; MG_353_DIMER__c is "DNA-binding protein HU, putative";
  species MG_451_MONOMER__c in c = 0; MG_451_MONOMER__c is "translation elongation factor Tu";
  species MG513_aa__c in c = 54/c; MG513_aa__c is "MG513-AA";
  species DNA_POLYMERASE_CORE_BETA_CLAMP_PRIMASE__c in c = 0; DNA_POLYMERASE_CORE_BETA_CLAMP_PRIMASE__c is "DNA polymerase core, beta-clamp, and primase";
  species MG_069_MONOMER__c in c = 5;
  species MG_188_MONOMER__c in c = 5;
  species MG_0001_048__c in c = 29/c; MG_0001_048__c is "signal recognition particle";
  species MG_464_MONOMER__m in m = 0;
  species MG_176_MONOMER__c in c = 113/c;
  species MG_089_DIMER__c in c = 133/c; MG_089_DIMER__c is "translation elongation factor G";
  species MG_276_DIMER__c in c = 24/c; MG_276_DIMER__c is "adenine phosphoribosyltransferase";
  species MG_382_MONOMER__c in c = 2/c; MG_382_MONOMER__c is "uridine kinase";
  species MG_242_MONOMER__m in m = 0;
  species MG_205_DIMER__c in c = 23/c; MG_205_DIMER__c is "heat-inducible transcription repressor HrcA, putative";
  species MG_113_MONOMER__c in c = 0; MG_113_MONOMER__c is "asparaginyl-tRNA synthetase";
  species MG_351_MONOMER__c in c = 4/c; MG_351_MONOMER__c is "inorganic pyrophosphatase";
  species MG_315_MONOMER__c in c = 4/c; MG_315_MONOMER__c is "DNA polymerase III, delta subunit, putative";
  species MG_352_MONOMER__c in c = 0; MG_352_MONOMER__c is "Holliday junction endonuclease";
  species MG_213_214_298_6MER_ADP__c in c = 81/c; MG_213_214_298_6MER_ADP__c is "Chromosome Segregation Protein SMC with SCP Proteins-ADP";
  species MG_431_MONOMER__c in c = 1/c; MG_431_MONOMER__c is "triosephosphate isomerase";
  species MG_363_MONOMER__c in c = 118/c; MG_363_MONOMER__c is "ribosomal protein L32";
  species MG512__c in c = 0;
  species MG_522_MONOMER__c in c = 99/c; MG_522_MONOMER__c is "ribosomal protein S20";
  species MG_130_MONOMER__m in m = 0;
  species MG_169_MONOMER__c in c = 121/c; MG_169_MONOMER__c is "ribosomal protein L15";
  species MG483__c in c = 0;
  species MG_144_MONOMER__c in c = 5;
  species MG_213_214_298_6MER__c in c = 5/c; MG_213_214_298_6MER__c is "chromosome segregation protein SMC";
  species MG_316_MONOMER__m in m = 0;
  species MG486_aa__c in c = 46/c; MG486_aa__c is "MG486-AA";
  species MG_349_HEXAMER__c in c = 13/c; MG_349_HEXAMER__c is "Replication initiation/membrane attachment protein";
  species MG503_aa__c in c = 46/c; MG503_aa__c is "MG503-AA";
  species MG_421_MONOMER__c in c = 20/c; MG_421_MONOMER__c is "excinuclease ABC, A subunit";
  species MG_003_MONOMER__c in c = 20/c; MG_003_MONOMER__c is "DNA gyrase, B subunit";
  species MG_008_379_TETRAMER__c in c = 18/c; MG_008_379_TETRAMER__c is "tRNA uridine 5-carboxymethylaminomethyl modification enzyme";
  species MG_306_MONOMER__m in m = 0;
  species MG_092_MONOMER__c in c = 119/c; MG_092_MONOMER__c is "ribosomal protein S18";
  species MG_410_MONOMER__c in c = 0; MG_410_MONOMER__c is "phosphate ABC transporter, ATP-binding protein";
  species HIS__c in c = 2933/c; HIS__c is "L-Histidine";
  species MG_040_MONOMER__c in c = 5;
  species MG_468_MONOMER__m in m = 0;
  species MG_225_MONOMER__m in m = 0;
  species MG_214_MONOMER__c in c = 4/c; MG_214_MONOMER__c is "segregation and condensation protein B";
  species MG_277_MONOMER__m in m = 0;
  species MG511__c in c = 0;
  species VAL__c in c = 9500/c; VAL__c is "L-Valine";
  species MG_398_399_400_401_402_403_404_405_22MER__m in m = 11/m; MG_398_399_400_401_402_403_404_405_22MER__m is "H(+)-transporting two-sector ATPase";
  species MGrrnA23S__c in c = 0; MGrrnA23S__c is "23S ribosomal rRNA";
  species MG_242_MONOMER__c in c = 5;
  species MG_081_MONOMER__c in c = 128/c; MG_081_MONOMER__c is "ribosomal protein L11";
  species MG_313_MONOMER__c in c = 5;
  species MG_275_MONOMER__c in c = 5;
  species MG_201_DIMER__c in c = 11/c; MG_201_DIMER__c is "co-chaperone GrpE";
  species MG_469_6MER_5ATP_ADP__c in c = 0; MG_469_6MER_5ATP_ADP__c is "DnaA 6mer-(5)ATP-(1)ADP";
  species MG_072_MONOMER__c in c = 0; MG_072_MONOMER__c is "preprotein translocase, SecA subunit";
  species MG_390_DIMER__m in m = 16/m; MG_390_DIMER__m is "toxin ABC transporter, ATP-binding/permease protein";
  species MG_160_MONOMER__c in c = 130/c; MG_160_MONOMER__c is "ribosomal protein S17";
  species MG_278_DIMER__c in c = 16/c; MG_278_DIMER__c is "GTP pyrophosphokinase";
  species MG_275_TETRAMER__m in m = 242/m; MG_275_TETRAMER__m is "NADH oxidase";
  species MG_369_MONOMER__c in c = 0; MG_369_MONOMER__c is "DAK2 phosphatase domain protein";
  species CYS__c in c = 2181/c; CYS__c is "L-Cysteine";
  species MG_023_DIMER__c in c = 127/c; MG_023_DIMER__c is "fructose-1,6-bisphosphate aldolase, class II";
  species MG_111_DIMER__c in c = 18/c; MG_111_DIMER__c is "glucose-6-phosphate isomerase";
  species MG_458_MONOMER__c in c = 2/c; MG_458_MONOMER__c is "hypoxanthine phosphoribosyltransferase";
  species MG_351_HEXAMER__c in c = 11/c; MG_351_HEXAMER__c is "inorganic pyrophosphatase";
  species MG_469_3MER_ATP__c in c = 0; MG_469_3MER_ATP__c is "DnaA-ATP 3mer";
  species GLY__c in c = 7679/c; GLY__c is "glycine";
  species MG_334_MONOMER__c in c = 34/c; MG_334_MONOMER__c is "valyl-tRNA synthetase";
  species DNA_POLYMERASE_GAMMA_COMPLEX__c in c = 14/c; DNA_POLYMERASE_GAMMA_COMPLEX__c is "DNA-directed DNA polymerase gamma complex";
  species MG_407_DIMER__c in c = 34/c; MG_407_DIMER__c is "enolase";
  species MG_454_MONOMER__c in c = 0; MG_454_MONOMER__c is "thiol-dependent peroxidase";
  species MG_316_DIMER__m in m = 21/m; MG_316_DIMER__m is "DNA internalization-related competence protein ComEC/Rec2";
  species MG_348_MONOMER__c in c = 5;
  species MG_526_MONOMER__c in c = 6/c; MG_526_MONOMER__c is "salivaricin A ABC transporter, ATP-binding protein";
  species MG_361_MONOMER__c in c = 107/c; MG_361_MONOMER__c is "ribosomal protein L10";
  species MG_402_MONOMER__c in c = 77/c; MG_402_MONOMER__c is "ATP synthase F1, delta subunit";
  species MG_074_MONOMER__c in c = 5;
  species MG475__c in c = 0;
  species GLN__c in c = 7920/c; GLN__c is "L-glutamine";
  species MG_271_272_273_274_192MER_ox__c in c = 0; MG_271_272_273_274_192MER_ox__c is "oxidized dihydrolipoamide dehydrogenase";
  species MG_107_MONOMER__c in c = 1/c; MG_107_MONOMER__c is "guanylate kinase";
  species MG_454_DIMER__c in c = 29/c; MG_454_DIMER__c is "thiol-dependent peroxidase";
  species MG_314_MONOMER__c in c = 5;
  species MG_524_MONOMER__m in m = 0;
  species MG_077_MONOMER__m in m = 0;
  species TYR__c in c = 5375/c; TYR__c is "L-tyrosine";
  species MG_118_MONOMER__c in c = 1/c; MG_118_MONOMER__c is "UDP-glucose 4-epimerase";
  species MG_359_MONOMER__c in c = 4/c; MG_359_MONOMER__c is "Holliday junction DNA helicase RuvB";
  species MG_325_MONOMER__c in c = 132/c; MG_325_MONOMER__c is "ribosomal protein L33";
  species MG_166_MONOMER__c in c = 122/c; MG_166_MONOMER__c is "ribosomal protein L6";
  species MG_474_MONOMER__c in c = 5;
  species MG500__c in c = 0;
  species FMET__c in c = 0; FMET__c is "N-Formyl-L-methionine";
  species MG_148_MONOMER__c in c = 5;
  species MG_401_MONOMER__c in c = 16/c; MG_401_MONOMER__c is "ATP synthase F1, alpha subunit";
  species MG_157_MONOMER__c in c = 128/c; MG_157_MONOMER__c is "ribosomal protein S3";
  species MG_434_HEXAMER__c in c = 14/c; MG_434_HEXAMER__c is "uridylate kinase";
  species MG_322_MONOMER__c in c = 5;
  species MG_372_DIMER__c in c = 108/c; MG_372_DIMER__c is "thiamine biosynthesis/tRNA modification protein ThiI";
  species MG_457_MONOMER__m in m = 0;
  species MG_034_DIMER__c in c = 23/c; MG_034_DIMER__c is "thymidine kinase";
  species MG_146_MONOMER__e in e = 0;
  species MG496__c in c = 0;
  species MG_091_TETRAMER__c in c = 65/c; MG_091_TETRAMER__c is "single-strand binding protein family, tetramer";
  species MG_047_MONOMER__c in c = 1/c; MG_047_MONOMER__c is "S-adenosylmethionine synthetase";
  species MG501_aa__c in c = 36/c; MG501_aa__c is "MG501-AA";
  species MG_482_MONOMER__c in c = 0; MG_482_MONOMER__c is "holo-(acyl-carrier-protein) synthase";
  species MG_112_MONOMER__c in c = 0; MG_112_MONOMER__c is "ribulose-phosphate 3-epimerase";
  species MG_347_MONOMER__c in c = 1/c; MG_347_MONOMER__c is "tRNA (guanine-N(7)-)-methyltransferase";
  species MG_427_DIMER_ox__c in c = 0; MG_427_DIMER_ox__c is "oxidized osmotically inducible peroxidase";
  species MG_204_MONOMER__c in c = 2/c; MG_204_MONOMER__c is "DNA topoisomerase IV, A subunit";
  species MG_338_MONOMER__c in c = 5;
  species MG_346_DIMER__c in c = 13/c; MG_346_DIMER__c is "23S rRNA methyltransferase";
  species MG509__c in c = 0;
  species MG_280_MONOMER__m in m = 0;
  species ASN__c in c = 11161/c; ASN__c is "L-Asparagine";
  species MG_195_MONOMER__c in c = 8/c; MG_195_MONOMER__c is "phenylalanyl-tRNA synthetase, beta subunit";
  species MG_091_OCTAMER__c in c = 0; MG_091_OCTAMER__c is "single-strand binding protein family, octamer";
  species MG_425_MONOMER__c in c = 0; MG_425_MONOMER__c is "ATP-dependent RNA helicase";
  species MG_281_MONOMER__c in c = 5;
  species MG503__c in c = 0;
  species MG_469_6MER_ATP__c in c = 0; MG_469_6MER_ATP__c is "DnaA-ATP 6mer";
  species MG_048_MONOMER__c in c = 6/c; MG_048_MONOMER__c is "signal recognition particle protein";
  species MG_228_TETRAMER__c in c = 15/c; MG_228_TETRAMER__c is "dihydrofolate reductase";
  species MG_397_MONOMER__e in e = 0;
  species MG_249_MONOMER__c in c = 13/c; MG_249_MONOMER__c is "RNA polymerase sigma factor RpoD";
  species MG_069_MONOMER__m in m = 0;
  species MG_239_HEXAMER__c in c = 14/c; MG_239_HEXAMER__c is "ATP-dependent protease La";
  species MG_383_DIMER__c in c = 16/c; MG_383_DIMER__c is "NH(3)-dependent NAD+ synthetase, putative";
  species MG_052_DIMER__c in c = 32/c; MG_052_DIMER__c is "cytidine deaminase";
  species MG_052_MONOMER__c in c = 1/c; MG_052_MONOMER__c is "cytidine deaminase";
  species MG_443_MONOMER__c in c = 5;
  species THF__c in c = 2895/c; THF__c is "5,6,7,8-Tetrahydrofolate";
  species MG_395_MONOMER__c in c = 5;
  species MG_389_MONOMER__e in e = 0;
  species MG_244_MONOMER__c in c = 1/c; MG_244_MONOMER__c is "3-5' helicase";
  species MG_058_MONOMER__c in c = 5/c; MG_058_MONOMER__c is "ribose-phosphate pyrophosphokinase";
  species MG502__c in c = 0;
  species MG509_aa__c in c = 56/c; MG509_aa__c is "MG509-AA";
  species MG_032_MONOMER__e in e = 0;
  species MG_393_MONOMER__c in c = 97/c; MG_393_MONOMER__c is "chaperonin, 10 kDa";
  species MG_418_MONOMER__c in c = 114/c; MG_418_MONOMER__c is "ribosomal protein L13";
  species MG_185_MONOMER__c in c = 5;
  species MG_439_MONOMER__m in m = 0;
  species MG_029_DIMER__c in c = 21/c; MG_029_DIMER__c is "DJ-1/PfpI family protein";
  species DNA_POLYMERASE_2CORE_BETA_CLAMP_GAMMA_COMPLEX_PRIMASE__c in c = 0; DNA_POLYMERASE_2CORE_BETA_CLAMP_GAMMA_COMPLEX_PRIMASE__c is "DNA polymerase (2) core, XX-clamp, XX-complex, and primase";
  species ILE__c in c = 14247/c; ILE__c is "L-Isoleucine";
  species MG_191_MONOMER__m in m = 0;
  species MG_267_MONOMER__c in c = 5;
  species MG_434_MONOMER__c in c = 3/c; MG_434_MONOMER__c is "uridylate kinase";
  species MG_414_MONOMER__e in e = 0;
  species MG_321_MONOMER__c in c = 5;
  species MG_185_MONOMER__m in m = 0;
  species MG_128_MONOMER__c in c = 3/c; MG_128_MONOMER__c is "inorganic polyphosphate/ATP-NAD kinase, probable";
  species MG_259_TETRAMER__c in c = 48/c; MG_259_TETRAMER__c is "modification methylase";
  species MG_391_MONOMER__c in c = 4/c; MG_391_MONOMER__c is "cytosol aminopeptidase";
  species MG_457_HEXAMER__m in m = 70/m; MG_457_HEXAMER__m is "ATP-dependent metalloprotease FtsH";
  species MG_394_MONOMER__c in c = 3/c; MG_394_MONOMER__c is "serine hydroxymethyltransferase";
  species PI__c in c = 0;
  species MG_364_MONOMER__m in m = 0;
  species MG_226_MONOMER__c in c = 5;
  species MG492__c in c = 0;
  species MG_319_MONOMER__m in m = 0;
  species MG_474_MONOMER__m in m = 0;
  species MG_091_MONOMER__c in c = 0; MG_091_MONOMER__c is "single-strand binding protein family";
  species MG_265_DIMER__c in c = 40/c; MG_265_DIMER__c is "sugar phosphatase";
  species MG_303_MONOMER__c in c = 38/c; MG_303_MONOMER__c is "metal ion (cobalt) ABC transporter, ATP-binding protein, putative";
  species MGrrnA16S__c in c = 0; MGrrnA16S__c is "16S ribosomal rRNA";
  species MG_042_043_044_045_PENTAMER__m in m = 18/m; MG_042_043_044_045_PENTAMER__m is "spermidine/putrescine (polyamine) ABC transporter";
  species MG_076_MONOMER__c in c = 5;
  species MG493__c in c = 0;
  species MG_189_MONOMER__c in c = 5;
  species MG_279_MONOMER__m in m = 0;
  species MG_181_MONOMER__c in c = 5;
  species MG_076_MONOMER__m in m = 0;
  species MG_080_MONOMER__c in c = 22/c; MG_080_MONOMER__c is "oligopeptide ABC transporter, ATP-binding protein";
  species MG_051_DIMER__c in c = 59/c; MG_051_DIMER__c is "pyrimidine-nucleoside phosphorylase";
  species MG_390_MONOMER__m in m = 0;
  species MG_437_MONOMER__m in m = 0;
  species MG_340_MONOMER__c in c = 11/c; MG_340_MONOMER__c is "DNA-directed RNA polymerase, beta subunit";
  species MG_208_MONOMER__c in c = 0; MG_208_MONOMER__c is "glycoprotease";
  species MG_428_MONOMER__c in c = 1/c; MG_428_MONOMER__c is "LuxR bacterial regulatory protein, putative";
  species MG_336_MONOMER__c in c = 0; MG_336_MONOMER__c is "cysteine desulfurase";
  species MG_006_MONOMER__c in c = 1/c; MG_006_MONOMER__c is "thymidylate kinase";
  species MG_353_MONOMER__c in c = 1/c; MG_353_MONOMER__c is "DNA-binding protein HU, putative";
  species MG_114_MONOMER__m in m = 0;
  species MG_241_MONOMER__c in c = 5;
  species MG506__c in c = 0;
  species MG_216_TETRAMER__c in c = 19/c; MG_216_TETRAMER__c is "pyruvate kinase";
  species MG_224_2MER_GTP__c in c = 1/c; MG_224_2MER_GTP__c is "cell division protein ftsZ activated 2mer";
  species MG499_aa__c in c = 42/c; MG499_aa__c is "MG499-AA";
  species MG_109_DIMER__m in m = 34/m; MG_109_DIMER__m is "serine/threonine protein kinase, putative";
  species MG_478_MONOMER__m in m = 0;
  species MG_240_MONOMER__c in c = 3/c; MG_240_MONOMER__c is "nicotinamide-nucleotide adenylyltransferase/conserved hypothetical protein";
  species MG_224_MONOMER_GDP__c in c = 3/c; MG_224_MONOMER_GDP__c is "cell division protein ftsZ hydrolysed";
  species MG_192_MONOMER__c in c = 5;
  species MG_424_MONOMER__c in c = 119/c; MG_424_MONOMER__c is "ribosomal protein S15";
  species MG_227_DIMER__c in c = 22/c; MG_227_DIMER__c is "thymidylate synthase";
  species MG_367_MONOMER__c in c = 0; MG_367_MONOMER__c is "ribonuclease III";
  species MG472__c in c = 0;
  species MG_082_MONOMER__c in c = 128/c; MG_082_MONOMER__c is "ribosomal protein L1";
  species MG_144_MONOMER__m in m = 0;
  species MG_047_TETRAMER__c in c = 13/c; MG_047_TETRAMER__c is "S-adenosylmethionine synthetase";
  species MG_287_MONOMER_ddcaACP__c in c = 0; MG_287_MONOMER_ddcaACP__c is "Dodecanoyl-ACP (n-C12:0ACP)";
  species MG_029_MONOMER__c in c = 0; MG_029_MONOMER__c is "DJ-1/PfpI family protein";
  species MG_049_MONOMER__c in c = 4/c; MG_049_MONOMER__c is "purine nucleoside phosphorylase";
  species MG_036_MONOMER__c in c = 0; MG_036_MONOMER__c is "aspartyl-tRNA synthetase";
  species MG518__c in c = 0;
  species MG_372_MONOMER__c in c = 1/c; MG_372_MONOMER__c is "thiamine biosynthesis/tRNA modification protein ThiI";
  species MG_267_MONOMER__m in m = 0;
  species MG_400_MONOMER__c in c = 31/c; MG_400_MONOMER__c is "ATP synthase F1, gamma subunit";
  species MG_443_MONOMER__m in m = 0;
  species MG_399_MONOMER__c in c = 0; MG_399_MONOMER__c is "ATP synthase F1, beta subunit";
  species MG_079_MONOMER__c in c = 19/c; MG_079_MONOMER__c is "oligopeptide ABC transporter, ATP-binding protein";
  species MG_349_MONOMER__c in c = 1/c; MG_349_MONOMER__c is "Replication initiation/membrane attachment protein";
  species MG_077_078_079_080_321_PENTAMER__m in m = 7/m; MG_077_078_079_080_321_PENTAMER__m is "oligopeptide ABC transporter";
  species MG_382_TETRAMER__c in c = 10/c; MG_382_TETRAMER__c is "uridine kinase";
  species DNA_POLYMERASE_CORE_BETA_CLAMP_GAMMA_COMPLEX__c in c = 0; DNA_POLYMERASE_CORE_BETA_CLAMP_GAMMA_COMPLEX__c is "DNA polymerase core, beta-clamp, and gamma-complex";
  species H2O__c in c = 1e15;
  species MG488_aa__c in c = 11/c; MG488_aa__c is "MG488-AA";
  species MG_021_DIMER__c in c = 20/c; MG_021_DIMER__c is "methionyl-tRNA synthetase";
  species MG_521_MONOMER__c in c = 5;
  species MG_102_DIMER__c in c = 22/c; MG_102_DIMER__c is "thioredoxin-disulfide reductase";
  species MG_197_MONOMER__c in c = 146/c; MG_197_MONOMER__c is "ribosomal protein L35";
  species MG_226_MONOMER__m in m = 0;
  species MG_469_5MER_ATP__c in c = 0; MG_469_5MER_ATP__c is "DnaA-ATP 5mer";
  species MG_310_MONOMER__e in e = 0;
  species MG_252_MONOMER__c in c = 0; MG_252_MONOMER__c is "23S rRNA methyltransferase; G2251";
  species MG_149_MONOMER__c in c = 5;
  species MG_093_MONOMER__c in c = 163/c; MG_093_MONOMER__c is "ribosomal protein L9";
  species MG_338_MONOMER__m in m = 0;
  species MG_467_468_526_TETRAMER__m in m = 26/m; MG_467_468_526_TETRAMER__m is "salivaricin A ABC transporter";
  species MG_210_MONOMER__m in m = 0;
  species MG_006_DIMER__c in c = 134/c; MG_006_DIMER__c is "thymidylate kinase";
  species MG_298_MONOMER__c in c = 7/c; MG_298_MONOMER__c is "chromosome segregation protein SMC";
  species MG_256_MONOMER__m in m = 0;
  species MG_147_MONOMER__m in m = 0;
  species MG_260_MONOMER__m in m = 0;
  species MG_524_MONOMER__c in c = 5;
  species LYS__c in c = 15094/c; LYS__c is "L-Lysine";
  species MG_139_DIMER__c in c = 10/c; MG_139_DIMER__c is "ribonuclease J";
  species MG_469_7MER_ATP__c in c = 4/c; MG_469_7MER_ATP__c is "DnaA-ATP 7mer";
  species MG_135_MONOMER__m in m = 0;
  species MG500_aa__c in c = 60/c; MG500_aa__c is "MG500-AA";
  species MG_133_MONOMER__m in m = 0;
  species MG_051_MONOMER__c in c = 1/c; MG_051_MONOMER__c is "pyrimidine-nucleoside phosphorylase";
  species MG_061_MONOMER__c in c = 5;
  species MG_355_HEXAMER__c in c = 13/c; MG_355_HEXAMER__c is "ATP-dependent Clp protease, ATPase subunit";
  species MG489_aa__c in c = 84/c; MG489_aa__c is "MG489-AA";
  species MG_432_MONOMER__c in c = 5;
  species DNA_POLYMERASE_HOLOENZYME__c in c = 0; DNA_POLYMERASE_HOLOENZYME__c is "DNA-directed DNA polymerase holoenzyme";
  species MG499__c in c = 0;
  species MG_397_MONOMER__c in c = 5;
  species MG497_aa__c in c = 9/c; MG497_aa__c is "MG497-AA";
  species ASP__c in c = 9407/c; ASP__c is "L-Aspartate";
  species MG_109_MONOMER__m in m = 0;
  species MG_352_DIMER__c in c = 18/c; MG_352_DIMER__c is "Holliday junction endonuclease";
  species MG_455_DIMER__c in c = 95/c; MG_455_DIMER__c is "tyrosyl-tRNA synthetase";
  species MG_072_DIMER__c in c = 5000;
  species MG_444_MONOMER__c in c = 140/c; MG_444_MONOMER__c is "ribosomal protein L19";
  species MG_467_MONOMER__c in c = 13/c; MG_467_MONOMER__c is "salivaricin A ABC transporter, ATP-binding protein";
  species MG_301_MONOMER__c in c = 2/c; MG_301_MONOMER__c is "glyceraldehyde-3-phosphate dehydrogenase, type I";
  species MG_194_MONOMER__c in c = 0; MG_194_MONOMER__c is "phenylalanyl-tRNA synthetase, alpha subunit";
  species MG_234_MONOMER__c in c = 127/c; MG_234_MONOMER__c is "ribosomal protein L27";
  species MG_137_DIMER__c in c = 25/c; MG_137_DIMER__c is "UDP-galactopyranose mutase";
  species MG_309_MONOMER__c in c = 5;
  species MG_075_MONOMER__c in c = 5;
  species MG_129_MONOMER__c in c = 5;
  species MG_178_MONOMER__c in c = 149/c; MG_178_MONOMER__c is "ribosomal protein L17";
  species MG_446_MONOMER__c in c = 109/c; MG_446_MONOMER__c is "ribosomal protein S16";
  species MG_215_TETRAMER__c in c = 18/c; MG_215_TETRAMER__c is "6-phosphofructokinase";
  species MG_425_DIMER__c in c = 9/c; MG_425_DIMER__c is "ATP-dependent RNA helicase";
  species MG_309_MONOMER__m in m = 0;
  species MG_180_MONOMER__c in c = 25/c; MG_180_MONOMER__c is "metal ion (cobalt) ABC transporter, ATP-binding protein, putative";
  species MG_304_MONOMER__c in c = 5/c; MG_304_MONOMER__c is "metal ion (cobalt) ABC transporter, ATP-binding protein, putative";
  species MG_286_MONOMER__e in e = 0;
  species MG_244_DIMER__c in c = 8/c; MG_244_DIMER__c is "3-5' helicase";
  species MG_243_MONOMER__c in c = 5;
  species MG_067_MONOMER__m in m = 0;
  species MG_347_DIMER__c in c = 11/c; MG_347_DIMER__c is "tRNA (guanine-N(7)-)-methyltransferase";
  species MG_437_MONOMER__c in c = 5;
  species MG_186_MONOMER__c in c = 5;
  species MG_154_MONOMER__c in c = 159/c; MG_154_MONOMER__c is "ribosomal protein L2";
  species MG_123_MONOMER__m in m = 0;
  species MG_466_MONOMER__c in c = 134/c; MG_466_MONOMER__c is "ribosomal protein L34";
  species MG_121_MONOMER__c in c = 5;
  species MG_247_MONOMER__c in c = 5;
  species MG_409_MONOMER__c in c = 0; MG_409_MONOMER__c is "phosphate transport system regulatory protein PhoU, putative";
  species MG_170_MONOMER__c in c = 5;
  species MG518_aa__c in c = 19/c; MG518_aa__c is "MG518-AA";
  species MG_040_MONOMER__e in e = 0;
  species MG_148_MONOMER__m in m = 0;
  species MG_369_DIMER__c in c = 14/c; MG_369_DIMER__c is "DAK2 phosphatase domain protein";
  species MG_179_MONOMER__c in c = 8/c; MG_179_MONOMER__c is "metal ion (cobalt) ABC transporter, ATP-binding protein, putative";
  species MG_357_DIMER__c in c = 54/c; MG_357_DIMER__c is "acetate kinase";
  species MG_287_MONOMER_tdeACP__c in c = 0; MG_287_MONOMER_tdeACP__c is "cis-tetradec-7-enoyl-[acyl-carrier protein] (n-C14:1)";
  species MG_030_MONOMER__c in c = 0; MG_030_MONOMER__c is "uracil phosphoribosyltransferase";
  species MG_041_069_429_PENTAMER__m in m = 8/m; MG_041_069_429_PENTAMER__m is "PTS system, glucose-specific";
  species MG_074_MONOMER__e in e = 0;
  species MG_411_MONOMER__c in c = 5;
  species MG_276_MONOMER__c in c = 0; MG_276_MONOMER__c is "adenine phosphoribosyltransferase";
  species MG_174_MONOMER__c in c = 168/c; MG_174_MONOMER__c is "ribosomal protein L36";
  species MG_316_MONOMER__c in c = 5;
  species MG_187_MONOMER__c in c = 0; MG_187_MONOMER__c is "Oligosaccharide or polyol ABC transporter, ATP-binding protein";
  species MG_129_MONOMER__e in e = 0;
  species MG_014_015_DIMER__m in m = 21/m; MG_014_015_DIMER__m is "multidrug ABC transporter";
  species MG_294_MONOMER__m in m = 0;
  species PRO__c in c = 4140/c; PRO__c is "L-Proline";
  species MG_515_MONOMER__c in c = 5;
  species ARG__c in c = 5991/c; ARG__c is "L-Arginine";
  species MG_127_MONOMER_ox__c in c = 0; MG_127_MONOMER_ox__c is "oxidized Spx subfamily protein";
  species MG_201_MONOMER__c in c = 0; MG_201_MONOMER__c is "co-chaperone GrpE";
  species MG_135_MONOMER__c in c = 5;
  species MG_404_MONOMER__m in m = 0;
  species MG_398_MONOMER__c in c = 2/c; MG_398_MONOMER__c is "ATP synthase F1, epsilon subunit";
  species MG_124_MONOMER_ox__c in c = 0; MG_124_MONOMER_ox__c is "oxidized thioredoxin";
  species MG_224_4MER_GTP__c in c = 2/c; MG_224_4MER_GTP__c is "cell division protein ftsZ activated 4mer";
  species MG_113_DIMER__c in c = 18/c; MG_113_DIMER__c is "asparaginyl-tRNA synthetase";
  species MG_156_MONOMER__c in c = 145/c; MG_156_MONOMER__c is "ribosomal protein L22";
  species MG_109_MONOMER__c in c = 5;
  species MG_194_195_TETRAMER__c in c = 27/c; MG_194_195_TETRAMER__c is "phenylalanyl-tRNA synthetase";
  species MG_287_MONOMER_myrsACP__c in c = 0; MG_287_MONOMER_myrsACP__c is "Myristoyl-ACP (n-C14:0ACP)";
  species MG_064_MONOMER__c in c = 5;
  species MG_105_OCTAMER__c in c = 11/c; MG_105_OCTAMER__c is "putative DNA integrity scanning protein";
  species MG_314_MONOMER__m in m = 0;
  species MG_403_MONOMER__m in m = 0;
  species MG_273_MONOMER__c in c = 34/c; MG_273_MONOMER__c is "pyruvate dehydrogenase component E1, beta subunit";
  species MG_283_MONOMER__c in c = 1/c; MG_283_MONOMER__c is "prolyl-tRNA synthetase";
  species MG_391_HEXAMER__c in c = 35/c; MG_391_HEXAMER__c is "cytosol aminopeptidase";
  species MG_161_MONOMER__c in c = 168/c; MG_161_MONOMER__c is "ribosomal protein L14";
  species TRP__c in c = 1084/c; TRP__c is "L-tryptophan";
  species MG_186_MONOMER__e in e = 0;
  species MG_035_DIMER__c in c = 19/c; MG_035_DIMER__c is "histidyl-tRNA synthetase";
  species MG_120_MONOMER__m in m = 0;
  species THR__c in c = 4460/c; THR__c is "L-Threonine";
  species MG523_aa__c in c = 14/c; MG523_aa__c is "MG523-AA";
  species MG_287_MONOMER_ACP__c in c = 0; MG_287_MONOMER_ACP__c is "holo acyl carrier protein";
  species MG_055_170_277_464_476_20MER__m in m = 5000;
  species MG495_aa__c in c = 8/c; MG495_aa__c is "MG495-AA";
  species MG483_aa__c in c = 10/c; MG483_aa__c is "MG483-AA";
  species RIBOSOME_70S__c in c = 56/c; RIBOSOME_70S__c is "70S ribosome";
  species MG_469_4MER_ATP__c in c = 0; MG_469_4MER_ATP__c is "DnaA-ATP 4mer";
  species MG_469_2MER_ATP__c in c = 0; MG_469_2MER_ATP__c is "DnaA-ATP 2mer";
  species MG_456_MONOMER__c in c = 5;
  species MG_320_MONOMER__c in c = 5;
  species MG_346_MONOMER__c in c = 1/c; MG_346_MONOMER__c is "23S rRNA methyltransferase; U2552";
  species MG_086_MONOMER__m in m = 0;
  species MG_044_MONOMER__m in m = 0;
  species MG_098_MONOMER__c in c = 13/c; MG_098_MONOMER__c is "glutamyl-tRNA(Gln) and/or aspartyl-tRNA(Asn) amidotransferase, C subunit";
  species MG_064_MONOMER__m in m = 0;
  species MG_062_MONOMER__c in c = 5;
  species MG_008_MONOMER__c in c = 215/c; MG_008_MONOMER__c is "tRNA modification GTPase TrmE";
  species MG_299_MONOMER__c in c = 0; MG_299_MONOMER__c is "phosphate acetyltransferase";
  species MG_013_MONOMER__c in c = 0; MG_013_MONOMER__c is "methylenetetrahydrofolate dehydrogenase/methylenetetrahydrofolate cyclohydrolase";
  species MG_327_MONOMER__e in e = 0;
  species MG_179_180_181_TETRAMER__m in m = 14/m; MG_179_180_181_TETRAMER__m is "metal ion (cobalt) ABC transporter";
  species MG_287_MONOMER_hdeACP__c in c = 0; MG_287_MONOMER_hdeACP__c is "cis-hexadec-9-enoyl-[acyl-carrier protein] (n-C16:1)";
  species MG_120_MONOMER__c in c = 5;
  species MG_224_9MER_GDP__c in c = 0; MG_224_9MER_GDP__c is "cell division protein ftsZ deactivated 9mer";
  species MG_341_MONOMER__c in c = 0; MG_341_MONOMER__c is "DNA-directed RNA polymerase, beta subunit";
  species MG513__c in c = 0;
  species MG_121_MONOMER__m in m = 0;
  species MG_106_DIMER__c in c = 22/c; MG_106_DIMER__c is "peptide deformylase";
  species MG_055_MONOMER__c in c = 5;
  species MG_038_MONOMER__c in c = 3/c; MG_038_MONOMER__c is "glycerol kinase";
  species MG_409_DIMER__c in c = 16/c; MG_409_DIMER__c is "phosphate transport system regulatory protein PhoU, putative";
  species MG_152_MONOMER__c in c = 147/c; MG_152_MONOMER__c is "ribosomal protein L4/L1 family";
  species MG_034_MONOMER__c in c = 1/c; MG_034_MONOMER__c is "thymidine kinase";
  species MG_385_MONOMER__c in c = 0; MG_385_MONOMER__c is "glycerophosphoryl diester phosphodiesterase family protein";
  species MG_087_MONOMER__c in c = 209/c; MG_087_MONOMER__c is "ribosomal protein S12";
  species MG_058_HEXAMER__c in c = 8/c; MG_058_HEXAMER__c is "ribose-phosphate pyrophosphokinase";
  species MG_085_MONOMER__c in c = 2/c; MG_085_MONOMER__c is "HPr(Ser) kinase/phosphatase";
  species MG_224_7MER_GTP__c in c = 8/c; MG_224_7MER_GTP__c is "cell division protein ftsZ activated 7mer";
  species MG_196_MONOMER__c in c = 206/c; MG_196_MONOMER__c is "translation initiation factor IF-3";
  species MG_289_MONOMER__e in e = 0;
  species MG_100_MONOMER__c in c = 0; MG_100_MONOMER__c is "glutamyl-tRNA(Gln) and/or aspartyl-tRNA(Asn) amidotransferase, B subunit";
  species MG_396_MONOMER__c in c = 0; MG_396_MONOMER__c is "ribose 5-phosphate isomerase B";
  species MG504_aa__c in c = 10/c; MG504_aa__c is "MG504-AA";
  species ALA__c in c = 8303/c; ALA__c is "L-alanine";
  species MG_071_MONOMER__c in c = 5;
  species MG520__c in c = 0;
  species RIBOSOME_30S_IF3__c in c = 0; RIBOSOME_30S_IF3__c is "30S ribosomal subunit - translation initiation factor IF-3 complex";
  species MG_221_MONOMER__c in c = 6/c; MG_221_MONOMER__c is "mraZ protein";
  species MG_243_MONOMER__m in m = 0;
  species PHE__c in c = 7681/c; PHE__c is "L-phenylalanine";
  species MG471__c in c = 0;
  species MG_376_HEXAMER__c in c = 16/c;
  species MG_412_MONOMER__e in e = 0;
  species MG_095_MONOMER__m in m = 0;
  species MG_287_MONOMER_octeACP__c in c = 0; MG_287_MONOMER_octeACP__c is "cis-octadec-11-enoyl-[acyl-carrier protein] (n-C18:1)";
  species MG479__c in c = 0;
  species MG_327_MONOMER__c in c = 5;
  species MG_036_DIMER__c in c = 21/c; MG_036_DIMER__c is "aspartyl-tRNA synthetase";
  species MG_035_MONOMER__c in c = 0; MG_035_MONOMER__c is "histidyl-tRNA synthetase";
  species MG_345_MONOMER__c in c = 48/c; MG_345_MONOMER__c is "isoleucyl-tRNA synthetase";
  species MG_344_MONOMER__c in c = 5;
  species MG_126_DIMER__c in c = 13/c; MG_126_DIMER__c is "tryptophanyl-tRNA synthetase";
  species MG_287_MONOMER_ocdcaACP__c in c = 0; MG_287_MONOMER_ocdcaACP__c is "Octadecanoyl-ACP (n-C18:0ACP)";
  species MG_411_MONOMER__m in m = 0;
  species MG_251_DIMER__c in c = 14/c; MG_251_DIMER__c is "glycyl-tRNA synthetase";
  species MG486__c in c = 0;
  species MG_063_MONOMER__c in c = 1/c; MG_063_MONOMER__c is "1-phosphofructokinase, putative";
  species MG_240_HEXAMER__c in c = 13/c; MG_240_HEXAMER__c is "nicotinamide-nucleotide adenylyltransferase/conserved hypothetical protein";
  species MG512_aa__c in c = 62/c; MG512_aa__c is "MG512-AA";
  species MG_440_MONOMER__c in c = 5;
  species MG_228_MONOMER__c in c = 3/c; MG_228_MONOMER__c is "dihydrofolate reductase";
  species MG_039_DIMER__c in c = 12/c; MG_039_DIMER__c is "FAD-dependent glycerol-3-phosphate dehydrogenase, putative";
  species MG_131_MONOMER__m in m = 0;
  species MG_089_MONOMER__c in c = 1/c; MG_089_MONOMER__c is "translation elongation factor G";
  species MG511_aa__c in c = 55/c; MG511_aa__c is "MG511-AA";
  species MG_257_MONOMER__c in c = 114/c; MG_257_MONOMER__c is "ribosomal protein L31";
  species MG_287_MONOMER__c in c = 48/c; MG_287_MONOMER__c is "acyl carrier protein";
  species MG_433_MONOMER__c in c = 0; MG_433_MONOMER__c is "translation elongation factor Ts";
  species MG_094_MONOMER__c in c = 3/c; MG_094_MONOMER__c is "replicative DNA helicase";
  species MG_255_MONOMER__m in m = 0;
  species MG519_aa__c in c = 26/c; MG519_aa__c is "MG519-AA";
  species MG_367_DIMER__c in c = 13/c; MG_367_DIMER__c is "ribonuclease III";
  species MG490_aa__c in c = 55/c; MG490_aa__c is "MG490-AA";
  species MG_124_MONOMER__c in c = 28/c; MG_124_MONOMER__c is "thioredoxin";
  species MG_198_MONOMER__c in c = 142/c; MG_198_MONOMER__c is "ribosomal protein L20";
  species MG_410_411_412_PENTAMER__m in m = 17/m; MG_410_411_412_PENTAMER__m is "phosphate ABC transporter";
  species MG_203_204_TETRAMER__c in c = 12/c; MG_203_204_TETRAMER__c is "topoisomerase IV";
  species MG_289_MONOMER__c in c = 5;
  species MG_224_6MER_GTP__c in c = 5/c; MG_224_6MER_GTP__c is "cell division protein ftsZ activated 6mer";
  species MG_469_2MER_1ATP_ADP__c in c = 0; MG_469_2MER_1ATP_ADP__c is "DnaA 2mer-(1)ATP-(1)ADP";
  species MG504__c in c = 0;
  species MG_453_MONOMER__c in c = 1/c; MG_453_MONOMER__c is "UTP-glucose-1-phosphate uridylyltransferase";
  species MG_279_MONOMER__c in c = 5;
  species MG_476_MONOMER__m in m = 0;
  species MG_033_MONOMER__c in c = 5;
  species MG_445_DIMER__c in c = 107/c; MG_445_DIMER__c is "tRNA (guanine-N1)-methyltransferase";
  species MG_232_MONOMER__c in c = 136/c; MG_232_MONOMER__c is "ribosomal protein L21";
  species MG_212_MONOMER__m in m = 0;
  species MG_278_MONOMER__c in c = 1/c; MG_278_MONOMER__c is "GTP diphosphokinase";
  species MG_210_MONOMER__c in c = 5;
  species MG_126_MONOMER__c in c = 1/c; MG_126_MONOMER__c is "tryptophanyl-tRNA synthetase";
  species MG_182_MONOMER__c in c = 1/c; MG_182_MONOMER__c is "tRNA pseudouridine synthase A";
  species MG_033_TETRAMER__m in m = 16/m; MG_033_TETRAMER__m is "glycerol uptake facilitator";
  species MG_292_TETRAMER__c in c = 18/c; MG_292_TETRAMER__c is "alanyl-tRNA synthetase";
  species MG_136_MONOMER__c in c = 0; MG_136_MONOMER__c is "lysyl-tRNA synthetase";
  species MG_307_MONOMER__c in c = 5;
  species MG_106_MONOMER__c in c = 0; MG_106_MONOMER__c is "peptide deformylase";
  species MG_215_MONOMER__c in c = 2/c; MG_215_MONOMER__c is "6-phosphofructokinase";
  species MG_454_DIMER_ox__c in c = 0; MG_454_DIMER_ox__c is "oxidized thiol-dependent peroxidase";
  species MG_158_MONOMER__c in c = 146/c; MG_158_MONOMER__c is "ribosomal protein L16";
  species MG510_aa__c in c = 50/c; MG510_aa__c is "MG510-AA";
  species MG_127_MONOMER__c in c = 73/c; MG_127_MONOMER__c is "Spx subfamily protein";
  species MG485_aa__c in c = 14/c; MG485_aa__c is "MG485-AA";
  species MG_426_MONOMER__c in c = 152/c; MG_426_MONOMER__c is "ribosomal protein L28";
  species MG_468_MONOMER__c in c = 5;
  species MG484__c in c = 0;
  species MG_417_MONOMER__c in c = 123/c; MG_417_MONOMER__c is "ribosomal protein S9";
  species MG_323_MONOMER__c in c = 0; MG_323_MONOMER__c is "potassium uptake protein";
  species MG_077_MONOMER__c in c = 5;
  species ADP__c in c = 100000;
  species MG_224_MONOMER_GTP__c in c = 6/c; MG_224_MONOMER_GTP__c is "cell division protein ftsZ activated";
  species MG_067_MONOMER__c in c = 5;
  species MG_344_MONOMER__e in e = 0;
  species MG_220_MONOMER__e in e = 0;
  species MG_073_MONOMER__c in c = 0; MG_073_MONOMER__c is "excinuclease ABC, B subunit";
  species MG_099_MONOMER__c in c = 17/c; MG_099_MONOMER__c is "glutamyl-tRNA(Gln) and/or aspartyl-tRNA(Asn) amidotransferase, A subunit";
  species MG_403_MONOMER__c in c = 5;
  species MG_078_MONOMER__m in m = 0;
  species MG475_aa__c in c = 14/c; MG475_aa__c is "MG475-AA";
  species MG_375_MONOMER__c in c = 1/c; MG_375_MONOMER__c is "threonyl-tRNA synthetase";
  species MG_132_DIMER__c in c = 14/c; MG_132_DIMER__c is "purine nucleoside phosphoramidase";
  species MG_389_MONOMER__c in c = 5;
  species MG_302_MONOMER__c in c = 5;
  species MG_451_DIMER__c in c = 139/c; MG_451_DIMER__c is "translation elongation factor Tu";
  species MG_132_MONOMER__c in c = 0; MG_132_MONOMER__c is "purine nucleoside phosphoramidase";
  species MG514__c in c = 0;
  species MG_432_MONOMER__m in m = 0;
  species PPI__c in c = 5796/c; PPI__c is "diphosphate";
  species MG_041_MONOMER__c in c = 51/c; MG_041_MONOMER__c is "PTS system, HPr";

  // Parameters:
  k_tRnaAa_MG471 = 7.6;
  k_tRnaAa_MG472 = 4.2627;
  k_tRnaAa_MG475 = 7.6;
  k_tRnaAa_MG479 = 90;
  k_tRnaAa_MG483 = 141.9;
  k_tRnaAa_MG484 = 14;
  k_tRnaAa_MG485 = 3.2;
  k_tRnaAa_MG486 = 4.2627;
  k_tRnaAa_MG487 = 7.6;
  k_tRnaAa_MG488 = 10.8;
  k_tRnaAa_MG489 = 7.6;
  k_tRnaAa_MG490 = 5.4;
  k_tRnaAa_MG492 = 2.8;
  k_tRnaAa_MG493 = 7.6;
  k_tRnaAa_MG495 = 2.8;
  k_tRnaAa_MG496 = 7.6;
  k_tRnaAa_MG497 = 2.8;
  k_tRnaAa_MG499 = 7.6;
  k_tRnaAa_MG500 = 5.1;
  k_tRnaAa_MG501 = 7.6;
  k_tRnaAa_MG502 = 5.36;
  k_tRnaAa_MG503 = 0.74;
  k_tRnaAa_MG504 = 7.6;
  k_tRnaAa_MG506 = 7.6;
  k_tRnaAa_MG507 = 7.6;
  k_tRnaAa_MG508 = 5.1;
  k_tRnaAa_MG509 = 7.6;
  k_tRnaAa_MG510 = 90;
  k_tRnaAa_MG511 = 7.6;
  k_tRnaAa_MG512 = 90;
  k_tRnaAa_MG513 = 4.4;
  k_tRnaAa_MG514 = 27;
  k_tRnaAa_MG518 = 142;
  k_tRnaAa_MG519 = 5.1;
  k_tRnaAa_MG520 = 5.1;
  k_tRnaAa_MG523 = 2.8;
  k_cpx_DNA_GYRASE = 1000000;
  k_cpx_DNA_POLYMERASE_2CORE_BETA_CLAMP_GAMMA_COMPLEX_PRIMASE = 0;
  k_cpx_DNA_POLYMERASE_CORE = 1000000;
  k_cpx_DNA_POLYMERASE_CORE_BETA_CLAMP_GAMMA_COMPLEX = 0;
  k_cpx_DNA_POLYMERASE_CORE_BETA_CLAMP_PRIMASE = 0;
  k_cpx_DNA_POLYMERASE_GAMMA_COMPLEX = 1000000;
  k_cpx_DNA_POLYMERASE_HOLOENZYME = 0;
  k_cpx_MG_0001_048 = 1000000;
  k_cpx_MG_0003_465 = 1000000;
  k_cpx_MG_001_DIMER = 0;
  k_cpx_MG_005_DIMER = 1000000;
  k_cpx_MG_006_DIMER = 1000000;
  k_cpx_MG_008_379_TETRAMER = 1000000;
  k_cpx_MG_013_DIMER = 1000000;
  k_cpx_MG_014_015_DIMER = 1000000;
  k_cpx_MG_019_DIMER = 1000000;
  k_cpx_MG_021_DIMER = 1000000;
  k_cpx_MG_023_DIMER = 1000000;
  k_cpx_MG_029_DIMER = 1000000;
  k_cpx_MG_030_TRIMER = 1000000;
  k_cpx_MG_033_TETRAMER = 1000000;
  k_cpx_MG_034_DIMER = 1000000;
  k_cpx_MG_035_DIMER = 1000000;
  k_cpx_MG_036_DIMER = 1000000;
  k_cpx_MG_038_TETRAMER = 1000000;
  k_cpx_MG_039_DIMER = 1000000;
  k_cpx_MG_040_119_120_121_PENTAMER = 1000000;
  k_cpx_MG_041_062_429_PENTAMER = 1000000;
  k_cpx_MG_041_069_429_PENTAMER = 1000000;
  k_cpx_MG_042_043_044_045_PENTAMER = 1000000;
  k_cpx_MG_046_DIMER = 1000000;
  k_cpx_MG_047_TETRAMER = 1000000;
  k_cpx_MG_049_HEXAMER = 1000000;
  k_cpx_MG_051_DIMER = 1000000;
  k_cpx_MG_052_DIMER = 1000000;
  k_cpx_MG_053_TRIMER = 1000000;
  k_cpx_MG_055_170_277_464_476_20MER = 1000000;
  k_cpx_MG_058_HEXAMER = 1000000;
  k_cpx_MG_063_DIMER = 1000000;
  k_cpx_MG_064_065_TETRAMER = 1000000;
  k_cpx_MG_066_DIMER = 1000000;
  k_cpx_MG_072_DIMER = 1000000;
  k_cpx_MG_073_206_421_TETRAMER = 1000000;
  k_cpx_MG_077_078_079_080_321_PENTAMER = 1000000;
  k_cpx_MG_084_TETRAMER = 1000000;
  k_cpx_MG_085_HEXAMER = 1000000;
  k_cpx_MG_089_DIMER = 1000000;
  k_cpx_MG_091_OCTAMER = 0;
  k_cpx_MG_091_TETRAMER = 1000000;
  k_cpx_MG_094_HEXAMER = 1000000;
  k_cpx_MG_098_099_100_TRIMER = 1000000;
  k_cpx_MG_102_DIMER = 1000000;
  k_cpx_MG_102_DIMER_ox = 0;
  k_cpx_MG_105_OCTAMER = 1000000;
  k_cpx_MG_106_DIMER = 1000000;
  k_cpx_MG_107_DIMER = 1000000;
  k_cpx_MG_109_DIMER = 1000000;
  k_cpx_MG_111_DIMER = 1000000;
  k_cpx_MG_112_DIMER = 1000000;
  k_cpx_MG_113_DIMER = 1000000;
  k_cpx_MG_114_DIMER = 1000000;
  k_cpx_MG_118_DIMER = 1000000;
  k_cpx_MG_123_DIMER = 1000000;
  k_cpx_MG_124_MONOMER_ox = 0;
  k_cpx_MG_126_DIMER = 1000000;
  k_cpx_MG_127_MONOMER_ox = 0;
  k_cpx_MG_128_HEXAMER = 1000000;
  k_cpx_MG_132_DIMER = 1000000;
  k_cpx_MG_136_DIMER = 1000000;
  k_cpx_MG_137_DIMER = 1000000;
  k_cpx_MG_139_DIMER = 1000000;
  k_cpx_MG_179_180_181_TETRAMER = 1000000;
  k_cpx_MG_182_DIMER = 1000000;
  k_cpx_MG_184_DIMER = 1000000;
  k_cpx_MG_186_187_188_189_PENTAMER = 1000000;
  k_cpx_MG_194_195_TETRAMER = 1000000;
  k_cpx_MG_201_DIMER = 1000000;
  k_cpx_MG_203_204_TETRAMER = 1000000;
  k_cpx_MG_205_DIMER = 1000000;
  k_cpx_MG_208_DIMER = 1000000;
  k_cpx_MG_213_214_298_6MER = 1000000;
  k_cpx_MG_213_214_298_6MER_ADP = 0;
  k_cpx_MG_215_TETRAMER = 1000000;
  k_cpx_MG_216_TETRAMER = 1000000;
  k_cpx_MG_221_OCTAMER = 1000000;
  k_cpx_MG_224_2MER_GTP = 0;
  k_cpx_MG_224_3MER_GTP = 0;
  k_cpx_MG_224_4MER_GTP = 0;
  k_cpx_MG_224_5MER_GTP = 0;
  k_cpx_MG_224_6MER_GTP = 0;
  k_cpx_MG_224_7MER_GTP = 0;
  k_cpx_MG_224_8MER_GTP = 0;
  k_cpx_MG_224_9MER_GDP = 0;
  k_cpx_MG_224_9MER_GTP = 0;
  k_cpx_MG_224_MONOMER_GDP = 0;
  k_cpx_MG_224_MONOMER_GTP = 0;
  k_cpx_MG_225_DIMER = 1000000;
  k_cpx_MG_226_DIMER = 1000000;
  k_cpx_MG_227_DIMER = 1000000;
  k_cpx_MG_228_TETRAMER = 1000000;
  k_cpx_MG_229_231_TETRAMER = 1000000;
  k_cpx_MG_229_231_TETRAMER_ox = 0;
  k_cpx_MG_239_HEXAMER = 1000000;
  k_cpx_MG_240_HEXAMER = 1000000;
  k_cpx_MG_244_DIMER = 1000000;
  k_cpx_MG_251_DIMER = 1000000;
  k_cpx_MG_252_DIMER = 1000000;
  k_cpx_MG_259_TETRAMER = 1000000;
  k_cpx_MG_265_DIMER = 1000000;
  k_cpx_MG_271_272_273_274_192MER = 1000000;
  k_cpx_MG_271_272_273_274_192MER_ox = 0;
  k_cpx_MG_275_TETRAMER = 1000000;
  k_cpx_MG_276_DIMER = 1000000;
  k_cpx_MG_278_DIMER = 1000000;
  k_cpx_MG_283_DIMER = 1000000;
  k_cpx_MG_287_MONOMER_ACP = 0;
  k_cpx_MG_287_MONOMER_ddcaACP = 0;
  k_cpx_MG_287_MONOMER_hdeACP = 0;
  k_cpx_MG_287_MONOMER_myrsACP = 0;
  k_cpx_MG_287_MONOMER_ocdcaACP = 0;
  k_cpx_MG_287_MONOMER_octeACP = 0;
  k_cpx_MG_287_MONOMER_palmACP = 0;
  k_cpx_MG_287_MONOMER_tdeACP = 0;
  k_cpx_MG_289_290_291_PENTAMER = 1000000;
  k_cpx_MG_292_TETRAMER = 1000000;
  k_cpx_MG_293_DIMER = 1000000;
  k_cpx_MG_295_MONOMER_ox = 0;
  k_cpx_MG_299_DIMER = 1000000;
  k_cpx_MG_301_TETRAMER = 1000000;
  k_cpx_MG_302_303_304_TETRAMER = 1000000;
  k_cpx_MG_316_DIMER = 1000000;
  k_cpx_MG_322_323_TETRAMER = 1000000;
  k_cpx_MG_333_DIMER = 1000000;
  k_cpx_MG_336_DIMER = 1000000;
  k_cpx_MG_346_DIMER = 1000000;
  k_cpx_MG_347_DIMER = 1000000;
  k_cpx_MG_349_HEXAMER = 1000000;
  k_cpx_MG_351_HEXAMER = 1000000;
  k_cpx_MG_352_DIMER = 1000000;
  k_cpx_MG_353_DIMER = 1000000;
  k_cpx_MG_355_HEXAMER = 1000000;
  k_cpx_MG_357_DIMER = 1000000;
  k_cpx_MG_358_359_10MER = 1000000;
  k_cpx_MG_367_DIMER = 1000000;
  k_cpx_MG_368_DIMER = 1000000;
  k_cpx_MG_369_DIMER = 1000000;
  k_cpx_MG_372_DIMER = 1000000;
  k_cpx_MG_375_DIMER = 1000000;
  k_cpx_MG_376_HEXAMER = 1000000;
  k_cpx_MG_382_TETRAMER = 1000000;
  k_cpx_MG_383_DIMER = 1000000;
  k_cpx_MG_385_DIMER = 1000000;
  k_cpx_MG_390_DIMER = 1000000;
  k_cpx_MG_391_HEXAMER = 1000000;
  k_cpx_MG_392_393_21MER = 1000000;
  k_cpx_MG_394_TETRAMER = 1000000;
  k_cpx_MG_396_DIMER = 1000000;
  k_cpx_MG_398_399_400_401_402_403_404_405_22MER = 1000000;
  k_cpx_MG_407_DIMER = 1000000;
  k_cpx_MG_409_DIMER = 1000000;
  k_cpx_MG_410_411_412_PENTAMER = 1000000;
  k_cpx_MG_425_DIMER = 1000000;
  k_cpx_MG_427_DIMER = 1000000;
  k_cpx_MG_427_DIMER_ox = 0;
  k_cpx_MG_428_DIMER = 1000000;
  k_cpx_MG_431_DIMER = 1000000;
  k_cpx_MG_433_DIMER = 1000000;
  k_cpx_MG_434_HEXAMER = 1000000;
  k_cpx_MG_437_DIMER = 1000000;
  k_cpx_MG_445_DIMER = 1000000;
  k_cpx_MG_451_DIMER = 1000000;
  k_cpx_MG_453_TETRAMER = 1000000;
  k_cpx_MG_454_DIMER = 1000000;
  k_cpx_MG_454_DIMER_ox = 0;
  k_cpx_MG_455_DIMER = 1000000;
  k_cpx_MG_457_HEXAMER = 1000000;
  k_cpx_MG_458_TETRAMER = 1000000;
  k_cpx_MG_460_TETRAMER = 1000000;
  k_cpx_MG_467_468_526_TETRAMER = 1000000;
  k_cpx_MG_469_1MER_ADP = 0;
  k_cpx_MG_469_1MER_ATP = 0;
  k_cpx_MG_469_2MER_1ATP_ADP = 0;
  k_cpx_MG_469_2MER_ATP = 0;
  k_cpx_MG_469_3MER_2ATP_ADP = 0;
  k_cpx_MG_469_3MER_ATP = 0;
  k_cpx_MG_469_4MER_3ATP_ADP = 0;
  k_cpx_MG_469_4MER_ATP = 0;
  k_cpx_MG_469_5MER_4ATP_ADP = 0;
  k_cpx_MG_469_5MER_ATP = 0;
  k_cpx_MG_469_6MER_5ATP_ADP = 0;
  k_cpx_MG_469_6MER_ATP = 0;
  k_cpx_MG_469_7MER_6ATP_ADP = 0;
  k_cpx_MG_469_7MER_ATP = 0;
  k_cpx_MG_482_DIMER = 1000000;
  k_cpx_REPLISOME = 0;
  k_cpx_RIBOSOME_30S = 0;
  k_cpx_RIBOSOME_30S_IF3 = 0;
  k_cpx_RIBOSOME_50S = 0;
  k_cpx_RIBOSOME_70S = 1000000;
  k_cpx_RNA_POLYMERASE = 1000000;
  k_cpx_RNA_POLYMERASE_HOLOENZYME = 0;
  Km1_MG_014_MONOMER__c = 1;
  Km1_MG_015_MONOMER__c = 1;
  Km1_MG_028_MONOMER__c = 1;
  Km1_MG_032_MONOMER__c = 1;
  Km1_MG_033_MONOMER__c = 1;
  Km1_MG_040_MONOMER__c = 1;
  Km1_MG_043_MONOMER__c = 1;
  Km1_MG_044_MONOMER__c = 1;
  Km1_MG_045_MONOMER__c = 1;
  Km1_MG_055_MONOMER__c = 1;
  Km1_MG_061_MONOMER__c = 1;
  Km1_MG_062_MONOMER__c = 1;
  Km1_MG_064_MONOMER__c = 1;
  Km1_MG_067_MONOMER__c = 1;
  Km1_MG_068_MONOMER__c = 1;
  Km1_MG_069_MONOMER__c = 1;
  Km1_MG_071_MONOMER__c = 1;
  Km1_MG_074_MONOMER__c = 1;
  Km1_MG_075_MONOMER__c = 1;
  Km1_MG_076_MONOMER__c = 1;
  Km1_MG_077_MONOMER__c = 1;
  Km1_MG_078_MONOMER__c = 1;
  Km1_MG_086_MONOMER__c = 1;
  Km1_MG_095_MONOMER__c = 1;
  Km1_MG_096_MONOMER__c = 1;
  Km1_MG_109_MONOMER__c = 1;
  Km1_MG_114_MONOMER__c = 1;
  Km1_MG_120_MONOMER__c = 1;
  Km1_MG_121_MONOMER__c = 1;
  Km1_MG_123_MONOMER__c = 1;
  Km1_MG_129_MONOMER__c = 1;
  Km1_MG_130_MONOMER__c = 1;
  Km1_MG_131_MONOMER__c = 1;
  Km1_MG_133_MONOMER__c = 1;
  Km1_MG_135_MONOMER__c = 1;
  Km1_MG_144_MONOMER__c = 1;
  Km1_MG_146_MONOMER__c = 1;
  Km1_MG_147_MONOMER__c = 1;
  Km1_MG_148_MONOMER__c = 1;
  Km1_MG_149_MONOMER__c = 1;
  Km1_MG_170_MONOMER__c = 1;
  Km1_MG_181_MONOMER__c = 1;
  Km1_MG_185_MONOMER__c = 1;
  Km1_MG_186_MONOMER__c = 1;
  Km1_MG_188_MONOMER__c = 1;
  Km1_MG_189_MONOMER__c = 1;
  Km1_MG_191_MONOMER__c = 1;
  Km1_MG_192_MONOMER__c = 1;
  Km1_MG_210_MONOMER__c = 1;
  Km1_MG_212_MONOMER__c = 1;
  Km1_MG_220_MONOMER__c = 1;
  Km1_MG_225_MONOMER__c = 1;
  Km1_MG_226_MONOMER__c = 1;
  Km1_MG_241_MONOMER__c = 1;
  Km1_MG_242_MONOMER__c = 1;
  Km1_MG_243_MONOMER__c = 1;
  Km1_MG_247_MONOMER__c = 1;
  Km1_MG_255_MONOMER__c = 1;
  Km1_MG_256_MONOMER__c = 1;
  Km1_MG_260_MONOMER__c = 1;
  Km1_MG_267_MONOMER__c = 1;
  Km1_MG_275_MONOMER__c = 1;
  Km1_MG_277_MONOMER__c = 1;
  Km1_MG_279_MONOMER__c = 1;
  Km1_MG_280_MONOMER__c = 1;
  Km1_MG_281_MONOMER__c = 1;
  Km1_MG_286_MONOMER__c = 1;
  Km1_MG_289_MONOMER__c = 1;
  Km1_MG_291_MONOMER__c = 1;
  Km1_MG_294_MONOMER__c = 1;
  Km1_MG_302_MONOMER__c = 1;
  Km1_MG_306_MONOMER__c = 1;
  Km1_MG_307_MONOMER__c = 1;
  Km1_MG_309_MONOMER__c = 1;
  Km1_MG_310_MONOMER__c = 1;
  Km1_MG_313_MONOMER__c = 1;
  Km1_MG_314_MONOMER__c = 1;
  Km1_MG_316_MONOMER__c = 1;
  Km1_MG_318_MONOMER__c = 1;
  Km1_MG_319_MONOMER__c = 1;
  Km1_MG_320_MONOMER__c = 1;
  Km1_MG_321_MONOMER__c = 1;
  Km1_MG_322_MONOMER__c = 1;
  Km1_MG_327_MONOMER__c = 1;
  Km1_MG_331_MONOMER__c = 1;
  Km1_MG_338_MONOMER__c = 1;
  Km1_MG_344_MONOMER__c = 1;
  Km1_MG_348_MONOMER__c = 1;
  Km1_MG_354_MONOMER__c = 1;
  Km1_MG_364_MONOMER__c = 1;
  Km1_MG_389_MONOMER__c = 1;
  Km1_MG_390_MONOMER__c = 1;
  Km1_MG_395_MONOMER__c = 1;
  Km1_MG_397_MONOMER__c = 1;
  Km1_MG_403_MONOMER__c = 1;
  Km1_MG_404_MONOMER__c = 1;
  Km1_MG_405_MONOMER__c = 1;
  Km1_MG_406_MONOMER__c = 1;
  Km1_MG_411_MONOMER__c = 1;
  Km1_MG_412_MONOMER__c = 1;
  Km1_MG_414_MONOMER__c = 1;
  Km1_MG_432_MONOMER__c = 1;
  Km1_MG_437_MONOMER__c = 1;
  Km1_MG_439_MONOMER__c = 1;
  Km1_MG_440_MONOMER__c = 1;
  Km1_MG_441_MONOMER__c = 1;
  Km1_MG_443_MONOMER__c = 1;
  Km1_MG_447_MONOMER__c = 1;
  Km1_MG_452_MONOMER__c = 1;
  Km1_MG_456_MONOMER__c = 1;
  Km1_MG_457_MONOMER__c = 1;
  Km1_MG_464_MONOMER__c = 1;
  Km1_MG_468_MONOMER__c = 1;
  Km1_MG_474_MONOMER__c = 1;
  Km1_MG_476_MONOMER__c = 1;
  Km1_MG_478_MONOMER__c = 1;
  Km1_MG_515_MONOMER__c = 1;
  Km1_MG_521_MONOMER__c = 1;
  Km1_MG_524_MONOMER__c = 1;
  Km2_ATP__c = 1;
  mw0073301c_98ed_487f_a2e3_54d58c2f0408_mw6e48d654_db66_4dc7_8d0f_0e1d422c7794 = 7805270669079;
  mw04879626_522f_4ff1_a4e6_bd0b359eee12_mwf381e780_1ad9_4957_9424_4ff41281fd5a = 6.281321e12;
  mw05f18bf3_ff9f_498f_98e0_9c90cce8ca48_mw0454fdf0_88e2_4d8c_9eee_16603e50f644 = 4.804803e13;
  mw06aec404_57a0_4f32_8972_f66657b11f6d_mwc1e85f8f_4098_40ea_9f5f_c3e6b531e9b4 = 7.060493e12;
  mw07d1e21b_acc8_42bc_95c5_d9d3970f15f5_mw9290bc11_2ca9_45bc_99b0_997b338f2d5e = 9.865862e12;
  mw10d68844_23c9_4468_8b17_246f834f2307_mw015718bc_81c2_497e_be8e_a56dd4b4c35b = 1.293601e13;
  mw13f3349b_4744_4ce0_a804_b8995595d92d_mw669a353c_691f_4958_bec8_bbb4a107ae7f = 1.479879e13;
  mw1412b997_58e1_4029_8839_1dba64551bd4_mwa4960309_9047_4c95_8686_ec20e1904da1 = 1.375353e13;
  mw18305a96_ee7f_45c1_b8eb_b0947e202349_mw2427812f_a126_493c_8155_747f446814d6 = 1.29814e13;
  mw18800e5c_5d2d_400e_80af_74f46d5b63f2_mw616456d5_2115_4f73_b6ed_2d7b2e9b3126 = 5.605603e12;
  mw1ab036ec_443c_4ada_a5d6_8e43c068872b_mwdab7082a_89da_42d9_aeac_2afe9a2a724d = 1.380484e13;
  mw1bd76e06_77be_4007_b04e_9e3e94d1d388_mwf3de89ab_05b8_43fd_8428_53ff96725bec = 2.913148e13;
  mw1c7465d1_1eb0_4c15_af39_3a32b27de536_mwaf481887_bd48_4e61_882e_41d036d4564f = 7.519712e12;
  mw1cd29efd_5383_4ef8_a29b_b174b4dbdcf6_mw3ffc7ced_3b4c_41c8_94a6_ece94158b492 = 8.725704e12;
  mw1f523642_709a_4908_bfe0_1b301772c67f_mw8e3a2830_1ba0_453f_aeff_07fc5ce9f9ab = 14339915880401;
  mw1f8c3239_c0d8_4eec_a4a7_bf0fc43e6960_mwc8432b3e_2e1b_4e2f_84ec_97e27f723b64 = 2.779638e12;
  mw20410a8c_0849_4648_96b1_ab9dcea54f8c_mwcb5b96d6_6421_4d78_ad9c_55981cfbeffb = 3.627155e13;
  mw21be5f78_d4be_423a_a6c8_b72c5e843c4d_mw6ab703be_abdc_4e7f_871e_a58eeb853d34 = 2.720366e13;
  mw2878c3d7_39ba_496d_8ea4_45bc1652041b_mwaa7b25a0_579c_409e_b294_6cc87ca4a174 = 1.002628e13;
  mw28aca57a_177a_4c39_a787_1c41a6a2b6e2_mwc5e02c04_7277_4114_9248_be82b6955cdd = 9.839623e12;
  mw2924d2d6_a628_4762_879d_02ada1fb53f8_mwe93d5795_061f_404f_99f0_8f848890ffc1 = 7.659831e12;
  mw2942e237_e3c6_4158_8a7d_9dbdbd0b550e_mw56f261b3_6175_4903_b233_aabb7565f9c8 = 6.813441e12;
  mw2b8abec5_25af_4252_9332_442db47cb78a_mwbe60ac7f_29cb_48cc_8251_97388ccb8c9a = 7.739955e12;
  mw2f01b35c_d9c5_4846_aa18_43529e5c9734_mw0bfe348d_8788_4530_a977_9eb3876f083b = 7.788839e12;
  mw32116cc5_a83e_4030_9249_dc19990d0e07_mw2f417a5e_33e4_4bc3_be1b_23380db4334b = 1.163427e13;
  mw32c7a4a4_0c45_4a9b_9c99_4efdc240dbf3_mw36b66044_3068_4579_ba4e_8e4c9bf65307 = 6.260065e12;
  mw3427eca0_2c97_46c0_b8e4_07d6e3bcf0b5_mw2ac94eca_7af8_430f_8ba8_7607e1bf3207 = 39781702119822;
  mw3511c23c_8bf5_45e7_8f79_ba9f95358276_mw4104e6e3_1e63_4b75_8f6c_400b52cac829 = 3.612987e12;
  mw3990625d_e189_41c1_8114_d543458b057d_mw45b50ad3_8bac_426b_ba9d_7853021b4f50 = 1.321321e13;
  mw3cc941f8_7759_4f05_a3e6_f11a546f2e50_mw65d83991_beaa_492b_8aa1_188d23190a9b = 1.651651e13;
  mw40148050_09e0_4008_9f26_21719def89a9_mwa1a8430a_a9f7_4d3e_8317_1b53bf499a10 = 5.691844e12;
  mw4655cbbd_bf9c_4636_8dcf_f22811d63e07_mw9d63ba3e_fd4f_45af_9c1e_86177ace9c8a = 9.559944e12;
  mw46b11442_4b14_49a3_96fb_cb3954d8ce78_mw341bf054_6a64_42b2_af23_a42cea0600b9 = 2.078482e13;
  mw498aea7d_2fd4_452c_9a0c_008cb959ac3b_mwa5ae15ef_3f87_438b_b034_5db22f0b43f5 = 23415812007237;
  mw4a255144_7557_419f_99f4_2f424130abce_mw7c247b9e_4c1f_4264_a894_c27b362095c0 = 13260567373274;
  mw4d12fb6f_53d0_4972_9474_dbc23f2008b8_mwbc089891_168f_4458_b9c3_303ce58b61b9 = 14175089261086;
  mw56d94b7e_7bba_4743_8605_baa8951852d0_mw7b8ffc45_0ec8_47fb_9f5c_888b1f237520 = 9.045717e12;
  mw5755e585_866b_46a9_a878_475f70e384d7_mwe239f53d_1f0c_48f6_bba9_b381eafc0c4c = 3.814122e12;
  mw576db2db_6152_4ab7_938f_438362f4c87c_mw5e82054b_b864_4d0b_8ba9_5dc6517c1184 = 1.445195e13;
  mw57f6ad6c_40c1_4e24_9a53_f524a3d80ffa_mw2306a2e4_cbbd_4686_8a84_2cbf55b937fa = 2.680941e13;
  mw5a984e03_bb3b_4c00_8ecb_ae79f961b747_mw88ff6775_d152_40a7_ad4b_dbe8ad78c7d1 = 3.571137e12;
  mw5ae4c5e5_5d2c_46c6_9b29_e0773c802f60_mw0f505bd0_1790_45ad_9571_675b39eb1b6b = 5.440733e12;
  mw5b680d22_3b3a_45d0_b28e_989194bac178_mwefc87403_60ff_4736_b2e4_41e9c5120159 = 3.961133e12;
  mw5c453a53_4962_4245_831d_1e9bcda35e18_mw9d719afb_e144_4d5b_8fa9_88ac86a34d0c = 9.609606e12;
  mw5fe6e98e_5bf1_4779_87b5_7d809e963d27_mw0eca82b8_4786_4e35_9ce4_da73531ddc97 = 2.402401e13;
  mw627a615c_9c41_4de9_b176_8f803f4db669_mw2f7d3007_06a6_4a14_8883_91636abd02fa = 7.169958e12;
  mw62cc4c57_0a7f_4787_b71e_771d5b9f3612_mw2b10f5e3_f2d2_4a45_880e_75675078ed85 = 1.697109e13;
  mw689d5be0_fc63_45b7_9c83_1ca03e3360b2_mw15c72270_5f3e_4884_9d87_dbcb355fa955 = 1.124528e13;
  mw6a533966_a2cf_46bc_9cf6_1faac5173e02_mw3ec2113a_0f59_4d1c_94e6_1822879ce3d0 = 9.295724e12;
  mw6c285924_1785_410d_b64c_f0ad6c5d4d82_mw30efd2dd_0ef1_40fb_9c6f_1b97a6af5345 = 5.555103e12;
  mw6c601d3d_7705_4b9a_8c57_2dd4f7a17c9e_mw0a01ac0c_fc32_4966_80d8_143eb5174807 = 31621352967038;
  mw6d4aee3b_c6c9_4dc9_a9db_48687ca2fed7_mwfa418999_f40b_4f82_98d8_1b85f599f21c = 1.289093e13;
  mw6f26361b_1b94_4256_be16_fe8079165bfc_mwc6bda336_537b_4842_809f_791d7bb5eb7b = 7.854986e12;
  mw71581900_c26e_42b1_bcf0_180efe6504d5_mw1c7f938f_d81c_408d_9458_02f2af1bab90 = 1.360183e13;
  mw731e0c4d_e480_464f_ae2e_42b5ff335de2_mw90cbfced_84fe_491c_ada4_5fb3b1a93b5c = 2.70051e13;
  mw76b5ebe7_c0e0_4c92_b122_fb557fc6f085_mwbac113ac_2984_4f15_a156_0d71970d510c = 1.107694e13;
  mw7b0bce5d_1f1d_4ac3_a99d_20da485ab2fe_mw09bea1a1_1df8_4018_a5e2_00ebed3fcf01 = 1.380484e13;
  mw7c92872e_3ad4_4f32_9161_f721594ee4c4_mw3fe629af_0d42_411f_8146_f75fabe1e25a = 2.483019e13;
  mw7f9cc0e4_e6c0_4390_973b_11837927efc4_mwa0325caa_f47d_4059_aebe_31b56efdc264 = 9.319139e12;
  mw81ccd7c4_7457_4e3e_b36c_d6fc3912d9cf_mw8d328eee_04f6_4b26_ae37_e0d7212bd47c = 9813523334598;
  mw84e0f2b1_1875_492f_afa5_16a38204fc8f_mw72825ae5_3215_4521_ad2a_e5945a59c01b = 3.143329e12;
  mw89ed1da7_e15c_4c26_84f7_f2a7a25b5ebc_mw74da51a5_3473_427c_8836_9246c7418c16 = 5.657031e12;
  mw8cc3bae6_1211_4d4d_87ed_cfe2c829aa21_mw6f425ad5_2a14_48fb_91fd_81d10ab3f0a6 = 6.525041e12;
  mw8fec7448_6d8b_4daf_b35e_ee5f56df9af8_mw39e210d8_e2b4_43f6_b024_837588ef423b = 1.745141e13;
  mw914606c4_85d7_4f95_a4ae_7d361e47b24a_mw2893d8f8_f46c_4780_89d7_3a62bb1e7168 = 1.209052e13;
  mw922df075_e339_44a6_8aa2_105189450ad2_mwc8549bae_c8f6_4fbc_9832_6b5497164e13 = 14339915880401;
  mw96cef4da_8acc_413a_b292_80eeb40bf68c_mw0b2666fa_6e6c_48f3_a60f_115909c329f9 = 3.217129e13;
  mw98a11040_8b76_445e_907f_0d2e36bc489a_mw7e39a2a3_aa6a_4e5c_89f1_7d2249803ede = 3.007885e13;
  mw9956c58c_c87f_4e9c_8b23_ffcea0518ba1_mwda6b5b0f_3116_443a_ad3c_eca261651a70 = 4.074558e12;
  mw9cd6faef_393f_4e11_a40e_13b2ad4f4c2d_mwd332800f_1b9d_40e1_a799_29e92685c2fd = 7805270669079;
  mwa0a369ab_ce7a_4b6a_9f06_002aa7c470f0_mw2c8fc140_7ce8_490d_ab05_a10c2b7db8ca = 9.413991e12;
  mwa0e11e53_b154_4448_a260_27c460f7894a_mwcc68414c_ef80_4a82_8707_bd0443b5d7c6 = 6.536569e12;
  mwa7323961_7675_449c_bee1_f83525e3135f_mwcde2fca7_9f37_4c54_bd96_178294666c02 = 5.967255e12;
  mwab3b1122_21d6_46f5_8d98_ae647ac42df9_mw5d908c31_5057_48cc_9299_7694542ead69 = 8.808805e12;
  mwae4f6c56_2284_4dcd_90bc_f2a5eaaad08e_mw940189b0_b9b2_4846_a5ce_83c68a6c5b83 = 1.396113e13;
  mwaeb47bca_ac70_4da0_bf11_e6d1818b7ae5_mwa8f9a427_7347_4e8d_8426_6e3a8bc60452 = 6.654134e12;
  mwb1f07fc3_6224_4193_9fc8_1dd67185fd52_mw2dbbb1cc_2982_42a5_b321_2edc366b41d0 = 1.840646e13;
  mwb2055382_2a10_408f_9a42_4c7282124b8d_mw02d7b1ca_224d_4f8b_9c7e_3aae85f0e765 = 9.295724e12;
  mwb43a9a7e_3c8c_4a7e_80cf_9c20f0683bf6_mwf4d9af31_44a8_46cb_b18a_5b57f3f3ae49 = 1.167097e13;
  mwb4caf68d_9540_4da0_8fc7_8beb41affe61_mwe5f64ba3_c3c2_4d7c_8a10_21b198c8ed86 = 2.074985e12;
  mwb71a6dce_3c95_4a2d_a963_5490b3925b3f_mw2dd7d67c_9134_4aa1_94ad_7441218fc26e = 7.565845e12;
  mwb8ce06bf_690d_4689_8998_53c5d1a7d96c_mw8906a7bb_3d42_4764_b40f_a43a32d781bb = 1.321321e13;
  mwb8e77d5e_8425_4276_89a0_9b613392c53b_mw22255b4b_b579_4333_af5e_749a01be15ef = 5.270225e12;
  mwba21af05_7d71_483c_be58_e047b7872cee_mw05c2894d_55ed_4d50_b2d4_c6132500a753 = 5.277744e12;
  mwbc04e67d_2c78_4a69_8d5b_81a2b6a0657f_mwa79d19e6_dbc8_4cb0_a044_686c42f88c3a = 1.651651e13;
  mwbe06e593_d008_475f_9e61_75bed67b4bab_mwdef91057_28f5_4c09_945d_13073ac6c21b = 3.020162e12;
  mwc05821b1_4a05_4a36_b96c_1ceb0d19cd1a_mwd399ad40_6c1d_475f_aa2e_dc9326e7107c = 1.778701e13;
  mwc3bde18e_cc23_45a6_a6b6_7d91062e7678_mwe43c7ef1_f9ae_470b_a950_6f28de0e1561 = 6630283686637;
  mwc71b6669_b8ef_4553_8bf2_afd8589ec27d_mwce25c328_2b4c_4373_b790_7014eb1a2e24 = 5.938521e12;
  mwc8ac7e73_2d08_4839_b3f7_71a5eb961f86_mw272cd6f3_832b_4e22_83e2_0669f6171017 = 9.090168e12;
  mwca087d8c_b24e_4682_9943_ab54907ef9e7_mwb80aae3b_e132_4106_9279_b8ebd7797c4b = 1.26702e13;
  mwcb2f9e25_32cc_4c14_8e52_289861798e79_mw75e67499_dc92_468f_82ef_13a1c57f3f14 = 3.513484e12;
  mwcbf4da38_e9cd_40f4_bf0b_b0eabf973c4f_mwe44ba274_998f_4032_a713_5d08d4ee148f = 9.685074e12;
  mwcc3e7871_2a60_446b_9da1_9e3f88f96d1d_mw20e97f4d_ef5d_4cbc_ae20_b237a531ac2d = 2.562118e12;
  mwcc704ab4_307a_43f1_99a4_6e80ca66e271_mw98d1acbe_506e_4ddb_8a24_210ffe4d7936 = 4.836207e12;
  mwd026f4e8_d82c_4fad_a8be_923e1178c437_mw79b48654_d158_4790_bdb1_47125fccd1a7 = 1.148975e13;
  mwd03247aa_2e55_477b_85c0_9c0b414f858e_mw28747366_fb1c_4ec1_848e_b7316d2e15ae = 1.547991e13;
  mwd0f2fd5e_3219_4b83_9a80_2d0e147b98bb_mwacdaacbb_69f7_464e_8f4e_22e62b03797d = 6.763617e12;
  mwd51828a2_81dd_4d1d_b298_ae01b8c28d7b_mwe022097f_87be_4074_be72_c6533747e430 = 4.233064e12;
  mwd5cf4645_824b_4730_9259_50d63e7f9383_mwfb44cb3c_76ec_4fcf_b495_d43d194bb6d4 = 8.351463e12;
  mwd5eb53f9_7ba6_4148_ba37_bac1b763e776_mw203aacc0_79d4_4a39_ab98_5416123078e9 = 4.999592e13;
  mwd6bf57ab_88bf_45ec_abcc_757e8be9be04_mwa66c8f84_63dc_467b_b683_f38e4fd08da2 = 1.380484e13;
  mwd9a9bea8_cfa4_4b3f_89e7_e43da84d573f_mw3f65d0d5_3b8b_499a_b758_d66d6fca0adc = 1.887601e13;
  mwdb0b7659_3fb3_454f_bc25_c8d3a249bd5e_mw86c4d348_8649_4c24_bef3_012564cf3a9e = 1.013616e13;
  mwdd02747f_7d58_4876_8f02_87867711ac6c_mw010add1e_e52e_40c1_9d51_4433dd175653 = 2.044032e13;
  mwdebe02ee_43fd_427b_8bad_ae80d86b8c9e_mw55bb4f53_3e92_453f_afb8_e948e74c5f95 = 9.366325e12;
  mwdeeea4dc_9942_4ede_93e0_d3a9d4946888_mwcd661af4_c6db_4b23_b087_2281f5ac4b4e = 2.913148e12;
  mwe313ead8_dd4a_44fb_bd91_836297162968_mw60c1acd7_1f99_4595_9052_953c29e7690f = 1.316619e13;
  mwe6b7a06c_c003_4e40_b66a_83edf102c05a_mw3101aa51_7e9b_4605_8593_6c510decc1c0 = 1.302711e13;
  mwe7aee207_1704_4e58_9a85_aef0776ce60d_mw7322cb63_b9d9_4fb9_abfc_0c429ade526d = 7.114804e12;
  mwe95617b3_564c_4c7f_a96a_636a4fb74d54_mw3a899d5c_147b_4c1d_8213_4b38e5c90bd1 = 1.005353e13;
  mwedb5b7d8_fa19_4b96_9726_fca71967de71_mweae32c09_5ed0_4d69_8218_6646bafac886 = 1.637035e13;
  mwf0062c5f_03f3_4812_9cbb_b3ecb3061e20_mw5fbd4daf_77f4_4231_b8c3_ace2a12e5290 = 2.70051e13;
  mwf6fb8fc5_260f_43f4_9832_ccec480e08fc_mw919fef45_a406_4216_afde_5a9dc4ae63cc = 1.401401e13;
  mwf7098517_c312_43bf_92a1_158a0ecb489a_mw2597d960_a6c2_4d72_bb35_ce8029faf7df = 5.872537e12;
  mwf7d8d0de_bf7e_4d5d_9f38_79cd451b943a_mw95c536cd_1004_45da_aca3_86a05790681b = 1.355201e13;
  mwf7de5321_f42e_44e0_8c4f_b52cbfff7b94_mwa5e78af7_d1af_4a48_b4b8_a9b35369d040 = 1.567669e13;
  mwfd8a9675_dd2d_4d4c_b754_430c14e3af37_mwfe629141_d2cf_4c43_a01e_eb4cf494b38d = 2.913148e13;
  mwfffcc060_5a0c_4565_9c3b_8590fb91f516_mw529e64f5_f411_4ac6_b8ff_e54f4d38f813 = 7.644005e12;
  // Reactions:
  Aminoacylation_MG471: MG471__c + ALA__c + ATP__c => MG471_aa__c + AMP__c + PPI__c; k_tRnaAa_MG471*MG471__c*ALA__c*ATP__c*MG_292_TETRAMER__c/((1 + MG471__c/Aminoacylation_MG471_KM1)*(1 + ALA__c/Aminoacylation_MG471_KM2)*(1 + ATP__c/Aminoacylation_MG471_KM3)); Aminoacylation_MG471 is "Aminoacylation (MG471)";  // modifiers: MG_292_TETRAMER__c
    Aminoacylation_MG471_KM1 = 1; Aminoacylation_MG471_KM2 = 1; Aminoacylation_MG471_KM3 = 1;
  Aminoacylation_MG472: MG472__c + ATP__c + ILE__c => MG472_aa__c + AMP__c + PPI__c; k_tRnaAa_MG472*MG472__c*ATP__c*ILE__c*MG_345_MONOMER__c/((1 + MG472__c/Aminoacylation_MG472_KM1)*(1 + ATP__c/Aminoacylation_MG472_KM2)*(1 + ILE__c/Aminoacylation_MG472_KM3)); Aminoacylation_MG472 is "Aminoacylation (MG472)";  // modifiers: MG_345_MONOMER__c
    Aminoacylation_MG472_KM1 = 1; Aminoacylation_MG472_KM2 = 1; Aminoacylation_MG472_KM3 = 1;
  Aminoacylation_MG475: MG475__c + ATP__c + SER__c => MG475_aa__c + AMP__c + PPI__c; k_tRnaAa_MG475*MG475__c*ATP__c*SER__c*MG_005_DIMER__c/((1 + MG475__c/Aminoacylation_MG475_KM1)*(1 + ATP__c/Aminoacylation_MG475_KM2)*(1 + SER__c/Aminoacylation_MG475_KM3)); Aminoacylation_MG475 is "Aminoacylation (MG475)";  // modifiers: MG_005_DIMER__c
    Aminoacylation_MG475_KM1 = 1; Aminoacylation_MG475_KM2 = 1; Aminoacylation_MG475_KM3 = 1;
  Aminoacylation_MG479: MG479__c + ATP__c + THR__c => MG479_aa__c + AMP__c + PPI__c; k_tRnaAa_MG479*MG479__c*ATP__c*THR__c*MG_375_DIMER__c/((1 + MG479__c/Aminoacylation_MG479_KM1)*(1 + ATP__c/Aminoacylation_MG479_KM2)*(1 + THR__c/Aminoacylation_MG479_KM3)); Aminoacylation_MG479 is "Aminoacylation (MG479)";  // modifiers: MG_375_DIMER__c
    Aminoacylation_MG479_KM1 = 1; Aminoacylation_MG479_KM2 = 1; Aminoacylation_MG479_KM3 = 1;
  Aminoacylation_MG483: MG483__c + ATP__c + CYS__c => MG483_aa__c + AMP__c + PPI__c; k_tRnaAa_MG483*MG483__c*ATP__c*CYS__c*MG_253_MONOMER__c/((1 + MG483__c/Aminoacylation_MG483_KM1)*(1 + ATP__c/Aminoacylation_MG483_KM2)*(1 + CYS__c/Aminoacylation_MG483_KM3)); Aminoacylation_MG483 is "Aminoacylation (MG483)";  // modifiers: MG_253_MONOMER__c
    Aminoacylation_MG483_KM1 = 1; Aminoacylation_MG483_KM2 = 1; Aminoacylation_MG483_KM3 = 1;
  Aminoacylation_MG484: MG484__c + ATP__c + PRO__c => MG484_aa__c + AMP__c + PPI__c; k_tRnaAa_MG484*MG484__c*ATP__c*PRO__c*MG_283_DIMER__c/((1 + MG484__c/Aminoacylation_MG484_KM1)*(1 + ATP__c/Aminoacylation_MG484_KM2)*(1 + PRO__c/Aminoacylation_MG484_KM3)); Aminoacylation_MG484 is "Aminoacylation (MG484)";  // modifiers: MG_283_DIMER__c
    Aminoacylation_MG484_KM1 = 1; Aminoacylation_MG484_KM2 = 1; Aminoacylation_MG484_KM3 = 1;
  Aminoacylation_MG485: MG485__c + ATP__c + MET__c => MG485_aa__c + AMP__c + PPI__c; k_tRnaAa_MG485*MG485__c*ATP__c*MET__c*MG_021_DIMER__c/((1 + MG485__c/Aminoacylation_MG485_KM1)*(1 + ATP__c/Aminoacylation_MG485_KM2)*(1 + MET__c/Aminoacylation_MG485_KM3)); Aminoacylation_MG485 is "Aminoacylation (MG485)";  // modifiers: MG_021_DIMER__c
    Aminoacylation_MG485_KM1 = 1; Aminoacylation_MG485_KM2 = 1; Aminoacylation_MG485_KM3 = 1;
  Aminoacylation_MG486: MG486__c + ATP__c + ILE__c => MG486_aa__c + AMP__c + PPI__c; k_tRnaAa_MG486*MG486__c*ATP__c*ILE__c*MG_345_MONOMER__c/((1 + MG486__c/Aminoacylation_MG486_KM1)*(1 + ATP__c/Aminoacylation_MG486_KM2)*(1 + ILE__c/Aminoacylation_MG486_KM3)); Aminoacylation_MG486 is "Aminoacylation (MG486)";  // modifiers: MG_345_MONOMER__c
    Aminoacylation_MG486_KM1 = 1; Aminoacylation_MG486_KM2 = 1; Aminoacylation_MG486_KM3 = 1;
  Aminoacylation_MG487: MG487__c + ATP__c + SER__c => MG487_aa__c + AMP__c + PPI__c; k_tRnaAa_MG487*MG487__c*ATP__c*SER__c*MG_005_DIMER__c/((1 + MG487__c/Aminoacylation_MG487_KM1)*(1 + ATP__c/Aminoacylation_MG487_KM2)*(1 + SER__c/Aminoacylation_MG487_KM3)); Aminoacylation_MG487 is "Aminoacylation (MG487)";  // modifiers: MG_005_DIMER__c
    Aminoacylation_MG487_KM1 = 1; Aminoacylation_MG487_KM2 = 1; Aminoacylation_MG487_KM3 = 1;
  Aminoacylation_MG488: MG488__c + ATP__c + FTHF10__c + MET__c => MG488_aa__c + AMP__c + PPI__c + THF__c; k_tRnaAa_MG488*MG488__c*ATP__c*FTHF10__c*MET__c*MG_365_MONOMER__c*MG_021_DIMER__c/((1 + MG488__c/Aminoacylation_MG488_KM1)*(1 + ATP__c/Aminoacylation_MG488_KM2)*(1 + FTHF10__c/Aminoacylation_MG488_KM3)*(1 + MET__c/Aminoacylation_MG488_KM4)); Aminoacylation_MG488 is "Aminoacylation (MG488)";  // modifiers: MG_365_MONOMER__c, MG_021_DIMER__c
    Aminoacylation_MG488_KM1 = 1; Aminoacylation_MG488_KM2 = 1; Aminoacylation_MG488_KM3 = 1; Aminoacylation_MG488_KM4 = 1;
  Aminoacylation_MG489: MG489__c + ASP__c + ATP__c => MG489_aa__c + AMP__c + PPI__c; k_tRnaAa_MG489*MG489__c*ASP__c*ATP__c*MG_036_DIMER__c/((1 + MG489__c/Aminoacylation_MG489_KM1)*(1 + ASP__c/Aminoacylation_MG489_KM2)*(1 + ATP__c/Aminoacylation_MG489_KM3)); Aminoacylation_MG489 is "Aminoacylation (MG489)";  // modifiers: MG_036_DIMER__c
    Aminoacylation_MG489_KM1 = 1; Aminoacylation_MG489_KM2 = 1; Aminoacylation_MG489_KM3 = 1;
  Aminoacylation_MG490: MG490__c + ATP__c + PHE__c => MG490_aa__c + AMP__c + PPI__c; k_tRnaAa_MG490*MG490__c*ATP__c*PHE__c*MG_194_195_TETRAMER__c/((1 + MG490__c/Aminoacylation_MG490_KM1)*(1 + ATP__c/Aminoacylation_MG490_KM2)*(1 + PHE__c/Aminoacylation_MG490_KM3)); Aminoacylation_MG490 is "Aminoacylation (MG490)";  // modifiers: MG_194_195_TETRAMER__c
    Aminoacylation_MG490_KM1 = 1; Aminoacylation_MG490_KM2 = 1; Aminoacylation_MG490_KM3 = 1;
  Aminoacylation_MG492: MG492__c + ARG__c + ATP__c => MG492_aa__c + AMP__c + PPI__c; k_tRnaAa_MG492*MG492__c*ARG__c*ATP__c*MG_378_MONOMER__c/((1 + MG492__c/Aminoacylation_MG492_KM1)*(1 + ARG__c/Aminoacylation_MG492_KM2)*(1 + ATP__c/Aminoacylation_MG492_KM3)); Aminoacylation_MG492 is "Aminoacylation (MG492)";  // modifiers: MG_378_MONOMER__c
    Aminoacylation_MG492_KM1 = 1; Aminoacylation_MG492_KM2 = 1; Aminoacylation_MG492_KM3 = 1;
  Aminoacylation_MG493: MG493__c + ATP__c + GLY__c => MG493_aa__c + AMP__c + PPI__c; k_tRnaAa_MG493*MG493__c*ATP__c*GLY__c*MG_251_DIMER__c/((1 + MG493__c/Aminoacylation_MG493_KM1)*(1 + ATP__c/Aminoacylation_MG493_KM2)*(1 + GLY__c/Aminoacylation_MG493_KM3)); Aminoacylation_MG493 is "Aminoacylation (MG493)";  // modifiers: MG_251_DIMER__c
    Aminoacylation_MG493_KM1 = 1; Aminoacylation_MG493_KM2 = 1; Aminoacylation_MG493_KM3 = 1;
  Aminoacylation_MG495: MG495__c + ARG__c + ATP__c => MG495_aa__c + AMP__c + PPI__c; k_tRnaAa_MG495*MG495__c*ARG__c*ATP__c*MG_378_MONOMER__c/((1 + MG495__c/Aminoacylation_MG495_KM1)*(1 + ARG__c/Aminoacylation_MG495_KM2)*(1 + ATP__c/Aminoacylation_MG495_KM3)); Aminoacylation_MG495 is "Aminoacylation (MG495)";  // modifiers: MG_378_MONOMER__c
    Aminoacylation_MG495_KM1 = 1; Aminoacylation_MG495_KM2 = 1; Aminoacylation_MG495_KM3 = 1;
  Aminoacylation_MG496: MG496__c + ATP__c + TRP__c => MG496_aa__c + AMP__c + PPI__c; k_tRnaAa_MG496*MG496__c*ATP__c*TRP__c*MG_126_DIMER__c/((1 + MG496__c/Aminoacylation_MG496_KM1)*(1 + ATP__c/Aminoacylation_MG496_KM2)*(1 + TRP__c/Aminoacylation_MG496_KM3)); Aminoacylation_MG496 is "Aminoacylation (MG496)";  // modifiers: MG_126_DIMER__c
    Aminoacylation_MG496_KM1 = 1; Aminoacylation_MG496_KM2 = 1; Aminoacylation_MG496_KM3 = 1;
  Aminoacylation_MG497: MG497__c + ARG__c + ATP__c => MG497_aa__c + AMP__c + PPI__c; k_tRnaAa_MG497*MG497__c*ARG__c*ATP__c*MG_378_MONOMER__c/((1 + MG497__c/Aminoacylation_MG497_KM1)*(1 + ARG__c/Aminoacylation_MG497_KM2)*(1 + ATP__c/Aminoacylation_MG497_KM3)); Aminoacylation_MG497 is "Aminoacylation (MG497)";  // modifiers: MG_378_MONOMER__c
    Aminoacylation_MG497_KM1 = 1; Aminoacylation_MG497_KM2 = 1; Aminoacylation_MG497_KM3 = 1;
  Aminoacylation_MG499: MG499__c + ATP__c + GLY__c => MG499_aa__c + AMP__c + PPI__c; k_tRnaAa_MG499*MG499__c*ATP__c*GLY__c*MG_251_DIMER__c/((1 + MG499__c/Aminoacylation_MG499_KM1)*(1 + ATP__c/Aminoacylation_MG499_KM2)*(1 + GLY__c/Aminoacylation_MG499_KM3)); Aminoacylation_MG499 is "Aminoacylation (MG499)";  // modifiers: MG_251_DIMER__c
    Aminoacylation_MG499_KM1 = 1; Aminoacylation_MG499_KM2 = 1; Aminoacylation_MG499_KM3 = 1;
  Aminoacylation_MG500: MG500__c + ATP__c + LEU__c => MG500_aa__c + AMP__c + PPI__c; k_tRnaAa_MG500*MG500__c*ATP__c*LEU__c*MG_266_MONOMER__c/((1 + MG500__c/Aminoacylation_MG500_KM1)*(1 + ATP__c/Aminoacylation_MG500_KM2)*(1 + LEU__c/Aminoacylation_MG500_KM3)); Aminoacylation_MG500 is "Aminoacylation (MG500)";  // modifiers: MG_266_MONOMER__c
    Aminoacylation_MG500_KM1 = 1; Aminoacylation_MG500_KM2 = 1; Aminoacylation_MG500_KM3 = 1;
  Aminoacylation_MG501: MG501__c + ATP__c + LYS__c => MG501_aa__c + AMP__c + PPI__c; k_tRnaAa_MG501*MG501__c*ATP__c*LYS__c*MG_136_DIMER__c/((1 + MG501__c/Aminoacylation_MG501_KM1)*(1 + ATP__c/Aminoacylation_MG501_KM2)*(1 + LYS__c/Aminoacylation_MG501_KM3)); Aminoacylation_MG501 is "Aminoacylation (MG501)";  // modifiers: MG_136_DIMER__c
    Aminoacylation_MG501_KM1 = 1; Aminoacylation_MG501_KM2 = 1; Aminoacylation_MG501_KM3 = 1;
  Aminoacylation_MG502: MG502__c + 2 ATP__c + H2O__c + GLN__c => MG502_aa__c + ADP__c + AMP__c + H__c + PI__c + PPI__c; k_tRnaAa_MG502*MG502__c*ATP__c*H2O__c*GLN__c*MG_462_MONOMER__c*MG_098_099_100_TRIMER__c/((1 + MG502__c/Aminoacylation_MG502_KM1)*(1 + ATP__c/Aminoacylation_MG502_KM2)*(1 + H2O__c/Aminoacylation_MG502_KM3)*(1 + GLN__c/Aminoacylation_MG502_KM4)); Aminoacylation_MG502 is "Aminoacylation (MG502)";  // modifiers: MG_462_MONOMER__c, MG_098_099_100_TRIMER__c
    Aminoacylation_MG502_KM1 = 1; Aminoacylation_MG502_KM2 = 1; Aminoacylation_MG502_KM3 = 1; Aminoacylation_MG502_KM4 = 1;
  Aminoacylation_MG503: MG503__c + ATP__c + TYR__c => MG503_aa__c + AMP__c + PPI__c; k_tRnaAa_MG503*MG503__c*ATP__c*TYR__c*MG_455_DIMER__c/((1 + MG503__c/Aminoacylation_MG503_KM1)*(1 + ATP__c/Aminoacylation_MG503_KM2)*(1 + TYR__c/Aminoacylation_MG503_KM3)); Aminoacylation_MG503 is "Aminoacylation (MG503)";  // modifiers: MG_455_DIMER__c
    Aminoacylation_MG503_KM1 = 1; Aminoacylation_MG503_KM2 = 1; Aminoacylation_MG503_KM3 = 1;
  Aminoacylation_MG504: MG504__c + ATP__c + TRP__c => MG504_aa__c + AMP__c + PPI__c; k_tRnaAa_MG504*MG504__c*ATP__c*TRP__c*MG_126_DIMER__c/((1 + MG504__c/Aminoacylation_MG504_KM1)*(1 + ATP__c/Aminoacylation_MG504_KM2)*(1 + TRP__c/Aminoacylation_MG504_KM3)); Aminoacylation_MG504 is "Aminoacylation (MG504)";  // modifiers: MG_126_DIMER__c
    Aminoacylation_MG504_KM1 = 1; Aminoacylation_MG504_KM2 = 1; Aminoacylation_MG504_KM3 = 1;
  Aminoacylation_MG506: MG506__c + ATP__c + SER__c => MG506_aa__c + AMP__c + PPI__c; k_tRnaAa_MG506*MG506__c*ATP__c*SER__c*MG_005_DIMER__c/((1 + MG506__c/Aminoacylation_MG506_KM1)*(1 + ATP__c/Aminoacylation_MG506_KM2)*(1 + SER__c/Aminoacylation_MG506_KM3)); Aminoacylation_MG506 is "Aminoacylation (MG506)";  // modifiers: MG_005_DIMER__c
    Aminoacylation_MG506_KM1 = 1; Aminoacylation_MG506_KM2 = 1; Aminoacylation_MG506_KM3 = 1;
  Aminoacylation_MG507: MG507__c + ATP__c + SER__c => MG507_aa__c + AMP__c + PPI__c; k_tRnaAa_MG507*MG507__c*ATP__c*SER__c*MG_005_DIMER__c/((1 + MG507__c/Aminoacylation_MG507_KM1)*(1 + ATP__c/Aminoacylation_MG507_KM2)*(1 + SER__c/Aminoacylation_MG507_KM3)); Aminoacylation_MG507 is "Aminoacylation (MG507)";  // modifiers: MG_005_DIMER__c
    Aminoacylation_MG507_KM1 = 1; Aminoacylation_MG507_KM2 = 1; Aminoacylation_MG507_KM3 = 1;
  Aminoacylation_MG508: MG508__c + ATP__c + LEU__c => MG508_aa__c + AMP__c + PPI__c; k_tRnaAa_MG508*MG508__c*ATP__c*LEU__c*MG_266_MONOMER__c/((1 + MG508__c/Aminoacylation_MG508_KM1)*(1 + ATP__c/Aminoacylation_MG508_KM2)*(1 + LEU__c/Aminoacylation_MG508_KM3)); Aminoacylation_MG508 is "Aminoacylation (MG508)";  // modifiers: MG_266_MONOMER__c
    Aminoacylation_MG508_KM1 = 1; Aminoacylation_MG508_KM2 = 1; Aminoacylation_MG508_KM3 = 1;
  Aminoacylation_MG509: MG509__c + ATP__c + LYS__c => MG509_aa__c + AMP__c + PPI__c; k_tRnaAa_MG509*MG509__c*ATP__c*LYS__c*MG_136_DIMER__c/((1 + MG509__c/Aminoacylation_MG509_KM1)*(1 + ATP__c/Aminoacylation_MG509_KM2)*(1 + LYS__c/Aminoacylation_MG509_KM3)); Aminoacylation_MG509 is "Aminoacylation (MG509)";  // modifiers: MG_136_DIMER__c
    Aminoacylation_MG509_KM1 = 1; Aminoacylation_MG509_KM2 = 1; Aminoacylation_MG509_KM3 = 1;
  Aminoacylation_MG510: MG510__c + ATP__c + THR__c => MG510_aa__c + AMP__c + PPI__c; k_tRnaAa_MG510*MG510__c*ATP__c*THR__c*MG_375_DIMER__c/((1 + MG510__c/Aminoacylation_MG510_KM1)*(1 + ATP__c/Aminoacylation_MG510_KM2)*(1 + THR__c/Aminoacylation_MG510_KM3)); Aminoacylation_MG510 is "Aminoacylation (MG510)";  // modifiers: MG_375_DIMER__c
    Aminoacylation_MG510_KM1 = 1; Aminoacylation_MG510_KM2 = 1; Aminoacylation_MG510_KM3 = 1;
  Aminoacylation_MG511: MG511__c + ATP__c + VAL__c => MG511_aa__c + AMP__c + PPI__c; k_tRnaAa_MG511*MG511__c*ATP__c*VAL__c*MG_334_MONOMER__c/((1 + MG511__c/Aminoacylation_MG511_KM1)*(1 + ATP__c/Aminoacylation_MG511_KM2)*(1 + VAL__c/Aminoacylation_MG511_KM3)); Aminoacylation_MG511 is "Aminoacylation (MG511)";  // modifiers: MG_334_MONOMER__c
    Aminoacylation_MG511_KM1 = 1; Aminoacylation_MG511_KM2 = 1; Aminoacylation_MG511_KM3 = 1;
  Aminoacylation_MG512: MG512__c + ATP__c + THR__c => MG512_aa__c + AMP__c + PPI__c; k_tRnaAa_MG512*MG512__c*ATP__c*THR__c*MG_375_DIMER__c/((1 + MG512__c/Aminoacylation_MG512_KM1)*(1 + ATP__c/Aminoacylation_MG512_KM2)*(1 + THR__c/Aminoacylation_MG512_KM3)); Aminoacylation_MG512 is "Aminoacylation (MG512)";  // modifiers: MG_375_DIMER__c
    Aminoacylation_MG512_KM1 = 1; Aminoacylation_MG512_KM2 = 1; Aminoacylation_MG512_KM3 = 1;
  Aminoacylation_MG513: MG513__c + ATP__c + GLU__c => MG513_aa__c + AMP__c + PPI__c; k_tRnaAa_MG513*MG513__c*ATP__c*GLU__c*MG_462_MONOMER__c/((1 + MG513__c/Aminoacylation_MG513_KM1)*(1 + ATP__c/Aminoacylation_MG513_KM2)*(1 + GLU__c/Aminoacylation_MG513_KM3)); Aminoacylation_MG513 is "Aminoacylation (MG513)";  // modifiers: MG_462_MONOMER__c
    Aminoacylation_MG513_KM1 = 1; Aminoacylation_MG513_KM2 = 1; Aminoacylation_MG513_KM3 = 1;
  Aminoacylation_MG514: MG514__c + ASN__c + ATP__c => MG514_aa__c + AMP__c + PPI__c; k_tRnaAa_MG514*MG514__c*ASN__c*ATP__c*MG_113_DIMER__c/((1 + MG514__c/Aminoacylation_MG514_KM1)*(1 + ASN__c/Aminoacylation_MG514_KM2)*(1 + ATP__c/Aminoacylation_MG514_KM3)); Aminoacylation_MG514 is "Aminoacylation (MG514)";  // modifiers: MG_113_DIMER__c
    Aminoacylation_MG514_KM1 = 1; Aminoacylation_MG514_KM2 = 1; Aminoacylation_MG514_KM3 = 1;
  Aminoacylation_MG518: MG518__c + ATP__c + HIS__c => MG518_aa__c + AMP__c + PPI__c; k_tRnaAa_MG518*MG518__c*ATP__c*HIS__c*MG_035_DIMER__c/((1 + MG518__c/Aminoacylation_MG518_KM1)*(1 + ATP__c/Aminoacylation_MG518_KM2)*(1 + HIS__c/Aminoacylation_MG518_KM3)); Aminoacylation_MG518 is "Aminoacylation (MG518)";  // modifiers: MG_035_DIMER__c
    Aminoacylation_MG518_KM1 = 1; Aminoacylation_MG518_KM2 = 1; Aminoacylation_MG518_KM3 = 1;
  Aminoacylation_MG519: MG519__c + ATP__c + LEU__c => MG519_aa__c + AMP__c + PPI__c; k_tRnaAa_MG519*MG519__c*ATP__c*LEU__c*MG_266_MONOMER__c/((1 + MG519__c/Aminoacylation_MG519_KM1)*(1 + ATP__c/Aminoacylation_MG519_KM2)*(1 + LEU__c/Aminoacylation_MG519_KM3)); Aminoacylation_MG519 is "Aminoacylation (MG519)";  // modifiers: MG_266_MONOMER__c
    Aminoacylation_MG519_KM1 = 1; Aminoacylation_MG519_KM2 = 1; Aminoacylation_MG519_KM3 = 1;
  Aminoacylation_MG520: MG520__c + ATP__c + LEU__c => MG520_aa__c + AMP__c + PPI__c; k_tRnaAa_MG520*MG520__c*ATP__c*LEU__c*MG_266_MONOMER__c/((1 + MG520__c/Aminoacylation_MG520_KM1)*(1 + ATP__c/Aminoacylation_MG520_KM2)*(1 + LEU__c/Aminoacylation_MG520_KM3)); Aminoacylation_MG520 is "Aminoacylation (MG520)";  // modifiers: MG_266_MONOMER__c
    Aminoacylation_MG520_KM1 = 1; Aminoacylation_MG520_KM2 = 1; Aminoacylation_MG520_KM3 = 1;
  Aminoacylation_MG523: MG523__c + ARG__c + ATP__c => MG523_aa__c + AMP__c + PPI__c; k_tRnaAa_MG523*MG523__c*ARG__c*ATP__c*MG_378_MONOMER__c/((1 + MG523__c/Aminoacylation_MG523_KM1)*(1 + ARG__c/Aminoacylation_MG523_KM2)*(1 + ATP__c/Aminoacylation_MG523_KM3)); Aminoacylation_MG523 is "Aminoacylation (MG523)";  // modifiers: MG_378_MONOMER__c
    Aminoacylation_MG523_KM1 = 1; Aminoacylation_MG523_KM2 = 1; Aminoacylation_MG523_KM3 = 1;
  Complexation_DNA_GYRASE: 2 MG_003_MONOMER__c + 2 MG_004_MONOMER__c => DNA_GYRASE__c; min2(MG_003_MONOMER__c/2, MG_004_MONOMER__c/2); Complexation_DNA_GYRASE is "Complexation (DNA gyrase)";
  Complexation_DNA_POLYMERASE_2CORE_BETA_CLAMP_GAMMA_COMPLEX_PRIMASE: 2 MG_001_MONOMER__c + MG_007_MONOMER__c + 2 MG_031_MONOMER__c + MG_250_MONOMER__c + 2 MG_261_MONOMER__c + MG_315_MONOMER__c + 4 MG_419_MONOMER__c => DNA_POLYMERASE_2CORE_BETA_CLAMP_GAMMA_COMPLEX_PRIMASE__c; min2(min2(min2(MG_001_MONOMER__c/2, min4(MG_007_MONOMER__c/1, MG_031_MONOMER__c/2, MG_250_MONOMER__c/1, MG_261_MONOMER__c/2)), MG_315_MONOMER__c/1), MG_419_MONOMER__c/4); Complexation_DNA_POLYMERASE_2CORE_BETA_CLAMP_GAMMA_COMPLEX_PRIMASE is "Complexation (DNA polymerase (2) core, XX-clamp, XXX-complex, and primase)";
  Complexation_DNA_POLYMERASE_CORE: MG_031_MONOMER__c + MG_261_MONOMER__c => DNA_POLYMERASE_CORE__c; min2(MG_031_MONOMER__c/1, MG_261_MONOMER__c/1); Complexation_DNA_POLYMERASE_CORE is "Complexation (DNA-directed DNA polymerase)";
  Complexation_DNA_POLYMERASE_CORE_BETA_CLAMP_GAMMA_COMPLEX: 2 MG_001_MONOMER__c + MG_007_MONOMER__c + MG_031_MONOMER__c + MG_261_MONOMER__c + MG_315_MONOMER__c + 4 MG_419_MONOMER__c => DNA_POLYMERASE_CORE_BETA_CLAMP_GAMMA_COMPLEX__c; min2(min2(MG_001_MONOMER__c/2, min4(MG_007_MONOMER__c/1, MG_031_MONOMER__c/1, MG_261_MONOMER__c/1, MG_315_MONOMER__c/1)), MG_419_MONOMER__c/4); Complexation_DNA_POLYMERASE_CORE_BETA_CLAMP_GAMMA_COMPLEX is "Complexation (DNA polymerase core, beta-clamp, and gamma-complex)";
  Complexation_DNA_POLYMERASE_CORE_BETA_CLAMP_PRIMASE: 2 MG_001_MONOMER__c + MG_031_MONOMER__c + MG_250_MONOMER__c + MG_261_MONOMER__c => DNA_POLYMERASE_CORE_BETA_CLAMP_PRIMASE__c; min2(min2(min2(MG_001_MONOMER__c/2, MG_031_MONOMER__c/1), MG_250_MONOMER__c/1), MG_261_MONOMER__c/1); Complexation_DNA_POLYMERASE_CORE_BETA_CLAMP_PRIMASE is "Complexation (DNA polymerase core, beta-clamp, and primase)";
  Complexation_DNA_POLYMERASE_GAMMA_COMPLEX: MG_007_MONOMER__c + MG_315_MONOMER__c + 4 MG_419_MONOMER__c => DNA_POLYMERASE_GAMMA_COMPLEX__c; min2(min2(MG_007_MONOMER__c/1, MG_315_MONOMER__c/1), MG_419_MONOMER__c/4); Complexation_DNA_POLYMERASE_GAMMA_COMPLEX is "Complexation (DNA-directed DNA polymerase gamma complex)";
  Complexation_DNA_POLYMERASE_HOLOENZYME: 2 MG_001_MONOMER__c + MG_007_MONOMER__c + 2 MG_031_MONOMER__c + 2 MG_261_MONOMER__c + MG_315_MONOMER__c + 4 MG_419_MONOMER__c => DNA_POLYMERASE_HOLOENZYME__c; min2(min2(MG_001_MONOMER__c/2, min4(MG_007_MONOMER__c/1, MG_031_MONOMER__c/2, MG_261_MONOMER__c/2, MG_315_MONOMER__c/1)), MG_419_MONOMER__c/4); Complexation_DNA_POLYMERASE_HOLOENZYME is "Complexation (DNA-directed DNA polymerase holoenzyme)";
  Complexation_MG_0001_048: MG_048_MONOMER__c + MG_0001__c => MG_0001_048__c; min2(MG_048_MONOMER__c/1, MG_0001__c/1); Complexation_MG_0001_048 is "Complexation (signal recognition particle)";
  Complexation_MG_0003_465: MG_465_MONOMER__c + MG_0003__c => MG_0003_465__c; min2(MG_465_MONOMER__c/1, MG_0003__c/1); Complexation_MG_0003_465 is "Complexation (ribonuclease P)";
  Complexation_MG_001_DIMER: 2 MG_001_MONOMER__c => MG_001_DIMER__c; MG_001_MONOMER__c/2; Complexation_MG_001_DIMER is "Complexation (DNA polymerase III, beta clamp)";
  Complexation_MG_005_DIMER: 2 MG_005_MONOMER__c => MG_005_DIMER__c; MG_005_MONOMER__c/2; Complexation_MG_005_DIMER is "Complexation (seryl-tRNA synthetase)";
  Complexation_MG_006_DIMER: 2 MG_006_MONOMER__c => MG_006_DIMER__c; MG_006_MONOMER__c/2; Complexation_MG_006_DIMER is "Complexation (thymidylate kinase)";
  Complexation_MG_008_379_TETRAMER: 2 MG_008_MONOMER__c + 2 MG_379_MONOMER__c => MG_008_379_TETRAMER__c; min2(MG_008_MONOMER__c/2, MG_379_MONOMER__c/2); Complexation_MG_008_379_TETRAMER is "Complexation (tRNA uridine 5-carboxymethylaminomethyl modification enzyme)";
  Complexation_MG_013_DIMER: 2 MG_013_MONOMER__c => MG_013_DIMER__c; MG_013_MONOMER__c/2; Complexation_MG_013_DIMER is "Complexation (methylenetetrahydrofolate dehydrogenase/methylenetetrahydrofolate cyclohydrolase)";
  Complexation_MG_014_015_DIMER: MG_014_MONOMER__m + MG_015_MONOMER__m => MG_014_015_DIMER__m; min2(MG_014_MONOMER__m/1, MG_015_MONOMER__m/1); Complexation_MG_014_015_DIMER is "Complexation (multidrug ABC transporter)";
  Complexation_MG_019_DIMER: 2 MG_019_MONOMER__c => MG_019_DIMER__c; MG_019_MONOMER__c/2; Complexation_MG_019_DIMER is "Complexation (chaperone protein DnaJ)";
  Complexation_MG_021_DIMER: 2 MG_021_MONOMER__c => MG_021_DIMER__c; MG_021_MONOMER__c/2; Complexation_MG_021_DIMER is "Complexation (methionyl-tRNA synthetase)";
  Complexation_MG_023_DIMER: 2 MG_023_MONOMER__c => MG_023_DIMER__c; MG_023_MONOMER__c/2; Complexation_MG_023_DIMER is "Complexation (fructose-1,6-bisphosphate aldolase, class II)";
  Complexation_MG_029_DIMER: 2 MG_029_MONOMER__c => MG_029_DIMER__c; MG_029_MONOMER__c/2; Complexation_MG_029_DIMER is "Complexation (DJ-1/PfpI family protein)";
  Complexation_MG_030_TRIMER: 3 MG_030_MONOMER__c => MG_030_TRIMER__c; MG_030_MONOMER__c/3; Complexation_MG_030_TRIMER is "Complexation (uracil phosphoribosyltransferase)";
  Complexation_MG_033_TETRAMER: 4 MG_033_MONOMER__m => MG_033_TETRAMER__m; MG_033_MONOMER__m/4; Complexation_MG_033_TETRAMER is "Complexation (glycerol uptake facilitator)";
  Complexation_MG_034_DIMER: 2 MG_034_MONOMER__c => MG_034_DIMER__c; MG_034_MONOMER__c/2; Complexation_MG_034_DIMER is "Complexation (thymidine kinase)";
  Complexation_MG_035_DIMER: 2 MG_035_MONOMER__c => MG_035_DIMER__c; MG_035_MONOMER__c/2; Complexation_MG_035_DIMER is "Complexation (histidyl-tRNA synthetase)";
  Complexation_MG_036_DIMER: 2 MG_036_MONOMER__c => MG_036_DIMER__c; MG_036_MONOMER__c/2; Complexation_MG_036_DIMER is "Complexation (aspartyl-tRNA synthetase)";
  Complexation_MG_038_TETRAMER: 4 MG_038_MONOMER__c => MG_038_TETRAMER__c; MG_038_MONOMER__c/4; Complexation_MG_038_TETRAMER is "Complexation (glycerol kinase)";
  Complexation_MG_039_DIMER: 2 MG_039_MONOMER__c => MG_039_DIMER__c; MG_039_MONOMER__c/2; Complexation_MG_039_DIMER is "Complexation (FAD-dependent glycerol-3-phosphate dehydrogenase, putative)";
  Complexation_MG_040_119_120_121_PENTAMER: MG_040_MONOMER__e + 2 MG_119_MONOMER__c + MG_120_MONOMER__m + MG_121_MONOMER__m => MG_040_119_120_121_PENTAMER__m; min2(min2(min2(MG_040_MONOMER__e/1, MG_119_MONOMER__c/2), MG_120_MONOMER__m/1), MG_121_MONOMER__m/1); Complexation_MG_040_119_120_121_PENTAMER is "Complexation (Monosaccharide (riboside/galactoside) ABC transporter)";
  Complexation_MG_041_062_429_PENTAMER: MG_041_MONOMER__c + 2 MG_062_MONOMER__m + 2 MG_429_MONOMER__c => MG_041_062_429_PENTAMER__m; min2(min2(MG_041_MONOMER__c/1, MG_062_MONOMER__m/2), MG_429_MONOMER__c/2); Complexation_MG_041_062_429_PENTAMER is "Complexation (PTS system, fructose-specific)";
  Complexation_MG_041_069_429_PENTAMER: MG_041_MONOMER__c + 2 MG_069_MONOMER__m + 2 MG_429_MONOMER__c => MG_041_069_429_PENTAMER__m; min2(min2(MG_041_MONOMER__c/1, MG_069_MONOMER__m/2), MG_429_MONOMER__c/2); Complexation_MG_041_069_429_PENTAMER is "Complexation (PTS system, glucose-specific)";
  Complexation_MG_042_043_044_045_PENTAMER: 2 MG_042_MONOMER__c + MG_043_MONOMER__m + MG_044_MONOMER__m + MG_045_MONOMER__e => MG_042_043_044_045_PENTAMER__m; min2(min2(min2(MG_042_MONOMER__c/2, MG_043_MONOMER__m/1), MG_044_MONOMER__m/1), MG_045_MONOMER__e/1); Complexation_MG_042_043_044_045_PENTAMER is "Complexation (spermidine/putrescine (polyamine) ABC transporter)";
  Complexation_MG_046_DIMER: 2 MG_046_MONOMER__c => MG_046_DIMER__c; MG_046_MONOMER__c/2; Complexation_MG_046_DIMER is "Complexation (metalloendopeptidase)";
  Complexation_MG_047_TETRAMER: 4 MG_047_MONOMER__c => MG_047_TETRAMER__c; MG_047_MONOMER__c/4; Complexation_MG_047_TETRAMER is "Complexation (S-adenosylmethionine synthetase)";
  Complexation_MG_049_HEXAMER: 6 MG_049_MONOMER__c => MG_049_HEXAMER__c; MG_049_MONOMER__c/6; Complexation_MG_049_HEXAMER is "Complexation (purine nucleoside phosphorylase)";
  Complexation_MG_051_DIMER: 2 MG_051_MONOMER__c => MG_051_DIMER__c; MG_051_MONOMER__c/2; Complexation_MG_051_DIMER is "Complexation (pyrimidine-nucleoside phosphorylase)";
  Complexation_MG_052_DIMER: 2 MG_052_MONOMER__c => MG_052_DIMER__c; MG_052_MONOMER__c/2; Complexation_MG_052_DIMER is "Complexation (cytidine deaminase)";
  Complexation_MG_053_TRIMER: 3 MG_053_MONOMER__c => MG_053_TRIMER__c; MG_053_MONOMER__c/3; Complexation_MG_053_TRIMER is "Complexation (phosphoglucomutase/phosphomannomutase, putative)";
  Complexation_MG_055_170_277_464_476_20MER: 4 MG_055_MONOMER__m + 4 MG_476_MONOMER__m + 4 MG_170_MONOMER__m + 4 MG_277_MONOMER__m + 4 MG_464_MONOMER__m => MG_055_170_277_464_476_20MER__m; min2(min2(min2(min2(MG_055_MONOMER__m/4, MG_476_MONOMER__m/4), MG_170_MONOMER__m/4), MG_277_MONOMER__m/4), MG_464_MONOMER__m/4); Complexation_MG_055_170_277_464_476_20MER is "Complexation (preprotein translocase)";
  Complexation_MG_058_HEXAMER: 6 MG_058_MONOMER__c => MG_058_HEXAMER__c; MG_058_MONOMER__c/6; Complexation_MG_058_HEXAMER is "Complexation (ribose-phosphate pyrophosphokinase)";
  Complexation_MG_063_DIMER: 2 MG_063_MONOMER__c => MG_063_DIMER__c; MG_063_MONOMER__c/2; Complexation_MG_063_DIMER is "Complexation (1-phosphofructokinase, putative)";
  Complexation_MG_064_065_TETRAMER: 2 MG_064_MONOMER__m + 2 MG_065_MONOMER__c => MG_064_065_TETRAMER__m; min2(MG_064_MONOMER__m/2, MG_065_MONOMER__c/2); Complexation_MG_064_065_TETRAMER is "Complexation (ABC transporter)";
  Complexation_MG_066_DIMER: 2 MG_066_MONOMER__c => MG_066_DIMER__c; MG_066_MONOMER__c/2; Complexation_MG_066_DIMER is "Complexation (transketolase)";
  Complexation_MG_072_DIMER: 2 MG_072_MONOMER__c => MG_072_DIMER__c; MG_072_MONOMER__c/2; Complexation_MG_072_DIMER is "Complexation (preprotein translocase, SecA subunit)";
  Complexation_MG_073_206_421_TETRAMER: MG_073_MONOMER__c + MG_206_MONOMER__c + 2 MG_421_MONOMER__c => MG_073_206_421_TETRAMER__c; min2(min2(MG_073_MONOMER__c/1, MG_206_MONOMER__c/1), MG_421_MONOMER__c/2); Complexation_MG_073_206_421_TETRAMER is "Complexation (DNA incision complex)";
  Complexation_MG_077_078_079_080_321_PENTAMER: MG_077_MONOMER__m + MG_078_MONOMER__m + MG_079_MONOMER__c + MG_080_MONOMER__c + MG_321_MONOMER__e => MG_077_078_079_080_321_PENTAMER__m; min2(min2(min2(min2(MG_077_MONOMER__m/1, MG_078_MONOMER__m/1), MG_079_MONOMER__c/1), MG_080_MONOMER__c/1), MG_321_MONOMER__e/1); Complexation_MG_077_078_079_080_321_PENTAMER is "Complexation (oligopeptide ABC transporter)";
  Complexation_MG_084_TETRAMER: 4 MG_084_MONOMER__c => MG_084_TETRAMER__c; MG_084_MONOMER__c/4; Complexation_MG_084_TETRAMER is "Complexation (tRNA(Ile)-lysidine synthetase)";
  Complexation_MG_085_HEXAMER: 6 MG_085_MONOMER__c => MG_085_HEXAMER__c; MG_085_MONOMER__c/6; Complexation_MG_085_HEXAMER is "Complexation (HPr(Ser) kinase/phosphatase)";
  Complexation_MG_089_DIMER: 2 MG_089_MONOMER__c => MG_089_DIMER__c; MG_089_MONOMER__c/2; Complexation_MG_089_DIMER is "Complexation (translation elongation factor G)";
  Complexation_MG_091_OCTAMER: 8 MG_091_MONOMER__c => MG_091_OCTAMER__c; MG_091_MONOMER__c/8; Complexation_MG_091_OCTAMER is "Complexation (single-strand binding protein family, octamer)";
  Complexation_MG_091_TETRAMER: 4 MG_091_MONOMER__c => MG_091_TETRAMER__c; MG_091_MONOMER__c/4; Complexation_MG_091_TETRAMER is "Complexation (single-strand binding protein family, tetramer)";
  Complexation_MG_094_HEXAMER: 6 MG_094_MONOMER__c => MG_094_HEXAMER__c; MG_094_MONOMER__c/6; Complexation_MG_094_HEXAMER is "Complexation (replicative DNA helicase)";
  Complexation_MG_098_099_100_TRIMER: MG_098_MONOMER__c + MG_099_MONOMER__c + MG_100_MONOMER__c => MG_098_099_100_TRIMER__c; min2(min2(MG_098_MONOMER__c/1, MG_099_MONOMER__c/1), MG_100_MONOMER__c/1); Complexation_MG_098_099_100_TRIMER is "Complexation (glutamyl-tRNA(Gln) and/or aspartyl-tRNA(Asn) amidotransferase)";
  Complexation_MG_102_DIMER: 2 MG_102_MONOMER__c => MG_102_DIMER__c; MG_102_MONOMER__c/2; Complexation_MG_102_DIMER is "Complexation (thioredoxin-disulfide reductase)";
  Complexation_MG_102_DIMER_ox: 2 MG_102_MONOMER__c => MG_102_DIMER_ox__c; MG_102_MONOMER__c/2; Complexation_MG_102_DIMER_ox is "Complexation (oxidized thioredoxin-disulfide reductase)";
  Complexation_MG_105_OCTAMER: 8 MG_105_MONOMER__c => MG_105_OCTAMER__c; MG_105_MONOMER__c/8; Complexation_MG_105_OCTAMER is "Complexation (putative DNA integrity scanning protein)";
  Complexation_MG_106_DIMER: 2 MG_106_MONOMER__c => MG_106_DIMER__c; MG_106_MONOMER__c/2; Complexation_MG_106_DIMER is "Complexation (peptide deformylase)";
  Complexation_MG_107_DIMER: 2 MG_107_MONOMER__c => MG_107_DIMER__c; MG_107_MONOMER__c/2; Complexation_MG_107_DIMER is "Complexation (guanylate kinase)";
  Complexation_MG_109_DIMER: 2 MG_109_MONOMER__m => MG_109_DIMER__m; MG_109_MONOMER__m/2; Complexation_MG_109_DIMER is "Complexation (serine/threonine protein kinase, putative)";
  Complexation_MG_111_DIMER: 2 MG_111_MONOMER__c => MG_111_DIMER__c; MG_111_MONOMER__c/2; Complexation_MG_111_DIMER is "Complexation (glucose-6-phosphate isomerase)";
  Complexation_MG_112_DIMER: 2 MG_112_MONOMER__c => MG_112_DIMER__c; MG_112_MONOMER__c/2; Complexation_MG_112_DIMER is "Complexation (ribulose-phosphate 3-epimerase)";
  Complexation_MG_113_DIMER: 2 MG_113_MONOMER__c => MG_113_DIMER__c; MG_113_MONOMER__c/2; Complexation_MG_113_DIMER is "Complexation (asparaginyl-tRNA synthetase)";
  Complexation_MG_114_DIMER: 2 MG_114_MONOMER__m => MG_114_DIMER__m; MG_114_MONOMER__m/2; Complexation_MG_114_DIMER is "Complexation (CDP-diacylglycerol--glycerol-3-phosphate 3-phosphatidyltransferase)";
  Complexation_MG_118_DIMER: 2 MG_118_MONOMER__c => MG_118_DIMER__c; MG_118_MONOMER__c/2; Complexation_MG_118_DIMER is "Complexation (UDP-glucose 4-epimerase)";
  Complexation_MG_123_DIMER: 2 MG_123_MONOMER__m => MG_123_DIMER__m; MG_123_MONOMER__m/2; Complexation_MG_123_DIMER is "Complexation (arginine deaminase)";
  Complexation_MG_124_MONOMER_ox: MG_124_MONOMER__c => MG_124_MONOMER_ox__c; MG_124_MONOMER__c/1; Complexation_MG_124_MONOMER_ox is "Complexation (oxidized thioredoxin)";
  Complexation_MG_126_DIMER: 2 MG_126_MONOMER__c => MG_126_DIMER__c; MG_126_MONOMER__c/2; Complexation_MG_126_DIMER is "Complexation (tryptophanyl-tRNA synthetase)";
  Complexation_MG_127_MONOMER_ox: MG_127_MONOMER__c => MG_127_MONOMER_ox__c; MG_127_MONOMER__c/1; Complexation_MG_127_MONOMER_ox is "Complexation (oxidized Spx subfamily protein)";
  Complexation_MG_128_HEXAMER: 6 MG_128_MONOMER__c => MG_128_HEXAMER__c; MG_128_MONOMER__c/6; Complexation_MG_128_HEXAMER is "Complexation (inorganic polyphosphate/ATP-NAD kinase, probable)";
  Complexation_MG_132_DIMER: 2 MG_132_MONOMER__c => MG_132_DIMER__c; MG_132_MONOMER__c/2; Complexation_MG_132_DIMER is "Complexation (purine nucleoside phosphoramidase)";
  Complexation_MG_136_DIMER: 2 MG_136_MONOMER__c => MG_136_DIMER__c; MG_136_MONOMER__c/2; Complexation_MG_136_DIMER is "Complexation (lysyl-tRNA synthetase)";
  Complexation_MG_137_DIMER: 2 MG_137_MONOMER__c => MG_137_DIMER__c; MG_137_MONOMER__c/2; Complexation_MG_137_DIMER is "Complexation (UDP-galactopyranose mutase)";
  Complexation_MG_139_DIMER: 2 MG_139_MONOMER__c => MG_139_DIMER__c; MG_139_MONOMER__c/2; Complexation_MG_139_DIMER is "Complexation (ribonuclease J)";
  Complexation_MG_179_180_181_TETRAMER: MG_179_MONOMER__c + MG_180_MONOMER__c + 2 MG_181_MONOMER__m => MG_179_180_181_TETRAMER__m; min2(min2(MG_179_MONOMER__c/1, MG_180_MONOMER__c/1), MG_181_MONOMER__m/2); Complexation_MG_179_180_181_TETRAMER is "Complexation (metal ion (cobalt) ABC transporter)";
  Complexation_MG_182_DIMER: 2 MG_182_MONOMER__c => MG_182_DIMER__c; MG_182_MONOMER__c/2; Complexation_MG_182_DIMER is "Complexation (Pseudouridylate synthase)";
  Complexation_MG_184_DIMER: 2 MG_184_MONOMER__c => MG_184_DIMER__c; MG_184_MONOMER__c/2; Complexation_MG_184_DIMER is "Complexation (adenine-specific DNA modification methylase)";
  Complexation_MG_186_187_188_189_PENTAMER: 2 MG_186_MONOMER__e + MG_187_MONOMER__c + MG_188_MONOMER__m + MG_189_MONOMER__m => MG_186_187_188_189_PENTAMER__m; min2(min2(min2(MG_186_MONOMER__e/2, MG_187_MONOMER__c/1), MG_188_MONOMER__m/1), MG_189_MONOMER__m/1); Complexation_MG_186_187_188_189_PENTAMER is "Complexation (Oligosaccharide or polyol ABC transporter)";
  Complexation_MG_194_195_TETRAMER: 2 MG_194_MONOMER__c + 2 MG_195_MONOMER__c => MG_194_195_TETRAMER__c; min2(MG_194_MONOMER__c/2, MG_195_MONOMER__c/2); Complexation_MG_194_195_TETRAMER is "Complexation (phenylalanyl-tRNA synthetase)";
  Complexation_MG_201_DIMER: 2 MG_201_MONOMER__c => MG_201_DIMER__c; MG_201_MONOMER__c/2; Complexation_MG_201_DIMER is "Complexation (co-chaperone GrpE)";
  Complexation_MG_203_204_TETRAMER: 2 MG_203_MONOMER__c + 2 MG_204_MONOMER__c => MG_203_204_TETRAMER__c; min2(MG_203_MONOMER__c/2, MG_204_MONOMER__c/2); Complexation_MG_203_204_TETRAMER is "Complexation (topoisomerase IV)";
  Complexation_MG_205_DIMER: 2 MG_205_MONOMER__c => MG_205_DIMER__c; MG_205_MONOMER__c/2; Complexation_MG_205_DIMER is "Complexation (heat-inducible transcription repressor HrcA, putative)";
  Complexation_MG_208_DIMER: 2 MG_208_MONOMER__c => MG_208_DIMER__c; MG_208_MONOMER__c/2; Complexation_MG_208_DIMER is "Complexation (glycoprotease family protein)";
  Complexation_MG_213_214_298_6MER: 2 MG_213_MONOMER__c + 2 MG_214_MONOMER__c + 2 MG_298_MONOMER__c => MG_213_214_298_6MER__c; min2(min2(MG_213_MONOMER__c/2, MG_214_MONOMER__c/2), MG_298_MONOMER__c/2); Complexation_MG_213_214_298_6MER is "Complexation (chromosome segregation protein SMC)";
  Complexation_MG_213_214_298_6MER_ADP: 2 MG_213_MONOMER__c + 2 MG_214_MONOMER__c + 2 MG_298_MONOMER__c => MG_213_214_298_6MER_ADP__c; min2(min2(MG_213_MONOMER__c/2, MG_214_MONOMER__c/2), MG_298_MONOMER__c/2); Complexation_MG_213_214_298_6MER_ADP is "Complexation (Chromosome Segregation Protein SMC with SCP Proteins-ADP)";
  Complexation_MG_215_TETRAMER: 4 MG_215_MONOMER__c => MG_215_TETRAMER__c; MG_215_MONOMER__c/4; Complexation_MG_215_TETRAMER is "Complexation (6-phosphofructokinase)";
  Complexation_MG_216_TETRAMER: 4 MG_216_MONOMER__c => MG_216_TETRAMER__c; MG_216_MONOMER__c/4; Complexation_MG_216_TETRAMER is "Complexation (pyruvate kinase)";
  Complexation_MG_221_OCTAMER: 8 MG_221_MONOMER__c => MG_221_OCTAMER__c; MG_221_MONOMER__c/8; Complexation_MG_221_OCTAMER is "Complexation (mraZ protein)";
  Complexation_MG_224_2MER_GTP: 2 MG_224_MONOMER__c => MG_224_2MER_GTP__c; MG_224_MONOMER__c/2; Complexation_MG_224_2MER_GTP is "Complexation (cell division protein ftsZ activated 2mer)";
  Complexation_MG_224_3MER_GTP: 3 MG_224_MONOMER__c => MG_224_3MER_GTP__c; MG_224_MONOMER__c/3; Complexation_MG_224_3MER_GTP is "Complexation (cell division protein ftsZ activated 3mer)";
  Complexation_MG_224_4MER_GTP: 4 MG_224_MONOMER__c => MG_224_4MER_GTP__c; MG_224_MONOMER__c/4; Complexation_MG_224_4MER_GTP is "Complexation (cell division protein ftsZ activated 4mer)";
  Complexation_MG_224_5MER_GTP: 5 MG_224_MONOMER__c => MG_224_5MER_GTP__c; MG_224_MONOMER__c/5; Complexation_MG_224_5MER_GTP is "Complexation (cell division protein ftsZ activated 5mer)";
  Complexation_MG_224_6MER_GTP: 6 MG_224_MONOMER__c => MG_224_6MER_GTP__c; MG_224_MONOMER__c/6; Complexation_MG_224_6MER_GTP is "Complexation (cell division protein ftsZ activated 6mer)";
  Complexation_MG_224_7MER_GTP: 7 MG_224_MONOMER__c => MG_224_7MER_GTP__c; MG_224_MONOMER__c/7; Complexation_MG_224_7MER_GTP is "Complexation (cell division protein ftsZ activated 7mer)";
  Complexation_MG_224_8MER_GTP: 8 MG_224_MONOMER__c => MG_224_8MER_GTP__c; MG_224_MONOMER__c/8; Complexation_MG_224_8MER_GTP is "Complexation (cell division protein ftsZ activated 8mer)";
  Complexation_MG_224_9MER_GDP: 9 MG_224_MONOMER__c => MG_224_9MER_GDP__c; MG_224_MONOMER__c/9; Complexation_MG_224_9MER_GDP is "Complexation (cell division protein ftsZ deactivated 9mer)";
  Complexation_MG_224_9MER_GTP: 9 MG_224_MONOMER__c => MG_224_9MER_GTP__c; MG_224_MONOMER__c/9; Complexation_MG_224_9MER_GTP is "Complexation (cell division protein ftsZ activated 9mer)";
  Complexation_MG_224_MONOMER_GDP: MG_224_MONOMER__c => MG_224_MONOMER_GDP__c; MG_224_MONOMER__c/1; Complexation_MG_224_MONOMER_GDP is "Complexation (cell division protein ftsZ hydrolysed)";
  Complexation_MG_224_MONOMER_GTP: MG_224_MONOMER__c => MG_224_MONOMER_GTP__c; MG_224_MONOMER__c/1; Complexation_MG_224_MONOMER_GTP is "Complexation (cell division protein ftsZ activated)";
  Complexation_MG_225_DIMER: 2 MG_225_MONOMER__m => MG_225_DIMER__m; MG_225_MONOMER__m/2; Complexation_MG_225_DIMER is "Complexation (amino acid transporter)";
  Complexation_MG_226_DIMER: 2 MG_226_MONOMER__m => MG_226_DIMER__m; MG_226_MONOMER__m/2; Complexation_MG_226_DIMER is "Complexation (amino acid transporter)";
  Complexation_MG_227_DIMER: 2 MG_227_MONOMER__c => MG_227_DIMER__c; MG_227_MONOMER__c/2; Complexation_MG_227_DIMER is "Complexation (thymidylate synthase)";
  Complexation_MG_228_TETRAMER: 4 MG_228_MONOMER__c => MG_228_TETRAMER__c; MG_228_MONOMER__c/4; Complexation_MG_228_TETRAMER is "Complexation (dihydrofolate reductase)";
  Complexation_MG_229_231_TETRAMER: 2 MG_229_MONOMER__c + 2 MG_231_MONOMER__c => MG_229_231_TETRAMER__c; min2(MG_229_MONOMER__c/2, MG_231_MONOMER__c/2); Complexation_MG_229_231_TETRAMER is "Complexation (ribonucleoside-diphosphate reductase)";
  Complexation_MG_229_231_TETRAMER_ox: 2 MG_229_MONOMER__c + 2 MG_231_MONOMER__c => MG_229_231_TETRAMER_ox__c; min2(MG_229_MONOMER__c/2, MG_231_MONOMER__c/2); Complexation_MG_229_231_TETRAMER_ox is "Complexation (oxidized ribonucleoside-diphosphate reductase)";
  Complexation_MG_239_HEXAMER: 6 MG_239_MONOMER__c => MG_239_HEXAMER__c; MG_239_MONOMER__c/6; Complexation_MG_239_HEXAMER is "Complexation (ATP-dependent protease La)";
  Complexation_MG_240_HEXAMER: 6 MG_240_MONOMER__c => MG_240_HEXAMER__c; MG_240_MONOMER__c/6; Complexation_MG_240_HEXAMER is "Complexation (nicotinamide-nucleotide adenylyltransferase/conserved hypothetical protein)";
  Complexation_MG_244_DIMER: 2 MG_244_MONOMER__c => MG_244_DIMER__c; MG_244_MONOMER__c/2; Complexation_MG_244_DIMER is "Complexation (3-5' helicase)";
  Complexation_MG_251_DIMER: 2 MG_251_MONOMER__c => MG_251_DIMER__c; MG_251_MONOMER__c/2; Complexation_MG_251_DIMER is "Complexation (glycyl-tRNA synthetase)";
  Complexation_MG_252_DIMER: 2 MG_252_MONOMER__c => MG_252_DIMER__c; MG_252_MONOMER__c/2; Complexation_MG_252_DIMER is "Complexation (23S rRNA methyltransferase)";
  Complexation_MG_259_TETRAMER: 4 MG_259_MONOMER__c => MG_259_TETRAMER__c; MG_259_MONOMER__c/4; Complexation_MG_259_TETRAMER is "Complexation (modification methylase)";
  Complexation_MG_265_DIMER: 2 MG_265_MONOMER__c => MG_265_DIMER__c; MG_265_MONOMER__c/2; Complexation_MG_265_DIMER is "Complexation (sugar phosphatase)";
  Complexation_MG_271_272_273_274_192MER: 12 MG_271_MONOMER__c + 60 MG_272_MONOMER__c + 60 MG_273_MONOMER__c + 60 MG_274_MONOMER__c => MG_271_272_273_274_192MER__c; min2(min2(min2(MG_271_MONOMER__c/12, MG_272_MONOMER__c/60), MG_273_MONOMER__c/60), MG_274_MONOMER__c/60); Complexation_MG_271_272_273_274_192MER is "Complexation (pyruvate dehydrogenase)";
  Complexation_MG_271_272_273_274_192MER_ox: 12 MG_271_MONOMER__c + 60 MG_272_MONOMER__c + 60 MG_273_MONOMER__c + 60 MG_274_MONOMER__c => MG_271_272_273_274_192MER_ox__c; min2(min2(min2(MG_271_MONOMER__c/12, MG_272_MONOMER__c/60), MG_273_MONOMER__c/60), MG_274_MONOMER__c/60); Complexation_MG_271_272_273_274_192MER_ox is "Complexation (oxidized dihydrolipoamide dehydrogenase)";
  Complexation_MG_275_TETRAMER: 4 MG_275_MONOMER__m => MG_275_TETRAMER__m; MG_275_MONOMER__m/4; Complexation_MG_275_TETRAMER is "Complexation (NADH oxidase)";
  Complexation_MG_276_DIMER: 2 MG_276_MONOMER__c => MG_276_DIMER__c; MG_276_MONOMER__c/2; Complexation_MG_276_DIMER is "Complexation (adenine phosphoribosyltransferase)";
  Complexation_MG_278_DIMER: 2 MG_278_MONOMER__c => MG_278_DIMER__c; MG_278_MONOMER__c/2; Complexation_MG_278_DIMER is "Complexation (GTP pyrophosphokinase)";
  Complexation_MG_283_DIMER: 2 MG_283_MONOMER__c => MG_283_DIMER__c; MG_283_MONOMER__c/2; Complexation_MG_283_DIMER is "Complexation (prolyl-tRNA synthetase)";
  Complexation_MG_287_MONOMER_ACP: MG_287_MONOMER__c => MG_287_MONOMER_ACP__c; MG_287_MONOMER__c/1; Complexation_MG_287_MONOMER_ACP is "Complexation (holo acyl carrier protein)";
  Complexation_MG_287_MONOMER_ddcaACP: MG_287_MONOMER__c => MG_287_MONOMER_ddcaACP__c; MG_287_MONOMER__c/1; Complexation_MG_287_MONOMER_ddcaACP is "Complexation (Dodecanoyl-ACP (n-C12:0ACP))";
  Complexation_MG_287_MONOMER_hdeACP: MG_287_MONOMER__c => MG_287_MONOMER_hdeACP__c; MG_287_MONOMER__c/1; Complexation_MG_287_MONOMER_hdeACP is "Complexation (cis-hexadec-9-enoyl-[acyl-carrier protein] (n-C16:1))";
  Complexation_MG_287_MONOMER_myrsACP: MG_287_MONOMER__c => MG_287_MONOMER_myrsACP__c; MG_287_MONOMER__c/1; Complexation_MG_287_MONOMER_myrsACP is "Complexation (Myristoyl-ACP (n-C14:0ACP))";
  Complexation_MG_287_MONOMER_ocdcaACP: MG_287_MONOMER__c => MG_287_MONOMER_ocdcaACP__c; MG_287_MONOMER__c/1; Complexation_MG_287_MONOMER_ocdcaACP is "Complexation (Octadecanoyl-ACP (n-C18:0ACP))";
  Complexation_MG_287_MONOMER_octeACP: MG_287_MONOMER__c => MG_287_MONOMER_octeACP__c; MG_287_MONOMER__c/1; Complexation_MG_287_MONOMER_octeACP is "Complexation (cis-octadec-11-enoyl-[acyl-carrier protein] (n-C18:1))";
  Complexation_MG_287_MONOMER_palmACP: MG_287_MONOMER__c => MG_287_MONOMER_palmACP__c; MG_287_MONOMER__c/1; Complexation_MG_287_MONOMER_palmACP is "Complexation (Palmitoyl-ACP (n-C16:0ACP))";
  Complexation_MG_287_MONOMER_tdeACP: MG_287_MONOMER__c => MG_287_MONOMER_tdeACP__c; MG_287_MONOMER__c/1; Complexation_MG_287_MONOMER_tdeACP is "Complexation (cis-tetradec-7-enoyl-[acyl-carrier protein] (n-C14:1))";
  Complexation_MG_289_290_291_PENTAMER: MG_289_MONOMER__e + 2 MG_290_MONOMER__c + 2 MG_291_MONOMER__m => MG_289_290_291_PENTAMER__m; min2(min2(MG_289_MONOMER__e/1, MG_290_MONOMER__c/2), MG_291_MONOMER__m/2); Complexation_MG_289_290_291_PENTAMER is "Complexation (phosphonate ABC transporter)";
  Complexation_MG_292_TETRAMER: 4 MG_292_MONOMER__c => MG_292_TETRAMER__c; MG_292_MONOMER__c/4; Complexation_MG_292_TETRAMER is "Complexation (alanyl-tRNA synthetase)";
  Complexation_MG_293_DIMER: 2 MG_293_MONOMER__c => MG_293_DIMER__c; MG_293_MONOMER__c/2; Complexation_MG_293_DIMER is "Complexation (glycerophosphoryl diester phosphodiesterase family protein)";
  Complexation_MG_295_MONOMER_ox: MG_295_MONOMER__c => MG_295_MONOMER_ox__c; MG_295_MONOMER__c/1; Complexation_MG_295_MONOMER_ox is "Complexation (oxidized tRNA U34 sulfurtransferase)";
  Complexation_MG_299_DIMER: 2 MG_299_MONOMER__c => MG_299_DIMER__c; MG_299_MONOMER__c/2; Complexation_MG_299_DIMER is "Complexation (phosphate acetyltransferase)";
  Complexation_MG_301_TETRAMER: 4 MG_301_MONOMER__c => MG_301_TETRAMER__c; MG_301_MONOMER__c/4; Complexation_MG_301_TETRAMER is "Complexation (glyceraldehyde-3-phosphate dehydrogenase, type I)";
  Complexation_MG_302_303_304_TETRAMER: 2 MG_302_MONOMER__m + MG_303_MONOMER__c + MG_304_MONOMER__c => MG_302_303_304_TETRAMER__m; min2(min2(MG_302_MONOMER__m/2, MG_303_MONOMER__c/1), MG_304_MONOMER__c/1); Complexation_MG_302_303_304_TETRAMER is "Complexation (metal ion (cobalt) ABC transporter)";
  Complexation_MG_316_DIMER: 2 MG_316_MONOMER__m => MG_316_DIMER__m; MG_316_MONOMER__m/2; Complexation_MG_316_DIMER is "Complexation (DNA internalization-related competence protein ComEC/Rec2)";
  Complexation_MG_322_323_TETRAMER: 2 MG_322_MONOMER__m + 2 MG_323_MONOMER__c => MG_322_323_TETRAMER__m; min2(MG_322_MONOMER__m/2, MG_323_MONOMER__c/2); Complexation_MG_322_323_TETRAMER is "Complexation (potassium uptake protein, TrkH family, putative)";
  Complexation_MG_333_DIMER: 2 MG_333_MONOMER__c => MG_333_DIMER__c; MG_333_MONOMER__c/2; Complexation_MG_333_DIMER is "Complexation (FMN-dependent NADH-azoreductase, putative)";
  Complexation_MG_336_DIMER: 2 MG_336_MONOMER__c => MG_336_DIMER__c; MG_336_MONOMER__c/2; Complexation_MG_336_DIMER is "Complexation (cysteine desulfurase)";
  Complexation_MG_346_DIMER: 2 MG_346_MONOMER__c => MG_346_DIMER__c; MG_346_MONOMER__c/2; Complexation_MG_346_DIMER is "Complexation (23S rRNA methyltransferase)";
  Complexation_MG_347_DIMER: 2 MG_347_MONOMER__c => MG_347_DIMER__c; MG_347_MONOMER__c/2; Complexation_MG_347_DIMER is "Complexation (tRNA (guanine-N(7)-)-methyltransferase)";
  Complexation_MG_349_HEXAMER: 6 MG_349_MONOMER__c => MG_349_HEXAMER__c; MG_349_MONOMER__c/6; Complexation_MG_349_HEXAMER is "Complexation (Replication initiation/membrane attachment protein)";
  Complexation_MG_351_HEXAMER: 6 MG_351_MONOMER__c => MG_351_HEXAMER__c; MG_351_MONOMER__c/6; Complexation_MG_351_HEXAMER is "Complexation (inorganic pyrophosphatase)";
  Complexation_MG_352_DIMER: 2 MG_352_MONOMER__c => MG_352_DIMER__c; MG_352_MONOMER__c/2; Complexation_MG_352_DIMER is "Complexation (Holliday junction endonuclease)";
  Complexation_MG_353_DIMER: 2 MG_353_MONOMER__c => MG_353_DIMER__c; MG_353_MONOMER__c/2; Complexation_MG_353_DIMER is "Complexation (DNA-binding protein HU, putative)";
  Complexation_MG_355_HEXAMER: 6 MG_355_MONOMER__c => MG_355_HEXAMER__c; MG_355_MONOMER__c/6; Complexation_MG_355_HEXAMER is "Complexation (ATP-dependent Clp protease, ATPase subunit)";
  Complexation_MG_357_DIMER: 2 MG_357_MONOMER__c => MG_357_DIMER__c; MG_357_MONOMER__c/2; Complexation_MG_357_DIMER is "Complexation (acetate kinase)";
  Complexation_MG_358_359_10MER: 4 MG_358_MONOMER__c + 6 MG_359_MONOMER__c => MG_358_359_10MER__c; min2(MG_358_MONOMER__c/4, MG_359_MONOMER__c/6); Complexation_MG_358_359_10MER is "Complexation (Holliday junction DNA helicase)";
  Complexation_MG_367_DIMER: 2 MG_367_MONOMER__c => MG_367_DIMER__c; MG_367_MONOMER__c/2; Complexation_MG_367_DIMER is "Complexation (ribonuclease III)";
  Complexation_MG_368_DIMER: 2 MG_368_MONOMER__c => MG_368_DIMER__c; MG_368_MONOMER__c/2; Complexation_MG_368_DIMER is "Complexation (fatty acid/phospholipid synthesis protein PlsX)";
  Complexation_MG_369_DIMER: 2 MG_369_MONOMER__c => MG_369_DIMER__c; MG_369_MONOMER__c/2; Complexation_MG_369_DIMER is "Complexation (DAK2 phosphatase domain protein)";
  Complexation_MG_372_DIMER: 2 MG_372_MONOMER__c => MG_372_DIMER__c; MG_372_MONOMER__c/2; Complexation_MG_372_DIMER is "Complexation (thiamine biosynthesis/tRNA modification protein ThiI)";
  Complexation_MG_375_DIMER: 2 MG_375_MONOMER__c => MG_375_DIMER__c; MG_375_MONOMER__c/2; Complexation_MG_375_DIMER is "Complexation (threonyl-tRNA synthetase)";
  Complexation_MG_376_HEXAMER: 6 MG_376_MONOMER__c => MG_376_HEXAMER__c; MG_376_MONOMER__c/6; Complexation_MG_376_HEXAMER is "Complexation ()";
  Complexation_MG_382_TETRAMER: 4 MG_382_MONOMER__c => MG_382_TETRAMER__c; MG_382_MONOMER__c/4; Complexation_MG_382_TETRAMER is "Complexation (uridine kinase)";
  Complexation_MG_383_DIMER: 2 MG_383_MONOMER__c => MG_383_DIMER__c; MG_383_MONOMER__c/2; Complexation_MG_383_DIMER is "Complexation (NH(3)-dependent NAD+ synthetase, putative)";
  Complexation_MG_385_DIMER: 2 MG_385_MONOMER__c => MG_385_DIMER__c; MG_385_MONOMER__c/2; Complexation_MG_385_DIMER is "Complexation (glycerophosphoryl diester phosphodiesterase family protein)";
  Complexation_MG_390_DIMER: 2 MG_390_MONOMER__m => MG_390_DIMER__m; MG_390_MONOMER__m/2; Complexation_MG_390_DIMER is "Complexation (toxin ABC transporter, ATP-binding/permease protein)";
  Complexation_MG_391_HEXAMER: 6 MG_391_MONOMER__c => MG_391_HEXAMER__c; MG_391_MONOMER__c/6; Complexation_MG_391_HEXAMER is "Complexation (cytosol aminopeptidase)";
  Complexation_MG_392_393_21MER: 14 MG_392_MONOMER__c + 7 MG_393_MONOMER__c => MG_392_393_21MER__c; min2(MG_392_MONOMER__c/14, MG_393_MONOMER__c/7); Complexation_MG_392_393_21MER is "Complexation (GroEL-GroES chaperonin complex)";
  Complexation_MG_394_TETRAMER: 4 MG_394_MONOMER__c => MG_394_TETRAMER__c; MG_394_MONOMER__c/4; Complexation_MG_394_TETRAMER is "Complexation (serine hydroxymethyltransferase)";
  Complexation_MG_396_DIMER: 2 MG_396_MONOMER__c => MG_396_DIMER__c; MG_396_MONOMER__c/2; Complexation_MG_396_DIMER is "Complexation (ribose 5-phosphate isomerase B)";
  Complexation_MG_398_399_400_401_402_403_404_405_22MER: MG_398_MONOMER__c + 3 MG_399_MONOMER__c + MG_400_MONOMER__c + 3 MG_401_MONOMER__c + MG_402_MONOMER__c + 2 MG_403_MONOMER__m + 10 MG_404_MONOMER__m + MG_405_MONOMER__m => MG_398_399_400_401_402_403_404_405_22MER__m; min2(min2(min2(min2(MG_398_MONOMER__c/1, min4(MG_399_MONOMER__c/3, MG_400_MONOMER__c/1, MG_401_MONOMER__c/3, MG_402_MONOMER__c/1)), MG_403_MONOMER__m/2), MG_404_MONOMER__m/10), MG_405_MONOMER__m/1); Complexation_MG_398_399_400_401_402_403_404_405_22MER is "Complexation (H(+)-transporting two-sector ATPase)";
  Complexation_MG_407_DIMER: 2 MG_407_MONOMER__c => MG_407_DIMER__c; MG_407_MONOMER__c/2; Complexation_MG_407_DIMER is "Complexation (enolase)";
  Complexation_MG_409_DIMER: 2 MG_409_MONOMER__c => MG_409_DIMER__c; MG_409_MONOMER__c/2; Complexation_MG_409_DIMER is "Complexation (phosphate transport system regulatory protein PhoU, putative)";
  Complexation_MG_410_411_412_PENTAMER: 2 MG_410_MONOMER__c + 2 MG_411_MONOMER__m + MG_412_MONOMER__e => MG_410_411_412_PENTAMER__m; min2(min2(MG_410_MONOMER__c/2, MG_411_MONOMER__m/2), MG_412_MONOMER__e/1); Complexation_MG_410_411_412_PENTAMER is "Complexation (phosphate ABC transporter)";
  Complexation_MG_425_DIMER: 2 MG_425_MONOMER__c => MG_425_DIMER__c; MG_425_MONOMER__c/2; Complexation_MG_425_DIMER is "Complexation (ATP-dependent RNA helicase)";
  Complexation_MG_427_DIMER: 2 MG_427_MONOMER__c => MG_427_DIMER__c; MG_427_MONOMER__c/2; Complexation_MG_427_DIMER is "Complexation (osmotically inducible peroxidase)";
  Complexation_MG_427_DIMER_ox: 2 MG_427_MONOMER__c => MG_427_DIMER_ox__c; MG_427_MONOMER__c/2; Complexation_MG_427_DIMER_ox is "Complexation (oxidized osmotically inducible peroxidase)";
  Complexation_MG_428_DIMER: 2 MG_428_MONOMER__c => MG_428_DIMER__c; MG_428_MONOMER__c/2; Complexation_MG_428_DIMER is "Complexation (LuxR bacterial regulatory protein, putative)";
  Complexation_MG_431_DIMER: 2 MG_431_MONOMER__c => MG_431_DIMER__c; MG_431_MONOMER__c/2; Complexation_MG_431_DIMER is "Complexation (triosephosphate isomerase)";
  Complexation_MG_433_DIMER: 2 MG_433_MONOMER__c => MG_433_DIMER__c; MG_433_MONOMER__c/2; Complexation_MG_433_DIMER is "Complexation (translation elongation factor Ts)";
  Complexation_MG_434_HEXAMER: 6 MG_434_MONOMER__c => MG_434_HEXAMER__c; MG_434_MONOMER__c/6; Complexation_MG_434_HEXAMER is "Complexation (uridylate kinase)";
  Complexation_MG_437_DIMER: 2 MG_437_MONOMER__m => MG_437_DIMER__m; MG_437_MONOMER__m/2; Complexation_MG_437_DIMER is "Complexation (phosphatidate cytidylyltransferase)";
  Complexation_MG_445_DIMER: 2 MG_445_MONOMER__c => MG_445_DIMER__c; MG_445_MONOMER__c/2; Complexation_MG_445_DIMER is "Complexation (tRNA (guanine-N1)-methyltransferase)";
  Complexation_MG_451_DIMER: 2 MG_451_MONOMER__c => MG_451_DIMER__c; MG_451_MONOMER__c/2; Complexation_MG_451_DIMER is "Complexation (translation elongation factor Tu)";
  Complexation_MG_453_TETRAMER: 4 MG_453_MONOMER__c => MG_453_TETRAMER__c; MG_453_MONOMER__c/4; Complexation_MG_453_TETRAMER is "Complexation (UTP-glucose-1-phosphate uridylyltransferase)";
  Complexation_MG_454_DIMER: 2 MG_454_MONOMER__c => MG_454_DIMER__c; MG_454_MONOMER__c/2; Complexation_MG_454_DIMER is "Complexation (thiol-dependent peroxidase)";
  Complexation_MG_454_DIMER_ox: 2 MG_454_MONOMER__c => MG_454_DIMER_ox__c; MG_454_MONOMER__c/2; Complexation_MG_454_DIMER_ox is "Complexation (oxidized thiol-dependent peroxidase)";
  Complexation_MG_455_DIMER: 2 MG_455_MONOMER__c => MG_455_DIMER__c; MG_455_MONOMER__c/2; Complexation_MG_455_DIMER is "Complexation (tyrosyl-tRNA synthetase)";
  Complexation_MG_457_HEXAMER: 6 MG_457_MONOMER__m => MG_457_HEXAMER__m; MG_457_MONOMER__m/6; Complexation_MG_457_HEXAMER is "Complexation (ATP-dependent metalloprotease FtsH)";
  Complexation_MG_458_TETRAMER: 4 MG_458_MONOMER__c => MG_458_TETRAMER__c; MG_458_MONOMER__c/4; Complexation_MG_458_TETRAMER is "Complexation (hypoxanthine phosphoribosyltransferase)";
  Complexation_MG_460_TETRAMER: 4 MG_460_MONOMER__c => MG_460_TETRAMER__c; MG_460_MONOMER__c/4; Complexation_MG_460_TETRAMER is "Complexation (L-lactate dehydrogenase/malate dehydrogenase)";
  Complexation_MG_467_468_526_TETRAMER: MG_467_MONOMER__c + 2 MG_468_MONOMER__m + MG_526_MONOMER__c => MG_467_468_526_TETRAMER__m; min2(min2(MG_467_MONOMER__c/1, MG_468_MONOMER__m/2), MG_526_MONOMER__c/1); Complexation_MG_467_468_526_TETRAMER is "Complexation (salivaricin A ABC transporter)";
  Complexation_MG_469_1MER_ADP: MG_469_MONOMER__c => MG_469_1MER_ADP__c; MG_469_MONOMER__c/1; Complexation_MG_469_1MER_ADP is "Complexation (DnaA-ADP)";
  Complexation_MG_469_1MER_ATP: MG_469_MONOMER__c => MG_469_1MER_ATP__c; MG_469_MONOMER__c/1; Complexation_MG_469_1MER_ATP is "Complexation (DnaA-ATP)";
  Complexation_MG_469_2MER_1ATP_ADP: 2 MG_469_MONOMER__c => MG_469_2MER_1ATP_ADP__c; MG_469_MONOMER__c/2; Complexation_MG_469_2MER_1ATP_ADP is "Complexation (DnaA 2mer-(1)ATP-(1)ADP)";
  Complexation_MG_469_2MER_ATP: 2 MG_469_MONOMER__c => MG_469_2MER_ATP__c; MG_469_MONOMER__c/2; Complexation_MG_469_2MER_ATP is "Complexation (DnaA-ATP 2mer)";
  Complexation_MG_469_3MER_2ATP_ADP: 3 MG_469_MONOMER__c => MG_469_3MER_2ATP_ADP__c; MG_469_MONOMER__c/3; Complexation_MG_469_3MER_2ATP_ADP is "Complexation (DnaA 3mer-(2)ATP-(1)ADP)";
  Complexation_MG_469_3MER_ATP: 3 MG_469_MONOMER__c => MG_469_3MER_ATP__c; MG_469_MONOMER__c/3; Complexation_MG_469_3MER_ATP is "Complexation (DnaA-ATP 3mer)";
  Complexation_MG_469_4MER_3ATP_ADP: 4 MG_469_MONOMER__c => MG_469_4MER_3ATP_ADP__c; MG_469_MONOMER__c/4; Complexation_MG_469_4MER_3ATP_ADP is "Complexation (DnaA 4mer-(3)ATP-(1)ADP)";
  Complexation_MG_469_4MER_ATP: 4 MG_469_MONOMER__c => MG_469_4MER_ATP__c; MG_469_MONOMER__c/4; Complexation_MG_469_4MER_ATP is "Complexation (DnaA-ATP 4mer)";
  Complexation_MG_469_5MER_4ATP_ADP: 5 MG_469_MONOMER__c => MG_469_5MER_4ATP_ADP__c; MG_469_MONOMER__c/5; Complexation_MG_469_5MER_4ATP_ADP is "Complexation (DnaA 5mer-(4)ATP-(1)ADP)";
  Complexation_MG_469_5MER_ATP: 5 MG_469_MONOMER__c => MG_469_5MER_ATP__c; MG_469_MONOMER__c/5; Complexation_MG_469_5MER_ATP is "Complexation (DnaA-ATP 5mer)";
  Complexation_MG_469_6MER_5ATP_ADP: 6 MG_469_MONOMER__c => MG_469_6MER_5ATP_ADP__c; MG_469_MONOMER__c/6; Complexation_MG_469_6MER_5ATP_ADP is "Complexation (DnaA 6mer-(5)ATP-(1)ADP)";
  Complexation_MG_469_6MER_ATP: 6 MG_469_MONOMER__c => MG_469_6MER_ATP__c; MG_469_MONOMER__c/6; Complexation_MG_469_6MER_ATP is "Complexation (DnaA-ATP 6mer)";
  Complexation_MG_469_7MER_6ATP_ADP: 7 MG_469_MONOMER__c => MG_469_7MER_6ATP_ADP__c; MG_469_MONOMER__c/7; Complexation_MG_469_7MER_6ATP_ADP is "Complexation (DnaA 7mer-(6)ATP-(1)ADP)";
  Complexation_MG_469_7MER_ATP: 7 MG_469_MONOMER__c => MG_469_7MER_ATP__c; MG_469_MONOMER__c/7; Complexation_MG_469_7MER_ATP is "Complexation (DnaA-ATP 7mer)";
  Complexation_MG_482_DIMER: 2 MG_482_MONOMER__c => MG_482_DIMER__c; MG_482_MONOMER__c/2; Complexation_MG_482_DIMER is "Complexation (holo-(acyl-carrier-protein) synthase)";
  Complexation_REPLISOME: 4 MG_001_MONOMER__c + MG_007_MONOMER__c + 2 MG_031_MONOMER__c + 6 MG_094_MONOMER__c + MG_250_MONOMER__c + 2 MG_261_MONOMER__c + MG_315_MONOMER__c + 4 MG_419_MONOMER__c => REPLISOME__c; min2(min2(min2(min2(MG_001_MONOMER__c/4, min4(MG_007_MONOMER__c/1, MG_031_MONOMER__c/2, MG_094_MONOMER__c/6, MG_250_MONOMER__c/1)), MG_261_MONOMER__c/2), MG_315_MONOMER__c/1), MG_419_MONOMER__c/4); Complexation_REPLISOME is "Complexation (Replisome)";
  Complexation_RIBOSOME_30S: MG_070_MONOMER__c + MG_087_MONOMER__c + MG_088_MONOMER__c + MG_090_MONOMER__c + MG_092_MONOMER__c + MG_150_MONOMER__c + MG_155_MONOMER__c + MG_157_MONOMER__c + MG_160_MONOMER__c + MG_164_MONOMER__c + MG_165_MONOMER__c + MG_168_MONOMER__c + MG_175_MONOMER__c + MG_176_MONOMER__c + MG_481_MONOMER__c + MG_311_MONOMER__c + MG_522_MONOMER__c + MG_417_MONOMER__c + MG_424_MONOMER__c + MG_446_MONOMER__c + MGrrnA16S__c => RIBOSOME_30S__c; min2(MG_070_MONOMER__c/1, min4(MG_087_MONOMER__c/1, MG_088_MONOMER__c/1, MG_090_MONOMER__c/1, MG_092_MONOMER__c/1)); Complexation_RIBOSOME_30S is "Complexation (30S ribosomal subunit)";
  Complexation_RIBOSOME_30S_IF3: MG_070_MONOMER__c + MG_087_MONOMER__c + MG_088_MONOMER__c + MG_090_MONOMER__c + MG_092_MONOMER__c + MG_150_MONOMER__c + MG_155_MONOMER__c + MG_157_MONOMER__c + MG_160_MONOMER__c + MG_164_MONOMER__c + MG_165_MONOMER__c + MG_168_MONOMER__c + MG_175_MONOMER__c + MG_176_MONOMER__c + MG_196_MONOMER__c + MG_481_MONOMER__c + MG_311_MONOMER__c + MG_522_MONOMER__c + MG_417_MONOMER__c + MG_424_MONOMER__c + MG_446_MONOMER__c + MGrrnA16S__c => RIBOSOME_30S_IF3__c; min2(MG_070_MONOMER__c/1, min4(MG_087_MONOMER__c/1, MG_088_MONOMER__c/1, MG_090_MONOMER__c/1, MG_092_MONOMER__c/1)); Complexation_RIBOSOME_30S_IF3 is "Complexation (30S ribosomal subunit - translation initiation factor IF-3 complex)";
  Complexation_RIBOSOME_50S: MG_473_MONOMER__c + MG_081_MONOMER__c + MG_082_MONOMER__c + MG_093_MONOMER__c + MG_151_MONOMER__c + MG_152_MONOMER__c + MG_153_MONOMER__c + MG_154_MONOMER__c + MG_156_MONOMER__c + MG_158_MONOMER__c + MG_159_MONOMER__c + MG_161_MONOMER__c + MG_162_MONOMER__c + MG_163_MONOMER__c + MG_166_MONOMER__c + MG_167_MONOMER__c + MG_169_MONOMER__c + MG_174_MONOMER__c + MG_178_MONOMER__c + MG_197_MONOMER__c + MG_198_MONOMER__c + MG_232_MONOMER__c + MG_234_MONOMER__c + MG_257_MONOMER__c + MG_325_MONOMER__c + MG_361_MONOMER__c + MG_362_MONOMER__c + MG_363_MONOMER__c + MG_418_MONOMER__c + MG_426_MONOMER__c + MG_444_MONOMER__c + MG_466_MONOMER__c + MGrrnA23S__c + MGrrnA5S__c => RIBOSOME_50S__c; min2(MG_473_MONOMER__c/1, min4(MG_081_MONOMER__c/1, MG_082_MONOMER__c/1, MG_093_MONOMER__c/1, MG_151_MONOMER__c/1)); Complexation_RIBOSOME_50S is "Complexation (50S ribosomal subunit)";
  Complexation_RIBOSOME_70S: MG_473_MONOMER__c + MG_070_MONOMER__c + MG_081_MONOMER__c + MG_082_MONOMER__c + MG_087_MONOMER__c + MG_088_MONOMER__c + MG_090_MONOMER__c + MG_092_MONOMER__c + MG_093_MONOMER__c + MG_150_MONOMER__c + MG_151_MONOMER__c + MG_152_MONOMER__c + MG_153_MONOMER__c + MG_154_MONOMER__c + MG_155_MONOMER__c + MG_156_MONOMER__c + MG_157_MONOMER__c + MG_158_MONOMER__c + MG_159_MONOMER__c + MG_160_MONOMER__c + MG_161_MONOMER__c + MG_162_MONOMER__c + MG_163_MONOMER__c + MG_164_MONOMER__c + MG_165_MONOMER__c + MG_166_MONOMER__c + MG_167_MONOMER__c + MG_168_MONOMER__c + MG_169_MONOMER__c + MG_174_MONOMER__c + MG_175_MONOMER__c + MG_176_MONOMER__c + MG_178_MONOMER__c + MG_197_MONOMER__c + MG_198_MONOMER__c + MG_481_MONOMER__c + MG_232_MONOMER__c + MG_234_MONOMER__c + MG_257_MONOMER__c + MG_311_MONOMER__c + MG_325_MONOMER__c + MG_361_MONOMER__c + MG_362_MONOMER__c + MG_363_MONOMER__c + MG_522_MONOMER__c + MG_417_MONOMER__c + MG_418_MONOMER__c + MG_424_MONOMER__c + MG_426_MONOMER__c + MG_444_MONOMER__c + MG_446_MONOMER__c + MG_466_MONOMER__c + MGrrnA16S__c + MGrrnA23S__c + MGrrnA5S__c => RIBOSOME_70S__c; min2(min2(MG_473_MONOMER__c/1, min4(MG_070_MONOMER__c/1, MG_081_MONOMER__c/1, MG_082_MONOMER__c/1, MG_087_MONOMER__c/1)), min4(MG_088_MONOMER__c/1, MG_090_MONOMER__c/1, MG_092_MONOMER__c/1, MG_093_MONOMER__c/1)); Complexation_RIBOSOME_70S is "Complexation (70S ribosome)";
  Complexation_RNA_POLYMERASE: MG_022_MONOMER__c + 2 MG_177_MONOMER__c + MG_340_MONOMER__c + MG_341_MONOMER__c => RNA_POLYMERASE__c; min2(min2(min2(MG_022_MONOMER__c/1, MG_177_MONOMER__c/2), MG_340_MONOMER__c/1), MG_341_MONOMER__c/1); Complexation_RNA_POLYMERASE is "Complexation (DNA-directed RNA polymerase)";
  Complexation_RNA_POLYMERASE_HOLOENZYME: MG_022_MONOMER__c + 2 MG_177_MONOMER__c + MG_249_MONOMER__c + MG_340_MONOMER__c + MG_341_MONOMER__c => RNA_POLYMERASE_HOLOENZYME__c; min2(min2(min2(min2(MG_022_MONOMER__c/1, MG_177_MONOMER__c/2), MG_249_MONOMER__c/1), MG_340_MONOMER__c/1), MG_341_MONOMER__c/1); Complexation_RNA_POLYMERASE_HOLOENZYME is "Complexation (DNA-directed RNA polymerase holoenzyme)";
  reaction_1496: 14 ATP__c + 14 H2O__c + MG_068_MONOMER__c => 14 ADP__c + 14 H__c + MG_068_MONOMER__m + 14 PI__c; Function_for_ATP__c___H2O__c___MG_068_MONOMER__c__MG_055_170_277_464_476_20MER__m__MG_072_DIMER__c___ADP__c___H__c___MG_068_MONOMER__m___PI__c(ATP__c, Km1_MG_068_MONOMER__c, Km2_ATP__c, MG_055_170_277_464_476_20MER__m, MG_068_MONOMER__c, MG_072_DIMER__c, mw0073301c_98ed_487f_a2e3_54d58c2f0408_mw6e48d654_db66_4dc7_8d0f_0e1d422c7794); reaction_1496 is "ATP__c + H2O__c + MG_068_MONOMER__c -MG_055_170_277_464_476_20MER__m, MG_072_DIMER__c-> ADP__c + H__c + MG_068_MONOMER__m + PI__c";  // modifiers: MG_055_170_277_464_476_20MER__m, MG_072_DIMER__c
  reaction_1497: 15 ATP__c + 15 H2O__c + MG_395_MONOMER__c => 15 ADP__c + 15 H__c + MG_395_MONOMER__m + 15 PI__c; Function_for_ATP__c___H2O__c___MG_395_MONOMER__c__MG_055_170_277_464_476_20MER__m__MG_072_DIMER__c___ADP__c___H__c___MG_395_MONOMER__m___PI__c(ATP__c, Km1_MG_395_MONOMER__c, Km2_ATP__c, MG_055_170_277_464_476_20MER__m, MG_072_DIMER__c, MG_395_MONOMER__c, mw06aec404_57a0_4f32_8972_f66657b11f6d_mwc1e85f8f_4098_40ea_9f5f_c3e6b531e9b4); reaction_1497 is "ATP__c + H2O__c + MG_395_MONOMER__c -MG_055_170_277_464_476_20MER__m, MG_072_DIMER__c-> ADP__c + H__c + MG_395_MONOMER__m + PI__c";  // modifiers: MG_055_170_277_464_476_20MER__m, MG_072_DIMER__c
  reaction_1498: 11 ATP__c + 11 H2O__c + MG_147_MONOMER__c => 11 ADP__c + 11 H__c + MG_147_MONOMER__m + 11 PI__c; Function_for_ATP__c___H2O__c___MG_147_MONOMER__c__MG_055_170_277_464_476_20MER__m__MG_072_DIMER__c___ADP__c___H__c___MG_147_MONOMER__m___PI__c(ATP__c, Km1_MG_147_MONOMER__c, Km2_ATP__c, MG_055_170_277_464_476_20MER__m, MG_072_DIMER__c, MG_147_MONOMER__c, mw07d1e21b_acc8_42bc_95c5_d9d3970f15f5_mw9290bc11_2ca9_45bc_99b0_997b338f2d5e); reaction_1498 is "ATP__c + H2O__c + MG_147_MONOMER__c -MG_055_170_277_464_476_20MER__m, MG_072_DIMER__c-> ADP__c + H__c + MG_147_MONOMER__m + PI__c";  // modifiers: MG_055_170_277_464_476_20MER__m, MG_072_DIMER__c
  reaction_1499: 8 ATP__c + 8 H2O__c + MG_320_MONOMER__c => 8 ADP__c + 8 H__c + MG_320_MONOMER__m + 8 PI__c; Function_for_ATP__c___H2O__c___MG_320_MONOMER__c__MG_055_170_277_464_476_20MER__m__MG_072_DIMER__c___ADP__c___H__c___MG_320_MONOMER__m___PI__c(ATP__c, Km1_MG_320_MONOMER__c, Km2_ATP__c, MG_055_170_277_464_476_20MER__m, MG_072_DIMER__c, MG_320_MONOMER__c, mw10d68844_23c9_4468_8b17_246f834f2307_mw015718bc_81c2_497e_be8e_a56dd4b4c35b); reaction_1499 is "ATP__c + H2O__c + MG_320_MONOMER__c -MG_055_170_277_464_476_20MER__m, MG_072_DIMER__c-> ADP__c + H__c + MG_320_MONOMER__m + PI__c";  // modifiers: MG_055_170_277_464_476_20MER__m, MG_072_DIMER__c
  reaction_1500: 7 ATP__c + 7 H2O__c + MG_186_MONOMER__c => 7 ADP__c + 7 H__c + MG_186_MONOMER__e + 7 PI__c; Function_for_ATP__c___H2O__c___MG_186_MONOMER__c__MG_055_170_277_464_476_20MER__m__MG_072_DIMER__c___ADP__c___H__c___MG_186_MONOMER__e___PI__c(ATP__c, Km1_MG_186_MONOMER__c, Km2_ATP__c, MG_055_170_277_464_476_20MER__m, MG_072_DIMER__c, MG_186_MONOMER__c, mw13f3349b_4744_4ce0_a804_b8995595d92d_mw669a353c_691f_4958_bec8_bbb4a107ae7f); reaction_1500 is "ATP__c + H2O__c + MG_186_MONOMER__c -MG_055_170_277_464_476_20MER__m, MG_072_DIMER__c-> ADP__c + H__c + MG_186_MONOMER__e + PI__c";  // modifiers: MG_055_170_277_464_476_20MER__m, MG_072_DIMER__c
  reaction_1501: 8 ATP__c + 8 H2O__c + MG_515_MONOMER__c => 8 ADP__c + 8 H__c + MG_515_MONOMER__m + 8 PI__c; Function_for_ATP__c___H2O__c___MG_515_MONOMER__c__MG_055_170_277_464_476_20MER__m__MG_072_DIMER__c___ADP__c___H__c___MG_515_MONOMER__m___PI__c(ATP__c, Km1_MG_515_MONOMER__c, Km2_ATP__c, MG_055_170_277_464_476_20MER__m, MG_072_DIMER__c, MG_515_MONOMER__c, mw1412b997_58e1_4029_8839_1dba64551bd4_mwa4960309_9047_4c95_8686_ec20e1904da1); reaction_1501 is "ATP__c + H2O__c + MG_515_MONOMER__c -MG_055_170_277_464_476_20MER__m, MG_072_DIMER__c-> ADP__c + H__c + MG_515_MONOMER__m + PI__c";  // modifiers: MG_055_170_277_464_476_20MER__m, MG_072_DIMER__c
  reaction_1502: 8 ATP__c + 8 H2O__c + MG_043_MONOMER__c => 8 ADP__c + 8 H__c + MG_043_MONOMER__m + 8 PI__c; Function_for_ATP__c___H2O__c___MG_043_MONOMER__c__MG_055_170_277_464_476_20MER__m__MG_072_DIMER__c___ADP__c___H__c___MG_043_MONOMER__m___PI__c(ATP__c, Km1_MG_043_MONOMER__c, Km2_ATP__c, MG_043_MONOMER__c, MG_055_170_277_464_476_20MER__m, MG_072_DIMER__c, mw18305a96_ee7f_45c1_b8eb_b0947e202349_mw2427812f_a126_493c_8155_747f446814d6); reaction_1502 is "ATP__c + H2O__c + MG_043_MONOMER__c -MG_055_170_277_464_476_20MER__m, MG_072_DIMER__c-> ADP__c + H__c + MG_043_MONOMER__m + PI__c";  // modifiers: MG_055_170_277_464_476_20MER__m, MG_072_DIMER__c
  reaction_1503: 19 ATP__c + 19 H2O__c + MG_390_MONOMER__c => 19 ADP__c + 19 H__c + MG_390_MONOMER__m + 19 PI__c; Function_for_ATP__c___H2O__c___MG_390_MONOMER__c__MG_055_170_277_464_476_20MER__m__MG_072_DIMER__c___ADP__c___H__c___MG_390_MONOMER__m___PI__c(ATP__c, Km1_MG_390_MONOMER__c, Km2_ATP__c, MG_055_170_277_464_476_20MER__m, MG_072_DIMER__c, MG_390_MONOMER__c, mw18800e5c_5d2d_400e_80af_74f46d5b63f2_mw616456d5_2115_4f73_b6ed_2d7b2e9b3126); reaction_1503 is "ATP__c + H2O__c + MG_390_MONOMER__c -MG_055_170_277_464_476_20MER__m, MG_072_DIMER__c-> ADP__c + H__c + MG_390_MONOMER__m + PI__c";  // modifiers: MG_055_170_277_464_476_20MER__m, MG_072_DIMER__c
  reaction_1504: 8 ATP__c + 8 H2O__c + MG_212_MONOMER__c => 8 ADP__c + 8 H__c + MG_212_MONOMER__m + 8 PI__c; Function_for_ATP__c___H2O__c___MG_212_MONOMER__c__MG_055_170_277_464_476_20MER__m__MG_072_DIMER__c___ADP__c___H__c___MG_212_MONOMER__m___PI__c(ATP__c, Km1_MG_212_MONOMER__c, Km2_ATP__c, MG_055_170_277_464_476_20MER__m, MG_072_DIMER__c, MG_212_MONOMER__c, mw1ab036ec_443c_4ada_a5d6_8e43c068872b_mwdab7082a_89da_42d9_aeac_2afe9a2a724d); reaction_1504 is "ATP__c + H2O__c + MG_212_MONOMER__c -MG_055_170_277_464_476_20MER__m, MG_072_DIMER__c-> ADP__c + H__c + MG_212_MONOMER__m + PI__c";  // modifiers: MG_055_170_277_464_476_20MER__m, MG_072_DIMER__c
  reaction_1505: 12 ATP__c + 12 H2O__c + MG_146_MONOMER__c => 12 ADP__c + 12 H__c + MG_146_MONOMER__e + 12 PI__c; Function_for_ATP__c___H2O__c___MG_146_MONOMER__c__MG_055_170_277_464_476_20MER__m__MG_072_DIMER__c___ADP__c___H__c___MG_146_MONOMER__e___PI__c(ATP__c, Km1_MG_146_MONOMER__c, Km2_ATP__c, MG_055_170_277_464_476_20MER__m, MG_072_DIMER__c, MG_146_MONOMER__c, mw1cd29efd_5383_4ef8_a29b_b174b4dbdcf6_mw3ffc7ced_3b4c_41c8_94a6_ece94158b492); reaction_1505 is "ATP__c + H2O__c + MG_146_MONOMER__c -MG_055_170_277_464_476_20MER__m, MG_072_DIMER__c-> ADP__c + H__c + MG_146_MONOMER__e + PI__c";  // modifiers: MG_055_170_277_464_476_20MER__m, MG_072_DIMER__c
  reaction_1506: 38 ATP__c + 38 H2O__c + MG_064_MONOMER__c => 38 ADP__c + 38 H__c + MG_064_MONOMER__m + 38 PI__c; Function_for_ATP__c___H2O__c___MG_064_MONOMER__c__MG_055_170_277_464_476_20MER__m__MG_072_DIMER__c___ADP__c___H__c___MG_064_MONOMER__m___PI__c(ATP__c, Km1_MG_064_MONOMER__c, Km2_ATP__c, MG_055_170_277_464_476_20MER__m, MG_064_MONOMER__c, MG_072_DIMER__c, mw1f8c3239_c0d8_4eec_a4a7_bf0fc43e6960_mwc8432b3e_2e1b_4e2f_84ec_97e27f723b64); reaction_1506 is "ATP__c + H2O__c + MG_064_MONOMER__c -MG_055_170_277_464_476_20MER__m, MG_072_DIMER__c-> ADP__c + H__c + MG_064_MONOMER__m + PI__c";  // modifiers: MG_055_170_277_464_476_20MER__m, MG_072_DIMER__c
  reaction_1507: 3 ATP__c + 3 H2O__c + MG_404_MONOMER__c => 3 ADP__c + 3 H__c + MG_404_MONOMER__m + 3 PI__c; Function_for_ATP__c___H2O__c___MG_404_MONOMER__c__MG_055_170_277_464_476_20MER__m__MG_072_DIMER__c___ADP__c___H__c___MG_404_MONOMER__m___PI__c(ATP__c, Km1_MG_404_MONOMER__c, Km2_ATP__c, MG_055_170_277_464_476_20MER__m, MG_072_DIMER__c, MG_404_MONOMER__c, mw20410a8c_0849_4648_96b1_ab9dcea54f8c_mwcb5b96d6_6421_4d78_ad9c_55981cfbeffb); reaction_1507 is "ATP__c + H2O__c + MG_404_MONOMER__c -MG_055_170_277_464_476_20MER__m, MG_072_DIMER__c-> ADP__c + H__c + MG_404_MONOMER__m + PI__c";  // modifiers: MG_055_170_277_464_476_20MER__m, MG_072_DIMER__c
  reaction_1508: 14 ATP__c + 14 H2O__c + MG_045_MONOMER__c => 14 ADP__c + 14 H__c + MG_045_MONOMER__e + 14 PI__c; Function_for_ATP__c___H2O__c___MG_045_MONOMER__c__MG_055_170_277_464_476_20MER__m__MG_072_DIMER__c___ADP__c___H__c___MG_045_MONOMER__e___PI__c(ATP__c, Km1_MG_045_MONOMER__c, Km2_ATP__c, MG_045_MONOMER__c, MG_055_170_277_464_476_20MER__m, MG_072_DIMER__c, mw2924d2d6_a628_4762_879d_02ada1fb53f8_mwe93d5795_061f_404f_99f0_8f848890ffc1); reaction_1508 is "ATP__c + H2O__c + MG_045_MONOMER__c -MG_055_170_277_464_476_20MER__m, MG_072_DIMER__c-> ADP__c + H__c + MG_045_MONOMER__e + PI__c";  // modifiers: MG_055_170_277_464_476_20MER__m, MG_072_DIMER__c
  reaction_1509: 14 ATP__c + 14 H2O__c + MG_275_MONOMER__c => 14 ADP__c + 14 H__c + MG_275_MONOMER__m + 14 PI__c; Function_for_ATP__c___H2O__c___MG_275_MONOMER__c__MG_055_170_277_464_476_20MER__m__MG_072_DIMER__c___ADP__c___H__c___MG_275_MONOMER__m___PI__c(ATP__c, Km1_MG_275_MONOMER__c, Km2_ATP__c, MG_055_170_277_464_476_20MER__m, MG_072_DIMER__c, MG_275_MONOMER__c, mw2b8abec5_25af_4252_9332_442db47cb78a_mwbe60ac7f_29cb_48cc_8251_97388ccb8c9a); reaction_1509 is "ATP__c + H2O__c + MG_275_MONOMER__c -MG_055_170_277_464_476_20MER__m, MG_072_DIMER__c-> ADP__c + H__c + MG_275_MONOMER__m + PI__c";  // modifiers: MG_055_170_277_464_476_20MER__m, MG_072_DIMER__c
  reaction_1510: 14 ATP__c + 14 H2O__c + MG_170_MONOMER__c => 14 ADP__c + 14 H__c + MG_170_MONOMER__m + 14 PI__c; Function_for_ATP__c___H2O__c___MG_170_MONOMER__c__MG_055_170_277_464_476_20MER__m__MG_072_DIMER__c___ADP__c___H__c___MG_170_MONOMER__m___PI__c(ATP__c, Km1_MG_170_MONOMER__c, Km2_ATP__c, MG_055_170_277_464_476_20MER__m, MG_072_DIMER__c, MG_170_MONOMER__c, mw2f01b35c_d9c5_4846_aa18_43529e5c9734_mw0bfe348d_8788_4530_a977_9eb3876f083b); reaction_1510 is "ATP__c + H2O__c + MG_170_MONOMER__c -MG_055_170_277_464_476_20MER__m, MG_072_DIMER__c-> ADP__c + H__c + MG_170_MONOMER__m + PI__c";  // modifiers: MG_055_170_277_464_476_20MER__m, MG_072_DIMER__c
  reaction_1511: 17 ATP__c + 17 H2O__c + MG_040_MONOMER__c => 17 ADP__c + 17 H__c + MG_040_MONOMER__e + 17 PI__c; Function_for_ATP__c___H2O__c___MG_040_MONOMER__c__MG_055_170_277_464_476_20MER__m__MG_072_DIMER__c___ADP__c___H__c___MG_040_MONOMER__e___PI__c(ATP__c, Km1_MG_040_MONOMER__c, Km2_ATP__c, MG_040_MONOMER__c, MG_055_170_277_464_476_20MER__m, MG_072_DIMER__c, mw32c7a4a4_0c45_4a9b_9c99_4efdc240dbf3_mw36b66044_3068_4579_ba4e_8e4c9bf65307); reaction_1511 is "ATP__c + H2O__c + MG_040_MONOMER__c -MG_055_170_277_464_476_20MER__m, MG_072_DIMER__c-> ADP__c + H__c + MG_040_MONOMER__e + PI__c";  // modifiers: MG_055_170_277_464_476_20MER__m, MG_072_DIMER__c
  reaction_1512: 3 ATP__c + 3 H2O__c + MG_220_MONOMER__c => 3 ADP__c + 3 H__c + MG_220_MONOMER__e + 3 PI__c; Function_for_ATP__c___H2O__c___MG_220_MONOMER__c__MG_055_170_277_464_476_20MER__m__MG_072_DIMER__c___ADP__c___H__c___MG_220_MONOMER__e___PI__c(ATP__c, Km1_MG_220_MONOMER__c, Km2_ATP__c, MG_055_170_277_464_476_20MER__m, MG_072_DIMER__c, MG_220_MONOMER__c, mw3427eca0_2c97_46c0_b8e4_07d6e3bcf0b5_mw2ac94eca_7af8_430f_8ba8_7607e1bf3207); reaction_1512 is "ATP__c + H2O__c + MG_220_MONOMER__c -MG_055_170_277_464_476_20MER__m, MG_072_DIMER__c-> ADP__c + H__c + MG_220_MONOMER__e + PI__c";  // modifiers: MG_055_170_277_464_476_20MER__m, MG_072_DIMER__c
  reaction_1513: 29 ATP__c + 29 H2O__c + MG_075_MONOMER__c => 29 ADP__c + 29 H__c + MG_075_MONOMER__m + 29 PI__c; Function_for_ATP__c___H2O__c___MG_075_MONOMER__c__MG_055_170_277_464_476_20MER__m__MG_072_DIMER__c___ADP__c___H__c___MG_075_MONOMER__m___PI__c(ATP__c, Km1_MG_075_MONOMER__c, Km2_ATP__c, MG_055_170_277_464_476_20MER__m, MG_072_DIMER__c, MG_075_MONOMER__c, mw3511c23c_8bf5_45e7_8f79_ba9f95358276_mw4104e6e3_1e63_4b75_8f6c_400b52cac829); reaction_1513 is "ATP__c + H2O__c + MG_075_MONOMER__c -MG_055_170_277_464_476_20MER__m, MG_072_DIMER__c-> ADP__c + H__c + MG_075_MONOMER__m + PI__c";  // modifiers: MG_055_170_277_464_476_20MER__m, MG_072_DIMER__c
  reaction_1514: 8 ATP__c + 8 H2O__c + MG_135_MONOMER__c => 8 ADP__c + 8 H__c + MG_135_MONOMER__m + 8 PI__c; Function_for_ATP__c___H2O__c___MG_135_MONOMER__c__MG_055_170_277_464_476_20MER__m__MG_072_DIMER__c___ADP__c___H__c___MG_135_MONOMER__m___PI__c(ATP__c, Km1_MG_135_MONOMER__c, Km2_ATP__c, MG_055_170_277_464_476_20MER__m, MG_072_DIMER__c, MG_135_MONOMER__c, mw3990625d_e189_41c1_8114_d543458b057d_mw45b50ad3_8bac_426b_ba9d_7853021b4f50); reaction_1514 is "ATP__c + H2O__c + MG_135_MONOMER__c -MG_055_170_277_464_476_20MER__m, MG_072_DIMER__c-> ADP__c + H__c + MG_135_MONOMER__m + PI__c";  // modifiers: MG_055_170_277_464_476_20MER__m, MG_072_DIMER__c
  reaction_1515: 19 ATP__c + 19 H2O__c + MG_096_MONOMER__c => 19 ADP__c + 19 H__c + MG_096_MONOMER__e + 19 PI__c; Function_for_ATP__c___H2O__c___MG_096_MONOMER__c__MG_055_170_277_464_476_20MER__m__MG_072_DIMER__c___ADP__c___H__c___MG_096_MONOMER__e___PI__c(ATP__c, Km1_MG_096_MONOMER__c, Km2_ATP__c, MG_055_170_277_464_476_20MER__m, MG_072_DIMER__c, MG_096_MONOMER__c, mw40148050_09e0_4008_9f26_21719def89a9_mwa1a8430a_a9f7_4d3e_8317_1b53bf499a10); reaction_1515 is "ATP__c + H2O__c + MG_096_MONOMER__c -MG_055_170_277_464_476_20MER__m, MG_072_DIMER__c-> ADP__c + H__c + MG_096_MONOMER__e + PI__c";  // modifiers: MG_055_170_277_464_476_20MER__m, MG_072_DIMER__c
  reaction_1516: 5 ATP__c + 5 H2O__c + MG_319_MONOMER__c => 5 ADP__c + 5 H__c + MG_319_MONOMER__m + 5 PI__c; Function_for_ATP__c___H2O__c___MG_319_MONOMER__c__MG_055_170_277_464_476_20MER__m__MG_072_DIMER__c___ADP__c___H__c___MG_319_MONOMER__m___PI__c(ATP__c, Km1_MG_319_MONOMER__c, Km2_ATP__c, MG_055_170_277_464_476_20MER__m, MG_072_DIMER__c, MG_319_MONOMER__c, mw46b11442_4b14_49a3_96fb_cb3954d8ce78_mw341bf054_6a64_42b2_af23_a42cea0600b9); reaction_1516 is "ATP__c + H2O__c + MG_319_MONOMER__c -MG_055_170_277_464_476_20MER__m, MG_072_DIMER__c-> ADP__c + H__c + MG_319_MONOMER__m + PI__c";  // modifiers: MG_055_170_277_464_476_20MER__m, MG_072_DIMER__c
  reaction_1517: 5 ATP__c + 5 H2O__c + MG_406_MONOMER__c => 5 ADP__c + 5 H__c + MG_406_MONOMER__m + 5 PI__c; Function_for_ATP__c___H2O__c___MG_406_MONOMER__c__MG_055_170_277_464_476_20MER__m__MG_072_DIMER__c___ADP__c___H__c___MG_406_MONOMER__m___PI__c(ATP__c, Km1_MG_406_MONOMER__c, Km2_ATP__c, MG_055_170_277_464_476_20MER__m, MG_072_DIMER__c, MG_406_MONOMER__c, mw498aea7d_2fd4_452c_9a0c_008cb959ac3b_mwa5ae15ef_3f87_438b_b034_5db22f0b43f5); reaction_1517 is "ATP__c + H2O__c + MG_406_MONOMER__c -MG_055_170_277_464_476_20MER__m, MG_072_DIMER__c-> ADP__c + H__c + MG_406_MONOMER__m + PI__c";  // modifiers: MG_055_170_277_464_476_20MER__m, MG_072_DIMER__c
  reaction_1518: 7 ATP__c + 7 H2O__c + MG_452_MONOMER__c => 7 ADP__c + 7 H__c + MG_452_MONOMER__m + 7 PI__c; Function_for_ATP__c___H2O__c___MG_452_MONOMER__c__MG_055_170_277_464_476_20MER__m__MG_072_DIMER__c___ADP__c___H__c___MG_452_MONOMER__m___PI__c(ATP__c, Km1_MG_452_MONOMER__c, Km2_ATP__c, MG_055_170_277_464_476_20MER__m, MG_072_DIMER__c, MG_452_MONOMER__c, mw4d12fb6f_53d0_4972_9474_dbc23f2008b8_mwbc089891_168f_4458_b9c3_303ce58b61b9); reaction_1518 is "ATP__c + H2O__c + MG_452_MONOMER__c -MG_055_170_277_464_476_20MER__m, MG_072_DIMER__c-> ADP__c + H__c + MG_452_MONOMER__m + PI__c";  // modifiers: MG_055_170_277_464_476_20MER__m, MG_072_DIMER__c
  reaction_1519: 28 ATP__c + 28 H2O__c + MG_277_MONOMER__c => 28 ADP__c + 28 H__c + MG_277_MONOMER__m + 28 PI__c; Function_for_ATP__c___H2O__c___MG_277_MONOMER__c__MG_055_170_277_464_476_20MER__m__MG_072_DIMER__c___ADP__c___H__c___MG_277_MONOMER__m___PI__c(ATP__c, Km1_MG_277_MONOMER__c, Km2_ATP__c, MG_055_170_277_464_476_20MER__m, MG_072_DIMER__c, MG_277_MONOMER__c, mw5755e585_866b_46a9_a878_475f70e384d7_mwe239f53d_1f0c_48f6_bba9_b381eafc0c4c); reaction_1519 is "ATP__c + H2O__c + MG_277_MONOMER__c -MG_055_170_277_464_476_20MER__m, MG_072_DIMER__c-> ADP__c + H__c + MG_277_MONOMER__m + PI__c";  // modifiers: MG_055_170_277_464_476_20MER__m, MG_072_DIMER__c
  reaction_1520: 7 ATP__c + 7 H2O__c + MG_256_MONOMER__c => 7 ADP__c + 7 H__c + MG_256_MONOMER__m + 7 PI__c; Function_for_ATP__c___H2O__c___MG_256_MONOMER__c__MG_055_170_277_464_476_20MER__m__MG_072_DIMER__c___ADP__c___H__c___MG_256_MONOMER__m___PI__c(ATP__c, Km1_MG_256_MONOMER__c, Km2_ATP__c, MG_055_170_277_464_476_20MER__m, MG_072_DIMER__c, MG_256_MONOMER__c, mw576db2db_6152_4ab7_938f_438362f4c87c_mw5e82054b_b864_4d0b_8ba9_5dc6517c1184); reaction_1520 is "ATP__c + H2O__c + MG_256_MONOMER__c -MG_055_170_277_464_476_20MER__m, MG_072_DIMER__c-> ADP__c + H__c + MG_256_MONOMER__m + PI__c";  // modifiers: MG_055_170_277_464_476_20MER__m, MG_072_DIMER__c
  reaction_1521: 30 ATP__c + 30 H2O__c + MG_414_MONOMER__c => 30 ADP__c + 30 H__c + MG_414_MONOMER__e + 30 PI__c; Function_for_ATP__c___H2O__c___MG_414_MONOMER__c__MG_055_170_277_464_476_20MER__m__MG_072_DIMER__c___ADP__c___H__c___MG_414_MONOMER__e___PI__c(ATP__c, Km1_MG_414_MONOMER__c, Km2_ATP__c, MG_055_170_277_464_476_20MER__m, MG_072_DIMER__c, MG_414_MONOMER__c, mw5a984e03_bb3b_4c00_8ecb_ae79f961b747_mw88ff6775_d152_40a7_ad4b_dbe8ad78c7d1); reaction_1521 is "ATP__c + H2O__c + MG_414_MONOMER__c -MG_055_170_277_464_476_20MER__m, MG_072_DIMER__c-> ADP__c + H__c + MG_414_MONOMER__e + PI__c";  // modifiers: MG_055_170_277_464_476_20MER__m, MG_072_DIMER__c
  reaction_1522: 19 ATP__c + 19 H2O__c + MG_062_MONOMER__c => 19 ADP__c + 19 H__c + MG_062_MONOMER__m + 19 PI__c; Function_for_ATP__c___H2O__c___MG_062_MONOMER__c__MG_055_170_277_464_476_20MER__m__MG_072_DIMER__c___ADP__c___H__c___MG_062_MONOMER__m___PI__c(ATP__c, Km1_MG_062_MONOMER__c, Km2_ATP__c, MG_055_170_277_464_476_20MER__m, MG_062_MONOMER__c, MG_072_DIMER__c, mw5ae4c5e5_5d2c_46c6_9b29_e0773c802f60_mw0f505bd0_1790_45ad_9571_675b39eb1b6b); reaction_1522 is "ATP__c + H2O__c + MG_062_MONOMER__c -MG_055_170_277_464_476_20MER__m, MG_072_DIMER__c-> ADP__c + H__c + MG_062_MONOMER__m + PI__c";  // modifiers: MG_055_170_277_464_476_20MER__m, MG_072_DIMER__c
  reaction_1523: 27 ATP__c + 27 H2O__c + MG_321_MONOMER__c => 27 ADP__c + 27 H__c + MG_321_MONOMER__e + 27 PI__c; Function_for_ATP__c___H2O__c___MG_321_MONOMER__c__MG_055_170_277_464_476_20MER__m__MG_072_DIMER__c___ADP__c___H__c___MG_321_MONOMER__e___PI__c(ATP__c, Km1_MG_321_MONOMER__c, Km2_ATP__c, MG_055_170_277_464_476_20MER__m, MG_072_DIMER__c, MG_321_MONOMER__c, mw5b680d22_3b3a_45d0_b28e_989194bac178_mwefc87403_60ff_4736_b2e4_41e9c5120159); reaction_1523 is "ATP__c + H2O__c + MG_321_MONOMER__c -MG_055_170_277_464_476_20MER__m, MG_072_DIMER__c-> ADP__c + H__c + MG_321_MONOMER__e + PI__c";  // modifiers: MG_055_170_277_464_476_20MER__m, MG_072_DIMER__c
  reaction_1524: 4 ATP__c + 4 H2O__c + MG_478_MONOMER__c => 4 ADP__c + 4 H__c + MG_478_MONOMER__m + 4 PI__c; Function_for_ATP__c___H2O__c___MG_478_MONOMER__c__MG_055_170_277_464_476_20MER__m__MG_072_DIMER__c___ADP__c___H__c___MG_478_MONOMER__m___PI__c(ATP__c, Km1_MG_478_MONOMER__c, Km2_ATP__c, MG_055_170_277_464_476_20MER__m, MG_072_DIMER__c, MG_478_MONOMER__c, mw5fe6e98e_5bf1_4779_87b5_7d809e963d27_mw0eca82b8_4786_4e35_9ce4_da73531ddc97); reaction_1524 is "ATP__c + H2O__c + MG_478_MONOMER__c -MG_055_170_277_464_476_20MER__m, MG_072_DIMER__c-> ADP__c + H__c + MG_478_MONOMER__m + PI__c";  // modifiers: MG_055_170_277_464_476_20MER__m, MG_072_DIMER__c
  reaction_1525: 15 ATP__c + 15 H2O__c + MG_067_MONOMER__c => 15 ADP__c + 15 H__c + MG_067_MONOMER__m + 15 PI__c; Function_for_ATP__c___H2O__c___MG_067_MONOMER__c__MG_055_170_277_464_476_20MER__m__MG_072_DIMER__c___ADP__c___H__c___MG_067_MONOMER__m___PI__c(ATP__c, Km1_MG_067_MONOMER__c, Km2_ATP__c, MG_055_170_277_464_476_20MER__m, MG_067_MONOMER__c, MG_072_DIMER__c, mw627a615c_9c41_4de9_b176_8f803f4db669_mw2f7d3007_06a6_4a14_8883_91636abd02fa); reaction_1525 is "ATP__c + H2O__c + MG_067_MONOMER__c -MG_055_170_277_464_476_20MER__m, MG_072_DIMER__c-> ADP__c + H__c + MG_067_MONOMER__m + PI__c";  // modifiers: MG_055_170_277_464_476_20MER__m, MG_072_DIMER__c
  reaction_1526: 6 ATP__c + 6 H2O__c + MG_279_MONOMER__c => 6 ADP__c + 6 H__c + MG_279_MONOMER__m + 6 PI__c; Function_for_ATP__c___H2O__c___MG_279_MONOMER__c__MG_055_170_277_464_476_20MER__m__MG_072_DIMER__c___ADP__c___H__c___MG_279_MONOMER__m___PI__c(ATP__c, Km1_MG_279_MONOMER__c, Km2_ATP__c, MG_055_170_277_464_476_20MER__m, MG_072_DIMER__c, MG_279_MONOMER__c, mw62cc4c57_0a7f_4787_b71e_771d5b9f3612_mw2b10f5e3_f2d2_4a45_880e_75675078ed85); reaction_1526 is "ATP__c + H2O__c + MG_279_MONOMER__c -MG_055_170_277_464_476_20MER__m, MG_072_DIMER__c-> ADP__c + H__c + MG_279_MONOMER__m + PI__c";  // modifiers: MG_055_170_277_464_476_20MER__m, MG_072_DIMER__c
  reaction_1527: 11 ATP__c + 11 H2O__c + MG_095_MONOMER__c => 11 ADP__c + 11 H__c + MG_095_MONOMER__m + 11 PI__c; Function_for_ATP__c___H2O__c___MG_095_MONOMER__c__MG_055_170_277_464_476_20MER__m__MG_072_DIMER__c___ADP__c___H__c___MG_095_MONOMER__m___PI__c(ATP__c, Km1_MG_095_MONOMER__c, Km2_ATP__c, MG_055_170_277_464_476_20MER__m, MG_072_DIMER__c, MG_095_MONOMER__c, mw6a533966_a2cf_46bc_9cf6_1faac5173e02_mw3ec2113a_0f59_4d1c_94e6_1822879ce3d0); reaction_1527 is "ATP__c + H2O__c + MG_095_MONOMER__c -MG_055_170_277_464_476_20MER__m, MG_072_DIMER__c-> ADP__c + H__c + MG_095_MONOMER__m + PI__c";  // modifiers: MG_055_170_277_464_476_20MER__m, MG_072_DIMER__c
  reaction_1528: 8 ATP__c + 8 H2O__c + MG_313_MONOMER__c => 8 ADP__c + 8 H__c + MG_313_MONOMER__m + 8 PI__c; Function_for_ATP__c___H2O__c___MG_313_MONOMER__c__MG_055_170_277_464_476_20MER__m__MG_072_DIMER__c___ADP__c___H__c___MG_313_MONOMER__m___PI__c(ATP__c, Km1_MG_313_MONOMER__c, Km2_ATP__c, MG_055_170_277_464_476_20MER__m, MG_072_DIMER__c, MG_313_MONOMER__c, mw6d4aee3b_c6c9_4dc9_a9db_48687ca2fed7_mwfa418999_f40b_4f82_98d8_1b85f599f21c); reaction_1528 is "ATP__c + H2O__c + MG_313_MONOMER__c -MG_055_170_277_464_476_20MER__m, MG_072_DIMER__c-> ADP__c + H__c + MG_313_MONOMER__m + PI__c";  // modifiers: MG_055_170_277_464_476_20MER__m, MG_072_DIMER__c
  reaction_1529: 13 ATP__c + 13 H2O__c + MG_123_MONOMER__c => 13 ADP__c + 13 H__c + MG_123_MONOMER__m + 13 PI__c; Function_for_ATP__c___H2O__c___MG_123_MONOMER__c__MG_055_170_277_464_476_20MER__m__MG_072_DIMER__c___ADP__c___H__c___MG_123_MONOMER__m___PI__c(ATP__c, Km1_MG_123_MONOMER__c, Km2_ATP__c, MG_055_170_277_464_476_20MER__m, MG_072_DIMER__c, MG_123_MONOMER__c, mw6f26361b_1b94_4256_be16_fe8079165bfc_mwc6bda336_537b_4842_809f_791d7bb5eb7b); reaction_1529 is "ATP__c + H2O__c + MG_123_MONOMER__c -MG_055_170_277_464_476_20MER__m, MG_072_DIMER__c-> ADP__c + H__c + MG_123_MONOMER__m + PI__c";  // modifiers: MG_055_170_277_464_476_20MER__m, MG_072_DIMER__c
  reaction_1530: 8 ATP__c + 8 H2O__c + MG_439_MONOMER__c => 8 ADP__c + 8 H__c + MG_439_MONOMER__m + 8 PI__c; Function_for_ATP__c___H2O__c___MG_439_MONOMER__c__MG_055_170_277_464_476_20MER__m__MG_072_DIMER__c___ADP__c___H__c___MG_439_MONOMER__m___PI__c(ATP__c, Km1_MG_439_MONOMER__c, Km2_ATP__c, MG_055_170_277_464_476_20MER__m, MG_072_DIMER__c, MG_439_MONOMER__c, mw71581900_c26e_42b1_bcf0_180efe6504d5_mw1c7f938f_d81c_408d_9458_02f2af1bab90); reaction_1530 is "ATP__c + H2O__c + MG_439_MONOMER__c -MG_055_170_277_464_476_20MER__m, MG_072_DIMER__c-> ADP__c + H__c + MG_439_MONOMER__m + PI__c";  // modifiers: MG_055_170_277_464_476_20MER__m, MG_072_DIMER__c
  reaction_1531: 4 ATP__c + 4 H2O__c + MG_354_MONOMER__c => 4 ADP__c + 4 H__c + MG_354_MONOMER__m + 4 PI__c; Function_for_ATP__c___H2O__c___MG_354_MONOMER__c__MG_055_170_277_464_476_20MER__m__MG_072_DIMER__c___ADP__c___H__c___MG_354_MONOMER__m___PI__c(ATP__c, Km1_MG_354_MONOMER__c, Km2_ATP__c, MG_055_170_277_464_476_20MER__m, MG_072_DIMER__c, MG_354_MONOMER__c, mw731e0c4d_e480_464f_ae2e_42b5ff335de2_mw90cbfced_84fe_491c_ada4_5fb3b1a93b5c); reaction_1531 is "ATP__c + H2O__c + MG_354_MONOMER__c -MG_055_170_277_464_476_20MER__m, MG_072_DIMER__c-> ADP__c + H__c + MG_354_MONOMER__m + PI__c";  // modifiers: MG_055_170_277_464_476_20MER__m, MG_072_DIMER__c
  reaction_1532: 10 ATP__c + 10 H2O__c + MG_456_MONOMER__c => 10 ADP__c + 10 H__c + MG_456_MONOMER__m + 10 PI__c; Function_for_ATP__c___H2O__c___MG_456_MONOMER__c__MG_055_170_277_464_476_20MER__m__MG_072_DIMER__c___ADP__c___H__c___MG_456_MONOMER__m___PI__c(ATP__c, Km1_MG_456_MONOMER__c, Km2_ATP__c, MG_055_170_277_464_476_20MER__m, MG_072_DIMER__c, MG_456_MONOMER__c, mw76b5ebe7_c0e0_4c92_b122_fb557fc6f085_mwbac113ac_2984_4f15_a156_0d71970d510c); reaction_1532 is "ATP__c + H2O__c + MG_456_MONOMER__c -MG_055_170_277_464_476_20MER__m, MG_072_DIMER__c-> ADP__c + H__c + MG_456_MONOMER__m + PI__c";  // modifiers: MG_055_170_277_464_476_20MER__m, MG_072_DIMER__c
  reaction_1533: 4 ATP__c + 4 H2O__c + MG_524_MONOMER__c => 4 ADP__c + 4 H__c + MG_524_MONOMER__m + 4 PI__c; Function_for_ATP__c___H2O__c___MG_524_MONOMER__c__MG_055_170_277_464_476_20MER__m__MG_072_DIMER__c___ADP__c___H__c___MG_524_MONOMER__m___PI__c(ATP__c, Km1_MG_524_MONOMER__c, Km2_ATP__c, MG_055_170_277_464_476_20MER__m, MG_072_DIMER__c, MG_524_MONOMER__c, mw7c92872e_3ad4_4f32_9161_f721594ee4c4_mw3fe629af_0d42_411f_8146_f75fabe1e25a); reaction_1533 is "ATP__c + H2O__c + MG_524_MONOMER__c -MG_055_170_277_464_476_20MER__m, MG_072_DIMER__c-> ADP__c + H__c + MG_524_MONOMER__m + PI__c";  // modifiers: MG_055_170_277_464_476_20MER__m, MG_072_DIMER__c
  reaction_1534: 34 ATP__c + 34 H2O__c + MG_307_MONOMER__c => 34 ADP__c + 34 H__c + MG_307_MONOMER__m + 34 PI__c; Function_for_ATP__c___H2O__c___MG_307_MONOMER__c__MG_055_170_277_464_476_20MER__m__MG_072_DIMER__c___ADP__c___H__c___MG_307_MONOMER__m___PI__c(ATP__c, Km1_MG_307_MONOMER__c, Km2_ATP__c, MG_055_170_277_464_476_20MER__m, MG_072_DIMER__c, MG_307_MONOMER__c, mw84e0f2b1_1875_492f_afa5_16a38204fc8f_mw72825ae5_3215_4521_ad2a_e5945a59c01b); reaction_1534 is "ATP__c + H2O__c + MG_307_MONOMER__c -MG_055_170_277_464_476_20MER__m, MG_072_DIMER__c-> ADP__c + H__c + MG_307_MONOMER__m + PI__c";  // modifiers: MG_055_170_277_464_476_20MER__m, MG_072_DIMER__c
  reaction_1535: 19 ATP__c + 19 H2O__c + MG_411_MONOMER__c => 19 ADP__c + 19 H__c + MG_411_MONOMER__m + 19 PI__c; Function_for_ATP__c___H2O__c___MG_411_MONOMER__c__MG_055_170_277_464_476_20MER__m__MG_072_DIMER__c___ADP__c___H__c___MG_411_MONOMER__m___PI__c(ATP__c, Km1_MG_411_MONOMER__c, Km2_ATP__c, MG_055_170_277_464_476_20MER__m, MG_072_DIMER__c, MG_411_MONOMER__c, mw89ed1da7_e15c_4c26_84f7_f2a7a25b5ebc_mw74da51a5_3473_427c_8836_9246c7418c16); reaction_1535 is "ATP__c + H2O__c + MG_411_MONOMER__c -MG_055_170_277_464_476_20MER__m, MG_072_DIMER__c-> ADP__c + H__c + MG_411_MONOMER__m + PI__c";  // modifiers: MG_055_170_277_464_476_20MER__m, MG_072_DIMER__c
  reaction_1536: 16 ATP__c + 16 H2O__c + MG_061_MONOMER__c => 16 ADP__c + 16 H__c + MG_061_MONOMER__m + 16 PI__c; Function_for_ATP__c___H2O__c___MG_061_MONOMER__c__MG_055_170_277_464_476_20MER__m__MG_072_DIMER__c___ADP__c___H__c___MG_061_MONOMER__m___PI__c(ATP__c, Km1_MG_061_MONOMER__c, Km2_ATP__c, MG_055_170_277_464_476_20MER__m, MG_061_MONOMER__c, MG_072_DIMER__c, mw8cc3bae6_1211_4d4d_87ed_cfe2c829aa21_mw6f425ad5_2a14_48fb_91fd_81d10ab3f0a6); reaction_1536 is "ATP__c + H2O__c + MG_061_MONOMER__c -MG_055_170_277_464_476_20MER__m, MG_072_DIMER__c-> ADP__c + H__c + MG_061_MONOMER__m + PI__c";  // modifiers: MG_055_170_277_464_476_20MER__m, MG_072_DIMER__c
  reaction_1537: 9 ATP__c + 9 H2O__c + MG_121_MONOMER__c => 9 ADP__c + 9 H__c + MG_121_MONOMER__m + 9 PI__c; Function_for_ATP__c___H2O__c___MG_121_MONOMER__c__MG_055_170_277_464_476_20MER__m__MG_072_DIMER__c___ADP__c___H__c___MG_121_MONOMER__m___PI__c(ATP__c, Km1_MG_121_MONOMER__c, Km2_ATP__c, MG_055_170_277_464_476_20MER__m, MG_072_DIMER__c, MG_121_MONOMER__c, mw914606c4_85d7_4f95_a4ae_7d361e47b24a_mw2893d8f8_f46c_4780_89d7_3a62bb1e7168); reaction_1537 is "ATP__c + H2O__c + MG_121_MONOMER__c -MG_055_170_277_464_476_20MER__m, MG_072_DIMER__c-> ADP__c + H__c + MG_121_MONOMER__m + PI__c";  // modifiers: MG_055_170_277_464_476_20MER__m, MG_072_DIMER__c
  reaction_1538: 4 ATP__c + 4 H2O__c + MG_055_MONOMER__c => 4 ADP__c + 4 H__c + MG_055_MONOMER__m + 4 PI__c; Function_for_ATP__c___H2O__c___MG_055_MONOMER__c__MG_055_170_277_464_476_20MER__m__MG_072_DIMER__c___ADP__c___H__c___MG_055_MONOMER__m___PI__c(ATP__c, Km1_MG_055_MONOMER__c, Km2_ATP__c, MG_055_170_277_464_476_20MER__m, MG_055_MONOMER__c, MG_072_DIMER__c, mw98a11040_8b76_445e_907f_0d2e36bc489a_mw7e39a2a3_aa6a_4e5c_89f1_7d2249803ede); reaction_1538 is "ATP__c + H2O__c + MG_055_MONOMER__c -MG_055_170_277_464_476_20MER__m, MG_072_DIMER__c-> ADP__c + H__c + MG_055_MONOMER__m + PI__c";  // modifiers: MG_055_170_277_464_476_20MER__m, MG_072_DIMER__c
  reaction_1539: 26 ATP__c + 26 H2O__c + MG_069_MONOMER__c => 26 ADP__c + 26 H__c + MG_069_MONOMER__m + 26 PI__c; Function_for_ATP__c___H2O__c___MG_069_MONOMER__c__MG_055_170_277_464_476_20MER__m__MG_072_DIMER__c___ADP__c___H__c___MG_069_MONOMER__m___PI__c(ATP__c, Km1_MG_069_MONOMER__c, Km2_ATP__c, MG_055_170_277_464_476_20MER__m, MG_069_MONOMER__c, MG_072_DIMER__c, mw9956c58c_c87f_4e9c_8b23_ffcea0518ba1_mwda6b5b0f_3116_443a_ad3c_eca261651a70); reaction_1539 is "ATP__c + H2O__c + MG_069_MONOMER__c -MG_055_170_277_464_476_20MER__m, MG_072_DIMER__c-> ADP__c + H__c + MG_069_MONOMER__m + PI__c";  // modifiers: MG_055_170_277_464_476_20MER__m, MG_072_DIMER__c
  reaction_1540: 14 ATP__c + 14 H2O__c + MG_294_MONOMER__c => 14 ADP__c + 14 H__c + MG_294_MONOMER__m + 14 PI__c; Function_for_ATP__c___H2O__c___MG_294_MONOMER__c__MG_055_170_277_464_476_20MER__m__MG_072_DIMER__c___ADP__c___H__c___MG_294_MONOMER__m___PI__c(ATP__c, Km1_MG_294_MONOMER__c, Km2_ATP__c, MG_055_170_277_464_476_20MER__m, MG_072_DIMER__c, MG_294_MONOMER__c, mw9cd6faef_393f_4e11_a40e_13b2ad4f4c2d_mwd332800f_1b9d_40e1_a799_29e92685c2fd); reaction_1540 is "ATP__c + H2O__c + MG_294_MONOMER__c -MG_055_170_277_464_476_20MER__m, MG_072_DIMER__c-> ADP__c + H__c + MG_294_MONOMER__m + PI__c";  // modifiers: MG_055_170_277_464_476_20MER__m, MG_072_DIMER__c
  reaction_1541: 11 ATP__c + 11 H2O__c + MG_306_MONOMER__c => 11 ADP__c + 11 H__c + MG_306_MONOMER__m + 11 PI__c; Function_for_ATP__c___H2O__c___MG_306_MONOMER__c__MG_055_170_277_464_476_20MER__m__MG_072_DIMER__c___ADP__c___H__c___MG_306_MONOMER__m___PI__c(ATP__c, Km1_MG_306_MONOMER__c, Km2_ATP__c, MG_055_170_277_464_476_20MER__m, MG_072_DIMER__c, MG_306_MONOMER__c, mwa0a369ab_ce7a_4b6a_9f06_002aa7c470f0_mw2c8fc140_7ce8_490d_ab05_a10c2b7db8ca); reaction_1541 is "ATP__c + H2O__c + MG_306_MONOMER__c -MG_055_170_277_464_476_20MER__m, MG_072_DIMER__c-> ADP__c + H__c + MG_306_MONOMER__m + PI__c";  // modifiers: MG_055_170_277_464_476_20MER__m, MG_072_DIMER__c
  reaction_1542: 16 ATP__c + 16 H2O__c + MG_397_MONOMER__c => 16 ADP__c + 16 H__c + MG_397_MONOMER__e + 16 PI__c; Function_for_ATP__c___H2O__c___MG_397_MONOMER__c__MG_055_170_277_464_476_20MER__m__MG_072_DIMER__c___ADP__c___H__c___MG_397_MONOMER__e___PI__c(ATP__c, Km1_MG_397_MONOMER__c, Km2_ATP__c, MG_055_170_277_464_476_20MER__m, MG_072_DIMER__c, MG_397_MONOMER__c, mwa0e11e53_b154_4448_a260_27c460f7894a_mwcc68414c_ef80_4a82_8707_bd0443b5d7c6); reaction_1542 is "ATP__c + H2O__c + MG_397_MONOMER__c -MG_055_170_277_464_476_20MER__m, MG_072_DIMER__c-> ADP__c + H__c + MG_397_MONOMER__e + PI__c";  // modifiers: MG_055_170_277_464_476_20MER__m, MG_072_DIMER__c
  reaction_1543: 18 ATP__c + 18 H2O__c + MG_241_MONOMER__c => 18 ADP__c + 18 H__c + MG_241_MONOMER__m + 18 PI__c; Function_for_ATP__c___H2O__c___MG_241_MONOMER__c__MG_055_170_277_464_476_20MER__m__MG_072_DIMER__c___ADP__c___H__c___MG_241_MONOMER__m___PI__c(ATP__c, Km1_MG_241_MONOMER__c, Km2_ATP__c, MG_055_170_277_464_476_20MER__m, MG_072_DIMER__c, MG_241_MONOMER__c, mwa7323961_7675_449c_bee1_f83525e3135f_mwcde2fca7_9f37_4c54_bd96_178294666c02); reaction_1543 is "ATP__c + H2O__c + MG_241_MONOMER__c -MG_055_170_277_464_476_20MER__m, MG_072_DIMER__c-> ADP__c + H__c + MG_241_MONOMER__m + PI__c";  // modifiers: MG_055_170_277_464_476_20MER__m, MG_072_DIMER__c
  reaction_1544: 8 ATP__c + 8 H2O__c + MG_280_MONOMER__c => 8 ADP__c + 8 H__c + MG_280_MONOMER__m + 8 PI__c; Function_for_ATP__c___H2O__c___MG_280_MONOMER__c__MG_055_170_277_464_476_20MER__m__MG_072_DIMER__c___ADP__c___H__c___MG_280_MONOMER__m___PI__c(ATP__c, Km1_MG_280_MONOMER__c, Km2_ATP__c, MG_055_170_277_464_476_20MER__m, MG_072_DIMER__c, MG_280_MONOMER__c, mwae4f6c56_2284_4dcd_90bc_f2a5eaaad08e_mw940189b0_b9b2_4846_a5ce_83c68a6c5b83); reaction_1544 is "ATP__c + H2O__c + MG_280_MONOMER__c -MG_055_170_277_464_476_20MER__m, MG_072_DIMER__c-> ADP__c + H__c + MG_280_MONOMER__m + PI__c";  // modifiers: MG_055_170_277_464_476_20MER__m, MG_072_DIMER__c
  reaction_1545: 16 ATP__c + 16 H2O__c + MG_281_MONOMER__c => 16 ADP__c + 16 H__c + MG_281_MONOMER__e + 16 PI__c; Function_for_ATP__c___H2O__c___MG_281_MONOMER__c__MG_055_170_277_464_476_20MER__m__MG_072_DIMER__c___ADP__c___H__c___MG_281_MONOMER__e___PI__c(ATP__c, Km1_MG_281_MONOMER__c, Km2_ATP__c, MG_055_170_277_464_476_20MER__m, MG_072_DIMER__c, MG_281_MONOMER__c, mwaeb47bca_ac70_4da0_bf11_e6d1818b7ae5_mwa8f9a427_7347_4e8d_8426_6e3a8bc60452); reaction_1545 is "ATP__c + H2O__c + MG_281_MONOMER__c -MG_055_170_277_464_476_20MER__m, MG_072_DIMER__c-> ADP__c + H__c + MG_281_MONOMER__e + PI__c";  // modifiers: MG_055_170_277_464_476_20MER__m, MG_072_DIMER__c
  reaction_1546: 6 ATP__c + 6 H2O__c + MG_028_MONOMER__c => 6 ADP__c + 6 H__c + MG_028_MONOMER__m + 6 PI__c; Function_for_ATP__c___H2O__c___MG_028_MONOMER__c__MG_055_170_277_464_476_20MER__m__MG_072_DIMER__c___ADP__c___H__c___MG_028_MONOMER__m___PI__c(ATP__c, Km1_MG_028_MONOMER__c, Km2_ATP__c, MG_028_MONOMER__c, MG_055_170_277_464_476_20MER__m, MG_072_DIMER__c, mwb1f07fc3_6224_4193_9fc8_1dd67185fd52_mw2dbbb1cc_2982_42a5_b321_2edc366b41d0); reaction_1546 is "ATP__c + H2O__c + MG_028_MONOMER__c -MG_055_170_277_464_476_20MER__m, MG_072_DIMER__c-> ADP__c + H__c + MG_028_MONOMER__m + PI__c";  // modifiers: MG_055_170_277_464_476_20MER__m, MG_072_DIMER__c
  reaction_1547: 11 ATP__c + 11 H2O__c + MG_432_MONOMER__c => 11 ADP__c + 11 H__c + MG_432_MONOMER__m + 11 PI__c; Function_for_ATP__c___H2O__c___MG_432_MONOMER__c__MG_055_170_277_464_476_20MER__m__MG_072_DIMER__c___ADP__c___H__c___MG_432_MONOMER__m___PI__c(ATP__c, Km1_MG_432_MONOMER__c, Km2_ATP__c, MG_055_170_277_464_476_20MER__m, MG_072_DIMER__c, MG_432_MONOMER__c, mwb2055382_2a10_408f_9a42_4c7282124b8d_mw02d7b1ca_224d_4f8b_9c7e_3aae85f0e765); reaction_1547 is "ATP__c + H2O__c + MG_432_MONOMER__c -MG_055_170_277_464_476_20MER__m, MG_072_DIMER__c-> ADP__c + H__c + MG_432_MONOMER__m + PI__c";  // modifiers: MG_055_170_277_464_476_20MER__m, MG_072_DIMER__c
  reaction_1548: 14 ATP__c + 14 H2O__c + MG_225_MONOMER__c => 14 ADP__c + 14 H__c + MG_225_MONOMER__m + 14 PI__c; Function_for_ATP__c___H2O__c___MG_225_MONOMER__c__MG_055_170_277_464_476_20MER__m__MG_072_DIMER__c___ADP__c___H__c___MG_225_MONOMER__m___PI__c(ATP__c, Km1_MG_225_MONOMER__c, Km2_ATP__c, MG_055_170_277_464_476_20MER__m, MG_072_DIMER__c, MG_225_MONOMER__c, mwb71a6dce_3c95_4a2d_a963_5490b3925b3f_mw2dd7d67c_9134_4aa1_94ad_7441218fc26e); reaction_1548 is "ATP__c + H2O__c + MG_225_MONOMER__c -MG_055_170_277_464_476_20MER__m, MG_072_DIMER__c-> ADP__c + H__c + MG_225_MONOMER__m + PI__c";  // modifiers: MG_055_170_277_464_476_20MER__m, MG_072_DIMER__c
  reaction_1549: 20 ATP__c + 20 H2O__c + MG_457_MONOMER__c => 20 ADP__c + 20 H__c + MG_457_MONOMER__m + 20 PI__c; Function_for_ATP__c___H2O__c___MG_457_MONOMER__c__MG_055_170_277_464_476_20MER__m__MG_072_DIMER__c___ADP__c___H__c___MG_457_MONOMER__m___PI__c(ATP__c, Km1_MG_457_MONOMER__c, Km2_ATP__c, MG_055_170_277_464_476_20MER__m, MG_072_DIMER__c, MG_457_MONOMER__c, mwb8e77d5e_8425_4276_89a0_9b613392c53b_mw22255b4b_b579_4333_af5e_749a01be15ef); reaction_1549 is "ATP__c + H2O__c + MG_457_MONOMER__c -MG_055_170_277_464_476_20MER__m, MG_072_DIMER__c-> ADP__c + H__c + MG_457_MONOMER__m + PI__c";  // modifiers: MG_055_170_277_464_476_20MER__m, MG_072_DIMER__c
  reaction_1550: 6 ATP__c + 6 H2O__c + MG_521_MONOMER__c => 6 ADP__c + 6 H__c + MG_521_MONOMER__m + 6 PI__c; Function_for_ATP__c___H2O__c___MG_521_MONOMER__c__MG_055_170_277_464_476_20MER__m__MG_072_DIMER__c___ADP__c___H__c___MG_521_MONOMER__m___PI__c(ATP__c, Km1_MG_521_MONOMER__c, Km2_ATP__c, MG_055_170_277_464_476_20MER__m, MG_072_DIMER__c, MG_521_MONOMER__c, mwbc04e67d_2c78_4a69_8d5b_81a2b6a0657f_mwa79d19e6_dbc8_4cb0_a044_686c42f88c3a); reaction_1550 is "ATP__c + H2O__c + MG_521_MONOMER__c -MG_055_170_277_464_476_20MER__m, MG_072_DIMER__c-> ADP__c + H__c + MG_521_MONOMER__m + PI__c";  // modifiers: MG_055_170_277_464_476_20MER__m, MG_072_DIMER__c
  reaction_1551: 35 ATP__c + 35 H2O__c + MG_309_MONOMER__c => 35 ADP__c + 35 H__c + MG_309_MONOMER__m + 35 PI__c; Function_for_ATP__c___H2O__c___MG_309_MONOMER__c__MG_055_170_277_464_476_20MER__m__MG_072_DIMER__c___ADP__c___H__c___MG_309_MONOMER__m___PI__c(ATP__c, Km1_MG_309_MONOMER__c, Km2_ATP__c, MG_055_170_277_464_476_20MER__m, MG_072_DIMER__c, MG_309_MONOMER__c, mwbe06e593_d008_475f_9e61_75bed67b4bab_mwdef91057_28f5_4c09_945d_13073ac6c21b); reaction_1551 is "ATP__c + H2O__c + MG_309_MONOMER__c -MG_055_170_277_464_476_20MER__m, MG_072_DIMER__c-> ADP__c + H__c + MG_309_MONOMER__m + PI__c";  // modifiers: MG_055_170_277_464_476_20MER__m, MG_072_DIMER__c
  reaction_1552: 16 ATP__c + 16 H2O__c + MG_322_MONOMER__c => 16 ADP__c + 16 H__c + MG_322_MONOMER__m + 16 PI__c; Function_for_ATP__c___H2O__c___MG_322_MONOMER__c__MG_055_170_277_464_476_20MER__m__MG_072_DIMER__c___ADP__c___H__c___MG_322_MONOMER__m___PI__c(ATP__c, Km1_MG_322_MONOMER__c, Km2_ATP__c, MG_055_170_277_464_476_20MER__m, MG_072_DIMER__c, MG_322_MONOMER__c, mwc3bde18e_cc23_45a6_a6b6_7d91062e7678_mwe43c7ef1_f9ae_470b_a950_6f28de0e1561); reaction_1552 is "ATP__c + H2O__c + MG_322_MONOMER__c -MG_055_170_277_464_476_20MER__m, MG_072_DIMER__c-> ADP__c + H__c + MG_322_MONOMER__m + PI__c";  // modifiers: MG_055_170_277_464_476_20MER__m, MG_072_DIMER__c
  reaction_1553: 12 ATP__c + 12 H2O__c + MG_077_MONOMER__c => 12 ADP__c + 12 H__c + MG_077_MONOMER__m + 12 PI__c; Function_for_ATP__c___H2O__c___MG_077_MONOMER__c__MG_055_170_277_464_476_20MER__m__MG_072_DIMER__c___ADP__c___H__c___MG_077_MONOMER__m___PI__c(ATP__c, Km1_MG_077_MONOMER__c, Km2_ATP__c, MG_055_170_277_464_476_20MER__m, MG_072_DIMER__c, MG_077_MONOMER__c, mwc8ac7e73_2d08_4839_b3f7_71a5eb961f86_mw272cd6f3_832b_4e22_83e2_0669f6171017); reaction_1553 is "ATP__c + H2O__c + MG_077_MONOMER__c -MG_055_170_277_464_476_20MER__m, MG_072_DIMER__c-> ADP__c + H__c + MG_077_MONOMER__m + PI__c";  // modifiers: MG_055_170_277_464_476_20MER__m, MG_072_DIMER__c
  reaction_1554: 8 ATP__c + 8 H2O__c + MG_405_MONOMER__c => 8 ADP__c + 8 H__c + MG_405_MONOMER__m + 8 PI__c; Function_for_ATP__c___H2O__c___MG_405_MONOMER__c__MG_055_170_277_464_476_20MER__m__MG_072_DIMER__c___ADP__c___H__c___MG_405_MONOMER__m___PI__c(ATP__c, Km1_MG_405_MONOMER__c, Km2_ATP__c, MG_055_170_277_464_476_20MER__m, MG_072_DIMER__c, MG_405_MONOMER__c, mwca087d8c_b24e_4682_9943_ab54907ef9e7_mwb80aae3b_e132_4106_9279_b8ebd7797c4b); reaction_1554 is "ATP__c + H2O__c + MG_405_MONOMER__c -MG_055_170_277_464_476_20MER__m, MG_072_DIMER__c-> ADP__c + H__c + MG_405_MONOMER__m + PI__c";  // modifiers: MG_055_170_277_464_476_20MER__m, MG_072_DIMER__c
  reaction_1555: 11 ATP__c + 11 H2O__c + MG_086_MONOMER__c => 11 ADP__c + 11 H__c + MG_086_MONOMER__m + 11 PI__c; Function_for_ATP__c___H2O__c___MG_086_MONOMER__c__MG_055_170_277_464_476_20MER__m__MG_072_DIMER__c___ADP__c___H__c___MG_086_MONOMER__m___PI__c(ATP__c, Km1_MG_086_MONOMER__c, Km2_ATP__c, MG_055_170_277_464_476_20MER__m, MG_072_DIMER__c, MG_086_MONOMER__c, mwcbf4da38_e9cd_40f4_bf0b_b0eabf973c4f_mwe44ba274_998f_4032_a713_5d08d4ee148f); reaction_1555 is "ATP__c + H2O__c + MG_086_MONOMER__c -MG_055_170_277_464_476_20MER__m, MG_072_DIMER__c-> ADP__c + H__c + MG_086_MONOMER__m + PI__c";  // modifiers: MG_055_170_277_464_476_20MER__m, MG_072_DIMER__c
  reaction_1556: 9 ATP__c + 9 H2O__c + MG_348_MONOMER__c => 9 ADP__c + 9 H__c + MG_348_MONOMER__m + 9 PI__c; Function_for_ATP__c___H2O__c___MG_348_MONOMER__c__MG_055_170_277_464_476_20MER__m__MG_072_DIMER__c___ADP__c___H__c___MG_348_MONOMER__m___PI__c(ATP__c, Km1_MG_348_MONOMER__c, Km2_ATP__c, MG_055_170_277_464_476_20MER__m, MG_072_DIMER__c, MG_348_MONOMER__c, mwd026f4e8_d82c_4fad_a8be_923e1178c437_mw79b48654_d158_4790_bdb1_47125fccd1a7); reaction_1556 is "ATP__c + H2O__c + MG_348_MONOMER__c -MG_055_170_277_464_476_20MER__m, MG_072_DIMER__c-> ADP__c + H__c + MG_348_MONOMER__m + PI__c";  // modifiers: MG_055_170_277_464_476_20MER__m, MG_072_DIMER__c
  reaction_1557: 7 ATP__c + 7 H2O__c + MG_247_MONOMER__c => 7 ADP__c + 7 H__c + MG_247_MONOMER__m + 7 PI__c; Function_for_ATP__c___H2O__c___MG_247_MONOMER__c__MG_055_170_277_464_476_20MER__m__MG_072_DIMER__c___ADP__c___H__c___MG_247_MONOMER__m___PI__c(ATP__c, Km1_MG_247_MONOMER__c, Km2_ATP__c, MG_055_170_277_464_476_20MER__m, MG_072_DIMER__c, MG_247_MONOMER__c, mwd03247aa_2e55_477b_85c0_9c0b414f858e_mw28747366_fb1c_4ec1_848e_b7316d2e15ae); reaction_1557 is "ATP__c + H2O__c + MG_247_MONOMER__c -MG_055_170_277_464_476_20MER__m, MG_072_DIMER__c-> ADP__c + H__c + MG_247_MONOMER__m + PI__c";  // modifiers: MG_055_170_277_464_476_20MER__m, MG_072_DIMER__c
  reaction_1558: 16 ATP__c + 16 H2O__c + MG_447_MONOMER__c => 16 ADP__c + 16 H__c + MG_447_MONOMER__m + 16 PI__c; Function_for_ATP__c___H2O__c___MG_447_MONOMER__c__MG_055_170_277_464_476_20MER__m__MG_072_DIMER__c___ADP__c___H__c___MG_447_MONOMER__m___PI__c(ATP__c, Km1_MG_447_MONOMER__c, Km2_ATP__c, MG_055_170_277_464_476_20MER__m, MG_072_DIMER__c, MG_447_MONOMER__c, mwd0f2fd5e_3219_4b83_9a80_2d0e147b98bb_mwacdaacbb_69f7_464e_8f4e_22e62b03797d); reaction_1558 is "ATP__c + H2O__c + MG_447_MONOMER__c -MG_055_170_277_464_476_20MER__m, MG_072_DIMER__c-> ADP__c + H__c + MG_447_MONOMER__m + PI__c";  // modifiers: MG_055_170_277_464_476_20MER__m, MG_072_DIMER__c
  reaction_1559: 25 ATP__c + 25 H2O__c + MG_071_MONOMER__c => 25 ADP__c + 25 H__c + MG_071_MONOMER__m + 25 PI__c; Function_for_ATP__c___H2O__c___MG_071_MONOMER__c__MG_055_170_277_464_476_20MER__m__MG_072_DIMER__c___ADP__c___H__c___MG_071_MONOMER__m___PI__c(ATP__c, Km1_MG_071_MONOMER__c, Km2_ATP__c, MG_055_170_277_464_476_20MER__m, MG_071_MONOMER__c, MG_072_DIMER__c, mwd51828a2_81dd_4d1d_b298_ae01b8c28d7b_mwe022097f_87be_4074_be72_c6533747e430); reaction_1559 is "ATP__c + H2O__c + MG_071_MONOMER__c -MG_055_170_277_464_476_20MER__m, MG_072_DIMER__c-> ADP__c + H__c + MG_071_MONOMER__m + PI__c";  // modifiers: MG_055_170_277_464_476_20MER__m, MG_072_DIMER__c
  reaction_1560: 13 ATP__c + 13 H2O__c + MG_314_MONOMER__c => 13 ADP__c + 13 H__c + MG_314_MONOMER__m + 13 PI__c; Function_for_ATP__c___H2O__c___MG_314_MONOMER__c__MG_055_170_277_464_476_20MER__m__MG_072_DIMER__c___ADP__c___H__c___MG_314_MONOMER__m___PI__c(ATP__c, Km1_MG_314_MONOMER__c, Km2_ATP__c, MG_055_170_277_464_476_20MER__m, MG_072_DIMER__c, MG_314_MONOMER__c, mwd5cf4645_824b_4730_9259_50d63e7f9383_mwfb44cb3c_76ec_4fcf_b495_d43d194bb6d4); reaction_1560 is "ATP__c + H2O__c + MG_314_MONOMER__c -MG_055_170_277_464_476_20MER__m, MG_072_DIMER__c-> ADP__c + H__c + MG_314_MONOMER__m + PI__c";  // modifiers: MG_055_170_277_464_476_20MER__m, MG_072_DIMER__c
  reaction_1561: 2 ATP__c + 2 H2O__c + MG_131_MONOMER__c => 2 ADP__c + 2 H__c + MG_131_MONOMER__m + 2 PI__c; Function_for_ATP__c___H2O__c___MG_131_MONOMER__c__MG_055_170_277_464_476_20MER__m__MG_072_DIMER__c___ADP__c___H__c___MG_131_MONOMER__m___PI__c(ATP__c, Km1_MG_131_MONOMER__c, Km2_ATP__c, MG_055_170_277_464_476_20MER__m, MG_072_DIMER__c, MG_131_MONOMER__c, mwd5eb53f9_7ba6_4148_ba37_bac1b763e776_mw203aacc0_79d4_4a39_ab98_5416123078e9); reaction_1561 is "ATP__c + H2O__c + MG_131_MONOMER__c -MG_055_170_277_464_476_20MER__m, MG_072_DIMER__c-> ADP__c + H__c + MG_131_MONOMER__m + PI__c";  // modifiers: MG_055_170_277_464_476_20MER__m, MG_072_DIMER__c
  reaction_1562: 8 ATP__c + 8 H2O__c + MG_327_MONOMER__c => 8 ADP__c + 8 H__c + MG_327_MONOMER__e + 8 PI__c; Function_for_ATP__c___H2O__c___MG_327_MONOMER__c__MG_055_170_277_464_476_20MER__m__MG_072_DIMER__c___ADP__c___H__c___MG_327_MONOMER__e___PI__c(ATP__c, Km1_MG_327_MONOMER__c, Km2_ATP__c, MG_055_170_277_464_476_20MER__m, MG_072_DIMER__c, MG_327_MONOMER__c, mwd6bf57ab_88bf_45ec_abcc_757e8be9be04_mwa66c8f84_63dc_467b_b683_f38e4fd08da2); reaction_1562 is "ATP__c + H2O__c + MG_327_MONOMER__c -MG_055_170_277_464_476_20MER__m, MG_072_DIMER__c-> ADP__c + H__c + MG_327_MONOMER__e + PI__c";  // modifiers: MG_055_170_277_464_476_20MER__m, MG_072_DIMER__c
  reaction_1563: 6 ATP__c + 6 H2O__c + MG_286_MONOMER__c => 6 ADP__c + 6 H__c + MG_286_MONOMER__e + 6 PI__c; Function_for_ATP__c___H2O__c___MG_286_MONOMER__c__MG_055_170_277_464_476_20MER__m__MG_072_DIMER__c___ADP__c___H__c___MG_286_MONOMER__e___PI__c(ATP__c, Km1_MG_286_MONOMER__c, Km2_ATP__c, MG_055_170_277_464_476_20MER__m, MG_072_DIMER__c, MG_286_MONOMER__c, mwd9a9bea8_cfa4_4b3f_89e7_e43da84d573f_mw3f65d0d5_3b8b_499a_b758_d66d6fca0adc); reaction_1563 is "ATP__c + H2O__c + MG_286_MONOMER__c -MG_055_170_277_464_476_20MER__m, MG_072_DIMER__c-> ADP__c + H__c + MG_286_MONOMER__e + PI__c";  // modifiers: MG_055_170_277_464_476_20MER__m, MG_072_DIMER__c
  reaction_1564: 5 ATP__c + 5 H2O__c + MG_210_MONOMER__c => 5 ADP__c + 5 H__c + MG_210_MONOMER__m + 5 PI__c; Function_for_ATP__c___H2O__c___MG_210_MONOMER__c__MG_055_170_277_464_476_20MER__m__MG_072_DIMER__c___ADP__c___H__c___MG_210_MONOMER__m___PI__c(ATP__c, Km1_MG_210_MONOMER__c, Km2_ATP__c, MG_055_170_277_464_476_20MER__m, MG_072_DIMER__c, MG_210_MONOMER__c, mwdd02747f_7d58_4876_8f02_87867711ac6c_mw010add1e_e52e_40c1_9d51_4433dd175653); reaction_1564 is "ATP__c + H2O__c + MG_210_MONOMER__c -MG_055_170_277_464_476_20MER__m, MG_072_DIMER__c-> ADP__c + H__c + MG_210_MONOMER__m + PI__c";  // modifiers: MG_055_170_277_464_476_20MER__m, MG_072_DIMER__c
  reaction_1565: 36 ATP__c + 36 H2O__c + MG_338_MONOMER__c => 36 ADP__c + 36 H__c + MG_338_MONOMER__m + 36 PI__c; Function_for_ATP__c___H2O__c___MG_338_MONOMER__c__MG_055_170_277_464_476_20MER__m__MG_072_DIMER__c___ADP__c___H__c___MG_338_MONOMER__m___PI__c(ATP__c, Km1_MG_338_MONOMER__c, Km2_ATP__c, MG_055_170_277_464_476_20MER__m, MG_072_DIMER__c, MG_338_MONOMER__c, mwdeeea4dc_9942_4ede_93e0_d3a9d4946888_mwcd661af4_c6db_4b23_b087_2281f5ac4b4e); reaction_1565 is "ATP__c + H2O__c + MG_338_MONOMER__c -MG_055_170_277_464_476_20MER__m, MG_072_DIMER__c-> ADP__c + H__c + MG_338_MONOMER__m + PI__c";  // modifiers: MG_055_170_277_464_476_20MER__m, MG_072_DIMER__c
  reaction_1566: 6 ATP__c + 6 H2O__c + MG_243_MONOMER__c => 6 ADP__c + 6 H__c + MG_243_MONOMER__m + 6 PI__c; Function_for_ATP__c___H2O__c___MG_243_MONOMER__c__MG_055_170_277_464_476_20MER__m__MG_072_DIMER__c___ADP__c___H__c___MG_243_MONOMER__m___PI__c(ATP__c, Km1_MG_243_MONOMER__c, Km2_ATP__c, MG_055_170_277_464_476_20MER__m, MG_072_DIMER__c, MG_243_MONOMER__c, mwedb5b7d8_fa19_4b96_9726_fca71967de71_mweae32c09_5ed0_4d69_8218_6646bafac886); reaction_1566 is "ATP__c + H2O__c + MG_243_MONOMER__c -MG_055_170_277_464_476_20MER__m, MG_072_DIMER__c-> ADP__c + H__c + MG_243_MONOMER__m + PI__c";  // modifiers: MG_055_170_277_464_476_20MER__m, MG_072_DIMER__c
  reaction_1567: 8 ATP__c + 8 H2O__c + MG_133_MONOMER__c => 8 ADP__c + 8 H__c + MG_133_MONOMER__m + 8 PI__c; Function_for_ATP__c___H2O__c___MG_133_MONOMER__c__MG_055_170_277_464_476_20MER__m__MG_072_DIMER__c___ADP__c___H__c___MG_133_MONOMER__m___PI__c(ATP__c, Km1_MG_133_MONOMER__c, Km2_ATP__c, MG_055_170_277_464_476_20MER__m, MG_072_DIMER__c, MG_133_MONOMER__c, mwf6fb8fc5_260f_43f4_9832_ccec480e08fc_mw919fef45_a406_4216_afde_5a9dc4ae63cc); reaction_1567 is "ATP__c + H2O__c + MG_133_MONOMER__c -MG_055_170_277_464_476_20MER__m, MG_072_DIMER__c-> ADP__c + H__c + MG_133_MONOMER__m + PI__c";  // modifiers: MG_055_170_277_464_476_20MER__m, MG_072_DIMER__c
  reaction_1568: 18 ATP__c + 18 H2O__c + MG_242_MONOMER__c => 18 ADP__c + 18 H__c + MG_242_MONOMER__m + 18 PI__c; Function_for_ATP__c___H2O__c___MG_242_MONOMER__c__MG_055_170_277_464_476_20MER__m__MG_072_DIMER__c___ADP__c___H__c___MG_242_MONOMER__m___PI__c(ATP__c, Km1_MG_242_MONOMER__c, Km2_ATP__c, MG_055_170_277_464_476_20MER__m, MG_072_DIMER__c, MG_242_MONOMER__c, mwf7098517_c312_43bf_92a1_158a0ecb489a_mw2597d960_a6c2_4d72_bb35_ce8029faf7df); reaction_1568 is "ATP__c + H2O__c + MG_242_MONOMER__c -MG_055_170_277_464_476_20MER__m, MG_072_DIMER__c-> ADP__c + H__c + MG_242_MONOMER__m + PI__c";  // modifiers: MG_055_170_277_464_476_20MER__m, MG_072_DIMER__c
  reaction_1569: 8 ATP__c + 8 H2O__c + MG_344_MONOMER__c => 8 ADP__c + 8 H__c + MG_344_MONOMER__e + 8 PI__c; Function_for_ATP__c___H2O__c___MG_344_MONOMER__c__MG_055_170_277_464_476_20MER__m__MG_072_DIMER__c___ADP__c___H__c___MG_344_MONOMER__e___PI__c(ATP__c, Km1_MG_344_MONOMER__c, Km2_ATP__c, MG_055_170_277_464_476_20MER__m, MG_072_DIMER__c, MG_344_MONOMER__c, mwf7d8d0de_bf7e_4d5d_9f38_79cd451b943a_mw95c536cd_1004_45da_aca3_86a05790681b); reaction_1569 is "ATP__c + H2O__c + MG_344_MONOMER__c -MG_055_170_277_464_476_20MER__m, MG_072_DIMER__c-> ADP__c + H__c + MG_344_MONOMER__e + PI__c";  // modifiers: MG_055_170_277_464_476_20MER__m, MG_072_DIMER__c
  reaction_1570: 14 ATP__c + 14 H2O__c + MG_130_MONOMER__c => 14 ADP__c + 14 H__c + MG_130_MONOMER__m + 14 PI__c; Function_for_ATP__c___H2O__c___MG_130_MONOMER__c__MG_055_170_277_464_476_20MER__m__MG_072_DIMER__c___ADP__c___H__c___MG_130_MONOMER__m___PI__c(ATP__c, Km1_MG_130_MONOMER__c, Km2_ATP__c, MG_055_170_277_464_476_20MER__m, MG_072_DIMER__c, MG_130_MONOMER__c, mwfffcc060_5a0c_4565_9c3b_8590fb91f516_mw529e64f5_f411_4ac6_b8ff_e54f4d38f813); reaction_1570 is "ATP__c + H2O__c + MG_130_MONOMER__c -MG_055_170_277_464_476_20MER__m, MG_072_DIMER__c-> ADP__c + H__c + MG_130_MONOMER__m + PI__c";  // modifiers: MG_055_170_277_464_476_20MER__m, MG_072_DIMER__c
  reaction_1571: 17 ATP__c + 17 H2O__c + MG_015_MONOMER__c => 17 ADP__c + 17 H__c + MG_015_MONOMER__m + 17 PI__c; Function_for_ATP__c___H2O__c___MG_015_MONOMER__c__MG_055_170_277_464_476_20MER__m__MG_072_DIMER__c___ADP__c___H__c___MG_015_MONOMER__m___PI__c(ATP__c, Km1_MG_015_MONOMER__c, Km2_ATP__c, MG_015_MONOMER__c, MG_055_170_277_464_476_20MER__m, MG_072_DIMER__c, mw04879626_522f_4ff1_a4e6_bd0b359eee12_mwf381e780_1ad9_4957_9424_4ff41281fd5a); reaction_1571 is "ATP__c + H2O__c + MG_015_MONOMER__c -MG_055_170_277_464_476_20MER__m, MG_072_DIMER__c-> ADP__c + H__c + MG_015_MONOMER__m + PI__c";  // modifiers: MG_055_170_277_464_476_20MER__m, MG_072_DIMER__c
  reaction_1572: 2 ATP__c + 2 H2O__c + MG_476_MONOMER__c => 2 ADP__c + 2 H__c + MG_476_MONOMER__m + 2 PI__c; Function_for_ATP__c___H2O__c___MG_476_MONOMER__c__MG_055_170_277_464_476_20MER__m__MG_072_DIMER__c___ADP__c___H__c___MG_476_MONOMER__m___PI__c(ATP__c, Km1_MG_476_MONOMER__c, Km2_ATP__c, MG_055_170_277_464_476_20MER__m, MG_072_DIMER__c, MG_476_MONOMER__c, mw05f18bf3_ff9f_498f_98e0_9c90cce8ca48_mw0454fdf0_88e2_4d8c_9eee_16603e50f644); reaction_1572 is "ATP__c + H2O__c + MG_476_MONOMER__c -MG_055_170_277_464_476_20MER__m, MG_072_DIMER__c-> ADP__c + H__c + MG_476_MONOMER__m + PI__c";  // modifiers: MG_055_170_277_464_476_20MER__m, MG_072_DIMER__c
  reaction_1573: 4 ATP__c + 4 H2O__c + MG_474_MONOMER__c => 4 ADP__c + 4 H__c + MG_474_MONOMER__m + 4 PI__c; Function_for_ATP__c___H2O__c___MG_474_MONOMER__c__MG_055_170_277_464_476_20MER__m__MG_072_DIMER__c___ADP__c___H__c___MG_474_MONOMER__m___PI__c(ATP__c, Km1_MG_474_MONOMER__c, Km2_ATP__c, MG_055_170_277_464_476_20MER__m, MG_072_DIMER__c, MG_474_MONOMER__c, mw1bd76e06_77be_4007_b04e_9e3e94d1d388_mwf3de89ab_05b8_43fd_8428_53ff96725bec); reaction_1573 is "ATP__c + H2O__c + MG_474_MONOMER__c -MG_055_170_277_464_476_20MER__m, MG_072_DIMER__c-> ADP__c + H__c + MG_474_MONOMER__m + PI__c";  // modifiers: MG_055_170_277_464_476_20MER__m, MG_072_DIMER__c
  reaction_1574: 14 ATP__c + 14 H2O__c + MG_226_MONOMER__c => 14 ADP__c + 14 H__c + MG_226_MONOMER__m + 14 PI__c; Function_for_ATP__c___H2O__c___MG_226_MONOMER__c__MG_055_170_277_464_476_20MER__m__MG_072_DIMER__c___ADP__c___H__c___MG_226_MONOMER__m___PI__c(ATP__c, Km1_MG_226_MONOMER__c, Km2_ATP__c, MG_055_170_277_464_476_20MER__m, MG_072_DIMER__c, MG_226_MONOMER__c, mw1c7465d1_1eb0_4c15_af39_3a32b27de536_mwaf481887_bd48_4e61_882e_41d036d4564f); reaction_1574 is "ATP__c + H2O__c + MG_226_MONOMER__c -MG_055_170_277_464_476_20MER__m, MG_072_DIMER__c-> ADP__c + H__c + MG_226_MONOMER__m + PI__c";  // modifiers: MG_055_170_277_464_476_20MER__m, MG_072_DIMER__c
  reaction_1575: 7 ATP__c + 7 H2O__c + MG_440_MONOMER__c => 7 ADP__c + 7 H__c + MG_440_MONOMER__m + 7 PI__c; Function_for_ATP__c___H2O__c___MG_440_MONOMER__c__MG_055_170_277_464_476_20MER__m__MG_072_DIMER__c___ADP__c___H__c___MG_440_MONOMER__m___PI__c(ATP__c, Km1_MG_440_MONOMER__c, Km2_ATP__c, MG_055_170_277_464_476_20MER__m, MG_072_DIMER__c, MG_440_MONOMER__c, mw1f523642_709a_4908_bfe0_1b301772c67f_mw8e3a2830_1ba0_453f_aeff_07fc5ce9f9ab); reaction_1575 is "ATP__c + H2O__c + MG_440_MONOMER__c -MG_055_170_277_464_476_20MER__m, MG_072_DIMER__c-> ADP__c + H__c + MG_440_MONOMER__m + PI__c";  // modifiers: MG_055_170_277_464_476_20MER__m, MG_072_DIMER__c
  reaction_1576: 4 ATP__c + 4 H2O__c + MG_441_MONOMER__c => 4 ADP__c + 4 H__c + MG_441_MONOMER__m + 4 PI__c; Function_for_ATP__c___H2O__c___MG_441_MONOMER__c__MG_055_170_277_464_476_20MER__m__MG_072_DIMER__c___ADP__c___H__c___MG_441_MONOMER__m___PI__c(ATP__c, Km1_MG_441_MONOMER__c, Km2_ATP__c, MG_055_170_277_464_476_20MER__m, MG_072_DIMER__c, MG_441_MONOMER__c, mw21be5f78_d4be_423a_a6c8_b72c5e843c4d_mw6ab703be_abdc_4e7f_871e_a58eeb853d34); reaction_1576 is "ATP__c + H2O__c + MG_441_MONOMER__c -MG_055_170_277_464_476_20MER__m, MG_072_DIMER__c-> ADP__c + H__c + MG_441_MONOMER__m + PI__c";  // modifiers: MG_055_170_277_464_476_20MER__m, MG_072_DIMER__c
  reaction_1577: 11 ATP__c + 11 H2O__c + MG_316_MONOMER__c => 11 ADP__c + 11 H__c + MG_316_MONOMER__m + 11 PI__c; Function_for_ATP__c___H2O__c___MG_316_MONOMER__c__MG_055_170_277_464_476_20MER__m__MG_072_DIMER__c___ADP__c___H__c___MG_316_MONOMER__m___PI__c(ATP__c, Km1_MG_316_MONOMER__c, Km2_ATP__c, MG_055_170_277_464_476_20MER__m, MG_072_DIMER__c, MG_316_MONOMER__c, mw2878c3d7_39ba_496d_8ea4_45bc1652041b_mwaa7b25a0_579c_409e_b294_6cc87ca4a174); reaction_1577 is "ATP__c + H2O__c + MG_316_MONOMER__c -MG_055_170_277_464_476_20MER__m, MG_072_DIMER__c-> ADP__c + H__c + MG_316_MONOMER__m + PI__c";  // modifiers: MG_055_170_277_464_476_20MER__m, MG_072_DIMER__c
  reaction_1578: 11 ATP__c + 11 H2O__c + MG_078_MONOMER__c => 11 ADP__c + 11 H__c + MG_078_MONOMER__m + 11 PI__c; Function_for_ATP__c___H2O__c___MG_078_MONOMER__c__MG_055_170_277_464_476_20MER__m__MG_072_DIMER__c___ADP__c___H__c___MG_078_MONOMER__m___PI__c(ATP__c, Km1_MG_078_MONOMER__c, Km2_ATP__c, MG_055_170_277_464_476_20MER__m, MG_072_DIMER__c, MG_078_MONOMER__c, mw28aca57a_177a_4c39_a787_1c41a6a2b6e2_mwc5e02c04_7277_4114_9248_be82b6955cdd); reaction_1578 is "ATP__c + H2O__c + MG_078_MONOMER__c -MG_055_170_277_464_476_20MER__m, MG_072_DIMER__c-> ADP__c + H__c + MG_078_MONOMER__m + PI__c";  // modifiers: MG_055_170_277_464_476_20MER__m, MG_072_DIMER__c
  reaction_1579: 16 ATP__c + 16 H2O__c + MG_291_MONOMER__c => 16 ADP__c + 16 H__c + MG_291_MONOMER__m + 16 PI__c; Function_for_ATP__c___H2O__c___MG_291_MONOMER__c__MG_055_170_277_464_476_20MER__m__MG_072_DIMER__c___ADP__c___H__c___MG_291_MONOMER__m___PI__c(ATP__c, Km1_MG_291_MONOMER__c, Km2_ATP__c, MG_055_170_277_464_476_20MER__m, MG_072_DIMER__c, MG_291_MONOMER__c, mw2942e237_e3c6_4158_8a7d_9dbdbd0b550e_mw56f261b3_6175_4903_b233_aabb7565f9c8); reaction_1579 is "ATP__c + H2O__c + MG_291_MONOMER__c -MG_055_170_277_464_476_20MER__m, MG_072_DIMER__c-> ADP__c + H__c + MG_291_MONOMER__m + PI__c";  // modifiers: MG_055_170_277_464_476_20MER__m, MG_072_DIMER__c
  reaction_1580: 9 ATP__c + 9 H2O__c + MG_189_MONOMER__c => 9 ADP__c + 9 H__c + MG_189_MONOMER__m + 9 PI__c; Function_for_ATP__c___H2O__c___MG_189_MONOMER__c__MG_055_170_277_464_476_20MER__m__MG_072_DIMER__c___ADP__c___H__c___MG_189_MONOMER__m___PI__c(ATP__c, Km1_MG_189_MONOMER__c, Km2_ATP__c, MG_055_170_277_464_476_20MER__m, MG_072_DIMER__c, MG_189_MONOMER__c, mw32116cc5_a83e_4030_9249_dc19990d0e07_mw2f417a5e_33e4_4bc3_be1b_23380db4334b); reaction_1580 is "ATP__c + H2O__c + MG_189_MONOMER__c -MG_055_170_277_464_476_20MER__m, MG_072_DIMER__c-> ADP__c + H__c + MG_189_MONOMER__m + PI__c";  // modifiers: MG_055_170_277_464_476_20MER__m, MG_072_DIMER__c
  reaction_1581: 6 ATP__c + 6 H2O__c + MG_364_MONOMER__c => 6 ADP__c + 6 H__c + MG_364_MONOMER__m + 6 PI__c; Function_for_ATP__c___H2O__c___MG_364_MONOMER__c__MG_055_170_277_464_476_20MER__m__MG_072_DIMER__c___ADP__c___H__c___MG_364_MONOMER__m___PI__c(ATP__c, Km1_MG_364_MONOMER__c, Km2_ATP__c, MG_055_170_277_464_476_20MER__m, MG_072_DIMER__c, MG_364_MONOMER__c, mw3cc941f8_7759_4f05_a3e6_f11a546f2e50_mw65d83991_beaa_492b_8aa1_188d23190a9b); reaction_1581 is "ATP__c + H2O__c + MG_364_MONOMER__c -MG_055_170_277_464_476_20MER__m, MG_072_DIMER__c-> ADP__c + H__c + MG_364_MONOMER__m + PI__c";  // modifiers: MG_055_170_277_464_476_20MER__m, MG_072_DIMER__c
  reaction_1582: 11 ATP__c + 11 H2O__c + MG_109_MONOMER__c => 11 ADP__c + 11 H__c + MG_109_MONOMER__m + 11 PI__c; Function_for_ATP__c___H2O__c___MG_109_MONOMER__c__MG_055_170_277_464_476_20MER__m__MG_072_DIMER__c___ADP__c___H__c___MG_109_MONOMER__m___PI__c(ATP__c, Km1_MG_109_MONOMER__c, Km2_ATP__c, MG_055_170_277_464_476_20MER__m, MG_072_DIMER__c, MG_109_MONOMER__c, mw4655cbbd_bf9c_4636_8dcf_f22811d63e07_mw9d63ba3e_fd4f_45af_9c1e_86177ace9c8a); reaction_1582 is "ATP__c + H2O__c + MG_109_MONOMER__c -MG_055_170_277_464_476_20MER__m, MG_072_DIMER__c-> ADP__c + H__c + MG_109_MONOMER__m + PI__c";  // modifiers: MG_055_170_277_464_476_20MER__m, MG_072_DIMER__c
  reaction_1583: 8 ATP__c + 8 H2O__c + MG_144_MONOMER__c => 8 ADP__c + 8 H__c + MG_144_MONOMER__m + 8 PI__c; Function_for_ATP__c___H2O__c___MG_144_MONOMER__c__MG_055_170_277_464_476_20MER__m__MG_072_DIMER__c___ADP__c___H__c___MG_144_MONOMER__m___PI__c(ATP__c, Km1_MG_144_MONOMER__c, Km2_ATP__c, MG_055_170_277_464_476_20MER__m, MG_072_DIMER__c, MG_144_MONOMER__c, mw4a255144_7557_419f_99f4_2f424130abce_mw7c247b9e_4c1f_4264_a894_c27b362095c0); reaction_1583 is "ATP__c + H2O__c + MG_144_MONOMER__c -MG_055_170_277_464_476_20MER__m, MG_072_DIMER__c-> ADP__c + H__c + MG_144_MONOMER__m + PI__c";  // modifiers: MG_055_170_277_464_476_20MER__m, MG_072_DIMER__c
  reaction_1584: 12 ATP__c + 12 H2O__c + MG_148_MONOMER__c => 12 ADP__c + 12 H__c + MG_148_MONOMER__m + 12 PI__c; Function_for_ATP__c___H2O__c___MG_148_MONOMER__c__MG_055_170_277_464_476_20MER__m__MG_072_DIMER__c___ADP__c___H__c___MG_148_MONOMER__m___PI__c(ATP__c, Km1_MG_148_MONOMER__c, Km2_ATP__c, MG_055_170_277_464_476_20MER__m, MG_072_DIMER__c, MG_148_MONOMER__c, mw56d94b7e_7bba_4743_8605_baa8951852d0_mw7b8ffc45_0ec8_47fb_9f5c_888b1f237520); reaction_1584 is "ATP__c + H2O__c + MG_148_MONOMER__c -MG_055_170_277_464_476_20MER__m, MG_072_DIMER__c-> ADP__c + H__c + MG_148_MONOMER__m + PI__c";  // modifiers: MG_055_170_277_464_476_20MER__m, MG_072_DIMER__c
  reaction_1585: 4 ATP__c + 4 H2O__c + MG_076_MONOMER__c => 4 ADP__c + 4 H__c + MG_076_MONOMER__m + 4 PI__c; Function_for_ATP__c___H2O__c___MG_076_MONOMER__c__MG_055_170_277_464_476_20MER__m__MG_072_DIMER__c___ADP__c___H__c___MG_076_MONOMER__m___PI__c(ATP__c, Km1_MG_076_MONOMER__c, Km2_ATP__c, MG_055_170_277_464_476_20MER__m, MG_072_DIMER__c, MG_076_MONOMER__c, mw57f6ad6c_40c1_4e24_9a53_f524a3d80ffa_mw2306a2e4_cbbd_4686_8a84_2cbf55b937fa); reaction_1585 is "ATP__c + H2O__c + MG_076_MONOMER__c -MG_055_170_277_464_476_20MER__m, MG_072_DIMER__c-> ADP__c + H__c + MG_076_MONOMER__m + PI__c";  // modifiers: MG_055_170_277_464_476_20MER__m, MG_072_DIMER__c
  reaction_1586: 11 ATP__c + 11 H2O__c + MG_464_MONOMER__c => 11 ADP__c + 11 H__c + MG_464_MONOMER__m + 11 PI__c; Function_for_ATP__c___H2O__c___MG_464_MONOMER__c__MG_055_170_277_464_476_20MER__m__MG_072_DIMER__c___ADP__c___H__c___MG_464_MONOMER__m___PI__c(ATP__c, Km1_MG_464_MONOMER__c, Km2_ATP__c, MG_055_170_277_464_476_20MER__m, MG_072_DIMER__c, MG_464_MONOMER__c, mw5c453a53_4962_4245_831d_1e9bcda35e18_mw9d719afb_e144_4d5b_8fa9_88ac86a34d0c); reaction_1586 is "ATP__c + H2O__c + MG_464_MONOMER__c -MG_055_170_277_464_476_20MER__m, MG_072_DIMER__c-> ADP__c + H__c + MG_464_MONOMER__m + PI__c";  // modifiers: MG_055_170_277_464_476_20MER__m, MG_072_DIMER__c
  reaction_1587: 9 ATP__c + 9 H2O__c + MG_188_MONOMER__c => 9 ADP__c + 9 H__c + MG_188_MONOMER__m + 9 PI__c; Function_for_ATP__c___H2O__c___MG_188_MONOMER__c__MG_055_170_277_464_476_20MER__m__MG_072_DIMER__c___ADP__c___H__c___MG_188_MONOMER__m___PI__c(ATP__c, Km1_MG_188_MONOMER__c, Km2_ATP__c, MG_055_170_277_464_476_20MER__m, MG_072_DIMER__c, MG_188_MONOMER__c, mw689d5be0_fc63_45b7_9c83_1ca03e3360b2_mw15c72270_5f3e_4884_9d87_dbcb355fa955); reaction_1587 is "ATP__c + H2O__c + MG_188_MONOMER__c -MG_055_170_277_464_476_20MER__m, MG_072_DIMER__c-> ADP__c + H__c + MG_188_MONOMER__m + PI__c";  // modifiers: MG_055_170_277_464_476_20MER__m, MG_072_DIMER__c
  reaction_1588: 19 ATP__c + 19 H2O__c + MG_032_MONOMER__c => 19 ADP__c + 19 H__c + MG_032_MONOMER__e + 19 PI__c; Function_for_ATP__c___H2O__c___MG_032_MONOMER__c__MG_055_170_277_464_476_20MER__m__MG_072_DIMER__c___ADP__c___H__c___MG_032_MONOMER__e___PI__c(ATP__c, Km1_MG_032_MONOMER__c, Km2_ATP__c, MG_032_MONOMER__c, MG_055_170_277_464_476_20MER__m, MG_072_DIMER__c, mw6c285924_1785_410d_b64c_f0ad6c5d4d82_mw30efd2dd_0ef1_40fb_9c6f_1b97a6af5345); reaction_1588 is "ATP__c + H2O__c + MG_032_MONOMER__c -MG_055_170_277_464_476_20MER__m, MG_072_DIMER__c-> ADP__c + H__c + MG_032_MONOMER__e + PI__c";  // modifiers: MG_055_170_277_464_476_20MER__m, MG_072_DIMER__c
  reaction_1589: 3 ATP__c + 3 H2O__c + MG_129_MONOMER__c => 3 ADP__c + 3 H__c + MG_129_MONOMER__e + 3 PI__c; Function_for_ATP__c___H2O__c___MG_129_MONOMER__c__MG_055_170_277_464_476_20MER__m__MG_072_DIMER__c___ADP__c___H__c___MG_129_MONOMER__e___PI__c(ATP__c, Km1_MG_129_MONOMER__c, Km2_ATP__c, MG_055_170_277_464_476_20MER__m, MG_072_DIMER__c, MG_129_MONOMER__c, mw6c601d3d_7705_4b9a_8c57_2dd4f7a17c9e_mw0a01ac0c_fc32_4966_80d8_143eb5174807); reaction_1589 is "ATP__c + H2O__c + MG_129_MONOMER__c -MG_055_170_277_464_476_20MER__m, MG_072_DIMER__c-> ADP__c + H__c + MG_129_MONOMER__e + PI__c";  // modifiers: MG_055_170_277_464_476_20MER__m, MG_072_DIMER__c
  reaction_1590: 8 ATP__c + 8 H2O__c + MG_310_MONOMER__c => 8 ADP__c + 8 H__c + MG_310_MONOMER__e + 8 PI__c; Function_for_ATP__c___H2O__c___MG_310_MONOMER__c__MG_055_170_277_464_476_20MER__m__MG_072_DIMER__c___ADP__c___H__c___MG_310_MONOMER__e___PI__c(ATP__c, Km1_MG_310_MONOMER__c, Km2_ATP__c, MG_055_170_277_464_476_20MER__m, MG_072_DIMER__c, MG_310_MONOMER__c, mw7b0bce5d_1f1d_4ac3_a99d_20da485ab2fe_mw09bea1a1_1df8_4018_a5e2_00ebed3fcf01); reaction_1590 is "ATP__c + H2O__c + MG_310_MONOMER__c -MG_055_170_277_464_476_20MER__m, MG_072_DIMER__c-> ADP__c + H__c + MG_310_MONOMER__e + PI__c";  // modifiers: MG_055_170_277_464_476_20MER__m, MG_072_DIMER__c
  reaction_1591: 11 ATP__c + 11 H2O__c + MG_437_MONOMER__c => 11 ADP__c + 11 H__c + MG_437_MONOMER__m + 11 PI__c; Function_for_ATP__c___H2O__c___MG_437_MONOMER__c__MG_055_170_277_464_476_20MER__m__MG_072_DIMER__c___ADP__c___H__c___MG_437_MONOMER__m___PI__c(ATP__c, Km1_MG_437_MONOMER__c, Km2_ATP__c, MG_055_170_277_464_476_20MER__m, MG_072_DIMER__c, MG_437_MONOMER__c, mw7f9cc0e4_e6c0_4390_973b_11837927efc4_mwa0325caa_f47d_4059_aebe_31b56efdc264); reaction_1591 is "ATP__c + H2O__c + MG_437_MONOMER__c -MG_055_170_277_464_476_20MER__m, MG_072_DIMER__c-> ADP__c + H__c + MG_437_MONOMER__m + PI__c";  // modifiers: MG_055_170_277_464_476_20MER__m, MG_072_DIMER__c
  reaction_1592: 11 ATP__c + 11 H2O__c + MG_412_MONOMER__c => 11 ADP__c + 11 H__c + MG_412_MONOMER__e + 11 PI__c; Function_for_ATP__c___H2O__c___MG_412_MONOMER__c__MG_055_170_277_464_476_20MER__m__MG_072_DIMER__c___ADP__c___H__c___MG_412_MONOMER__e___PI__c(ATP__c, Km1_MG_412_MONOMER__c, Km2_ATP__c, MG_055_170_277_464_476_20MER__m, MG_072_DIMER__c, MG_412_MONOMER__c, mw81ccd7c4_7457_4e3e_b36c_d6fc3912d9cf_mw8d328eee_04f6_4b26_ae37_e0d7212bd47c); reaction_1592 is "ATP__c + H2O__c + MG_412_MONOMER__c -MG_055_170_277_464_476_20MER__m, MG_072_DIMER__c-> ADP__c + H__c + MG_412_MONOMER__e + PI__c";  // modifiers: MG_055_170_277_464_476_20MER__m, MG_072_DIMER__c
  reaction_1593: 6 ATP__c + 6 H2O__c + MG_331_MONOMER__c => 6 ADP__c + 6 H__c + MG_331_MONOMER__m + 6 PI__c; Function_for_ATP__c___H2O__c___MG_331_MONOMER__c__MG_055_170_277_464_476_20MER__m__MG_072_DIMER__c___ADP__c___H__c___MG_331_MONOMER__m___PI__c(ATP__c, Km1_MG_331_MONOMER__c, Km2_ATP__c, MG_055_170_277_464_476_20MER__m, MG_072_DIMER__c, MG_331_MONOMER__c, mw8fec7448_6d8b_4daf_b35e_ee5f56df9af8_mw39e210d8_e2b4_43f6_b024_837588ef423b); reaction_1593 is "ATP__c + H2O__c + MG_331_MONOMER__c -MG_055_170_277_464_476_20MER__m, MG_072_DIMER__c-> ADP__c + H__c + MG_331_MONOMER__m + PI__c";  // modifiers: MG_055_170_277_464_476_20MER__m, MG_072_DIMER__c
  reaction_1594: 7 ATP__c + 7 H2O__c + MG_033_MONOMER__c => 7 ADP__c + 7 H__c + MG_033_MONOMER__m + 7 PI__c; Function_for_ATP__c___H2O__c___MG_033_MONOMER__c__MG_055_170_277_464_476_20MER__m__MG_072_DIMER__c___ADP__c___H__c___MG_033_MONOMER__m___PI__c(ATP__c, Km1_MG_033_MONOMER__c, Km2_ATP__c, MG_033_MONOMER__c, MG_055_170_277_464_476_20MER__m, MG_072_DIMER__c, mw922df075_e339_44a6_8aa2_105189450ad2_mwc8549bae_c8f6_4fbc_9832_6b5497164e13); reaction_1594 is "ATP__c + H2O__c + MG_033_MONOMER__c -MG_055_170_277_464_476_20MER__m, MG_072_DIMER__c-> ADP__c + H__c + MG_033_MONOMER__m + PI__c";  // modifiers: MG_055_170_277_464_476_20MER__m, MG_072_DIMER__c
  reaction_1595: 3 ATP__c + 3 H2O__c + MG_267_MONOMER__c => 3 ADP__c + 3 H__c + MG_267_MONOMER__m + 3 PI__c; Function_for_ATP__c___H2O__c___MG_267_MONOMER__c__MG_055_170_277_464_476_20MER__m__MG_072_DIMER__c___ADP__c___H__c___MG_267_MONOMER__m___PI__c(ATP__c, Km1_MG_267_MONOMER__c, Km2_ATP__c, MG_055_170_277_464_476_20MER__m, MG_072_DIMER__c, MG_267_MONOMER__c, mw96cef4da_8acc_413a_b292_80eeb40bf68c_mw0b2666fa_6e6c_48f3_a60f_115909c329f9); reaction_1595 is "ATP__c + H2O__c + MG_267_MONOMER__c -MG_055_170_277_464_476_20MER__m, MG_072_DIMER__c-> ADP__c + H__c + MG_267_MONOMER__m + PI__c";  // modifiers: MG_055_170_277_464_476_20MER__m, MG_072_DIMER__c
  reaction_1596: 12 ATP__c + 12 H2O__c + MG_181_MONOMER__c => 12 ADP__c + 12 H__c + MG_181_MONOMER__m + 12 PI__c; Function_for_ATP__c___H2O__c___MG_181_MONOMER__c__MG_055_170_277_464_476_20MER__m__MG_072_DIMER__c___ADP__c___H__c___MG_181_MONOMER__m___PI__c(ATP__c, Km1_MG_181_MONOMER__c, Km2_ATP__c, MG_055_170_277_464_476_20MER__m, MG_072_DIMER__c, MG_181_MONOMER__c, mwab3b1122_21d6_46f5_8d98_ae647ac42df9_mw5d908c31_5057_48cc_9299_7694542ead69); reaction_1596 is "ATP__c + H2O__c + MG_181_MONOMER__c -MG_055_170_277_464_476_20MER__m, MG_072_DIMER__c-> ADP__c + H__c + MG_181_MONOMER__m + PI__c";  // modifiers: MG_055_170_277_464_476_20MER__m, MG_072_DIMER__c
  reaction_1597: 9 ATP__c + 9 H2O__c + MG_302_MONOMER__c => 9 ADP__c + 9 H__c + MG_302_MONOMER__m + 9 PI__c; Function_for_ATP__c___H2O__c___MG_302_MONOMER__c__MG_055_170_277_464_476_20MER__m__MG_072_DIMER__c___ADP__c___H__c___MG_302_MONOMER__m___PI__c(ATP__c, Km1_MG_302_MONOMER__c, Km2_ATP__c, MG_055_170_277_464_476_20MER__m, MG_072_DIMER__c, MG_302_MONOMER__c, mwb43a9a7e_3c8c_4a7e_80cf_9c20f0683bf6_mwf4d9af31_44a8_46cb_b18a_5b57f3f3ae49); reaction_1597 is "ATP__c + H2O__c + MG_302_MONOMER__c -MG_055_170_277_464_476_20MER__m, MG_072_DIMER__c-> ADP__c + H__c + MG_302_MONOMER__m + PI__c";  // modifiers: MG_055_170_277_464_476_20MER__m, MG_072_DIMER__c
  reaction_1598: 51 ATP__c + 51 H2O__c + MG_468_MONOMER__c => 51 ADP__c + 51 H__c + MG_468_MONOMER__m + 51 PI__c; Function_for_ATP__c___H2O__c___MG_468_MONOMER__c__MG_055_170_277_464_476_20MER__m__MG_072_DIMER__c___ADP__c___H__c___MG_468_MONOMER__m___PI__c(ATP__c, Km1_MG_468_MONOMER__c, Km2_ATP__c, MG_055_170_277_464_476_20MER__m, MG_072_DIMER__c, MG_468_MONOMER__c, mwb4caf68d_9540_4da0_8fc7_8beb41affe61_mwe5f64ba3_c3c2_4d7c_8a10_21b198c8ed86); reaction_1598 is "ATP__c + H2O__c + MG_468_MONOMER__c -MG_055_170_277_464_476_20MER__m, MG_072_DIMER__c-> ADP__c + H__c + MG_468_MONOMER__m + PI__c";  // modifiers: MG_055_170_277_464_476_20MER__m, MG_072_DIMER__c
  reaction_1599: 8 ATP__c + 8 H2O__c + MG_318_MONOMER__c => 8 ADP__c + 8 H__c + MG_318_MONOMER__m + 8 PI__c; Function_for_ATP__c___H2O__c___MG_318_MONOMER__c__MG_055_170_277_464_476_20MER__m__MG_072_DIMER__c___ADP__c___H__c___MG_318_MONOMER__m___PI__c(ATP__c, Km1_MG_318_MONOMER__c, Km2_ATP__c, MG_055_170_277_464_476_20MER__m, MG_072_DIMER__c, MG_318_MONOMER__c, mwb8ce06bf_690d_4689_8998_53c5d1a7d96c_mw8906a7bb_3d42_4764_b40f_a43a32d781bb); reaction_1599 is "ATP__c + H2O__c + MG_318_MONOMER__c -MG_055_170_277_464_476_20MER__m, MG_072_DIMER__c-> ADP__c + H__c + MG_318_MONOMER__m + PI__c";  // modifiers: MG_055_170_277_464_476_20MER__m, MG_072_DIMER__c
  reaction_1600: 20 ATP__c + 20 H2O__c + MG_185_MONOMER__c => 20 ADP__c + 20 H__c + MG_185_MONOMER__m + 20 PI__c; Function_for_ATP__c___H2O__c___MG_185_MONOMER__c__MG_055_170_277_464_476_20MER__m__MG_072_DIMER__c___ADP__c___H__c___MG_185_MONOMER__m___PI__c(ATP__c, Km1_MG_185_MONOMER__c, Km2_ATP__c, MG_055_170_277_464_476_20MER__m, MG_072_DIMER__c, MG_185_MONOMER__c, mwba21af05_7d71_483c_be58_e047b7872cee_mw05c2894d_55ed_4d50_b2d4_c6132500a753); reaction_1600 is "ATP__c + H2O__c + MG_185_MONOMER__c -MG_055_170_277_464_476_20MER__m, MG_072_DIMER__c-> ADP__c + H__c + MG_185_MONOMER__m + PI__c";  // modifiers: MG_055_170_277_464_476_20MER__m, MG_072_DIMER__c
  reaction_1601: 6 ATP__c + 6 H2O__c + MG_403_MONOMER__c => 6 ADP__c + 6 H__c + MG_403_MONOMER__m + 6 PI__c; Function_for_ATP__c___H2O__c___MG_403_MONOMER__c__MG_055_170_277_464_476_20MER__m__MG_072_DIMER__c___ADP__c___H__c___MG_403_MONOMER__m___PI__c(ATP__c, Km1_MG_403_MONOMER__c, Km2_ATP__c, MG_055_170_277_464_476_20MER__m, MG_072_DIMER__c, MG_403_MONOMER__c, mwc05821b1_4a05_4a36_b96c_1ceb0d19cd1a_mwd399ad40_6c1d_475f_aa2e_dc9326e7107c); reaction_1601 is "ATP__c + H2O__c + MG_403_MONOMER__c -MG_055_170_277_464_476_20MER__m, MG_072_DIMER__c-> ADP__c + H__c + MG_403_MONOMER__m + PI__c";  // modifiers: MG_055_170_277_464_476_20MER__m, MG_072_DIMER__c
  reaction_1602: 18 ATP__c + 18 H2O__c + MG_014_MONOMER__c => 18 ADP__c + 18 H__c + MG_014_MONOMER__m + 18 PI__c; Function_for_ATP__c___H2O__c___MG_014_MONOMER__c__MG_055_170_277_464_476_20MER__m__MG_072_DIMER__c___ADP__c___H__c___MG_014_MONOMER__m___PI__c(ATP__c, Km1_MG_014_MONOMER__c, Km2_ATP__c, MG_014_MONOMER__c, MG_055_170_277_464_476_20MER__m, MG_072_DIMER__c, mwc71b6669_b8ef_4553_8bf2_afd8589ec27d_mwce25c328_2b4c_4373_b790_7014eb1a2e24); reaction_1602 is "ATP__c + H2O__c + MG_014_MONOMER__c -MG_055_170_277_464_476_20MER__m, MG_072_DIMER__c-> ADP__c + H__c + MG_014_MONOMER__m + PI__c";  // modifiers: MG_055_170_277_464_476_20MER__m, MG_072_DIMER__c
  reaction_1603: 30 ATP__c + 30 H2O__c + MG_192_MONOMER__c => 30 ADP__c + 30 H__c + MG_192_MONOMER__m + 30 PI__c; Function_for_ATP__c___H2O__c___MG_192_MONOMER__c__MG_055_170_277_464_476_20MER__m__MG_072_DIMER__c___ADP__c___H__c___MG_192_MONOMER__m___PI__c(ATP__c, Km1_MG_192_MONOMER__c, Km2_ATP__c, MG_055_170_277_464_476_20MER__m, MG_072_DIMER__c, MG_192_MONOMER__c, mwcb2f9e25_32cc_4c14_8e52_289861798e79_mw75e67499_dc92_468f_82ef_13a1c57f3f14); reaction_1603 is "ATP__c + H2O__c + MG_192_MONOMER__c -MG_055_170_277_464_476_20MER__m, MG_072_DIMER__c-> ADP__c + H__c + MG_192_MONOMER__m + PI__c";  // modifiers: MG_055_170_277_464_476_20MER__m, MG_072_DIMER__c
  reaction_1604: 41 ATP__c + 41 H2O__c + MG_191_MONOMER__c => 41 ADP__c + 41 H__c + MG_191_MONOMER__m + 41 PI__c; Function_for_ATP__c___H2O__c___MG_191_MONOMER__c__MG_055_170_277_464_476_20MER__m__MG_072_DIMER__c___ADP__c___H__c___MG_191_MONOMER__m___PI__c(ATP__c, Km1_MG_191_MONOMER__c, Km2_ATP__c, MG_055_170_277_464_476_20MER__m, MG_072_DIMER__c, MG_191_MONOMER__c, mwcc3e7871_2a60_446b_9da1_9e3f88f96d1d_mw20e97f4d_ef5d_4cbc_ae20_b237a531ac2d); reaction_1604 is "ATP__c + H2O__c + MG_191_MONOMER__c -MG_055_170_277_464_476_20MER__m, MG_072_DIMER__c-> ADP__c + H__c + MG_191_MONOMER__m + PI__c";  // modifiers: MG_055_170_277_464_476_20MER__m, MG_072_DIMER__c
  reaction_1605: 22 ATP__c + 22 H2O__c + MG_260_MONOMER__c => 22 ADP__c + 22 H__c + MG_260_MONOMER__m + 22 PI__c; Function_for_ATP__c___H2O__c___MG_260_MONOMER__c__MG_055_170_277_464_476_20MER__m__MG_072_DIMER__c___ADP__c___H__c___MG_260_MONOMER__m___PI__c(ATP__c, Km1_MG_260_MONOMER__c, Km2_ATP__c, MG_055_170_277_464_476_20MER__m, MG_072_DIMER__c, MG_260_MONOMER__c, mwcc704ab4_307a_43f1_99a4_6e80ca66e271_mw98d1acbe_506e_4ddb_8a24_210ffe4d7936); reaction_1605 is "ATP__c + H2O__c + MG_260_MONOMER__c -MG_055_170_277_464_476_20MER__m, MG_072_DIMER__c-> ADP__c + H__c + MG_260_MONOMER__m + PI__c";  // modifiers: MG_055_170_277_464_476_20MER__m, MG_072_DIMER__c
  reaction_1606: 10 ATP__c + 10 H2O__c + MG_255_MONOMER__c => 10 ADP__c + 10 H__c + MG_255_MONOMER__m + 10 PI__c; Function_for_ATP__c___H2O__c___MG_255_MONOMER__c__MG_055_170_277_464_476_20MER__m__MG_072_DIMER__c___ADP__c___H__c___MG_255_MONOMER__m___PI__c(ATP__c, Km1_MG_255_MONOMER__c, Km2_ATP__c, MG_055_170_277_464_476_20MER__m, MG_072_DIMER__c, MG_255_MONOMER__c, mwdb0b7659_3fb3_454f_bc25_c8d3a249bd5e_mw86c4d348_8649_4c24_bef3_012564cf3a9e); reaction_1606 is "ATP__c + H2O__c + MG_255_MONOMER__c -MG_055_170_277_464_476_20MER__m, MG_072_DIMER__c-> ADP__c + H__c + MG_255_MONOMER__m + PI__c";  // modifiers: MG_055_170_277_464_476_20MER__m, MG_072_DIMER__c
  reaction_1607: 11 ATP__c + 11 H2O__c + MG_443_MONOMER__c => 11 ADP__c + 11 H__c + MG_443_MONOMER__m + 11 PI__c; Function_for_ATP__c___H2O__c___MG_443_MONOMER__c__MG_055_170_277_464_476_20MER__m__MG_072_DIMER__c___ADP__c___H__c___MG_443_MONOMER__m___PI__c(ATP__c, Km1_MG_443_MONOMER__c, Km2_ATP__c, MG_055_170_277_464_476_20MER__m, MG_072_DIMER__c, MG_443_MONOMER__c, mwdebe02ee_43fd_427b_8bad_ae80d86b8c9e_mw55bb4f53_3e92_453f_afb8_e948e74c5f95); reaction_1607 is "ATP__c + H2O__c + MG_443_MONOMER__c -MG_055_170_277_464_476_20MER__m, MG_072_DIMER__c-> ADP__c + H__c + MG_443_MONOMER__m + PI__c";  // modifiers: MG_055_170_277_464_476_20MER__m, MG_072_DIMER__c
  reaction_1608: 8 ATP__c + 8 H2O__c + MG_149_MONOMER__c => 8 ADP__c + 8 H__c + MG_149_MONOMER__m + 8 PI__c; Function_for_ATP__c___H2O__c___MG_149_MONOMER__c__MG_055_170_277_464_476_20MER__m__MG_072_DIMER__c___ADP__c___H__c___MG_149_MONOMER__m___PI__c(ATP__c, Km1_MG_149_MONOMER__c, Km2_ATP__c, MG_055_170_277_464_476_20MER__m, MG_072_DIMER__c, MG_149_MONOMER__c, mwe313ead8_dd4a_44fb_bd91_836297162968_mw60c1acd7_1f99_4595_9052_953c29e7690f); reaction_1608 is "ATP__c + H2O__c + MG_149_MONOMER__c -MG_055_170_277_464_476_20MER__m, MG_072_DIMER__c-> ADP__c + H__c + MG_149_MONOMER__m + PI__c";  // modifiers: MG_055_170_277_464_476_20MER__m, MG_072_DIMER__c
  reaction_1609: 8 ATP__c + 8 H2O__c + MG_044_MONOMER__c => 8 ADP__c + 8 H__c + MG_044_MONOMER__m + 8 PI__c; Function_for_ATP__c___H2O__c___MG_044_MONOMER__c__MG_055_170_277_464_476_20MER__m__MG_072_DIMER__c___ADP__c___H__c___MG_044_MONOMER__m___PI__c(ATP__c, Km1_MG_044_MONOMER__c, Km2_ATP__c, MG_044_MONOMER__c, MG_055_170_277_464_476_20MER__m, MG_072_DIMER__c, mwe6b7a06c_c003_4e40_b66a_83edf102c05a_mw3101aa51_7e9b_4605_8593_6c510decc1c0); reaction_1609 is "ATP__c + H2O__c + MG_044_MONOMER__c -MG_055_170_277_464_476_20MER__m, MG_072_DIMER__c-> ADP__c + H__c + MG_044_MONOMER__m + PI__c";  // modifiers: MG_055_170_277_464_476_20MER__m, MG_072_DIMER__c
  reaction_1610: 15 ATP__c + 15 H2O__c + MG_120_MONOMER__c => 15 ADP__c + 15 H__c + MG_120_MONOMER__m + 15 PI__c; Function_for_ATP__c___H2O__c___MG_120_MONOMER__c__MG_055_170_277_464_476_20MER__m__MG_072_DIMER__c___ADP__c___H__c___MG_120_MONOMER__m___PI__c(ATP__c, Km1_MG_120_MONOMER__c, Km2_ATP__c, MG_055_170_277_464_476_20MER__m, MG_072_DIMER__c, MG_120_MONOMER__c, mwe7aee207_1704_4e58_9a85_aef0776ce60d_mw7322cb63_b9d9_4fb9_abfc_0c429ade526d); reaction_1610 is "ATP__c + H2O__c + MG_120_MONOMER__c -MG_055_170_277_464_476_20MER__m, MG_072_DIMER__c-> ADP__c + H__c + MG_120_MONOMER__m + PI__c";  // modifiers: MG_055_170_277_464_476_20MER__m, MG_072_DIMER__c
  reaction_1611: 11 ATP__c + 11 H2O__c + MG_289_MONOMER__c => 11 ADP__c + 11 H__c + MG_289_MONOMER__e + 11 PI__c; Function_for_ATP__c___H2O__c___MG_289_MONOMER__c__MG_055_170_277_464_476_20MER__m__MG_072_DIMER__c___ADP__c___H__c___MG_289_MONOMER__e___PI__c(ATP__c, Km1_MG_289_MONOMER__c, Km2_ATP__c, MG_055_170_277_464_476_20MER__m, MG_072_DIMER__c, MG_289_MONOMER__c, mwe95617b3_564c_4c7f_a96a_636a4fb74d54_mw3a899d5c_147b_4c1d_8213_4b38e5c90bd1); reaction_1611 is "ATP__c + H2O__c + MG_289_MONOMER__c -MG_055_170_277_464_476_20MER__m, MG_072_DIMER__c-> ADP__c + H__c + MG_289_MONOMER__e + PI__c";  // modifiers: MG_055_170_277_464_476_20MER__m, MG_072_DIMER__c
  reaction_1612: 4 ATP__c + 4 H2O__c + MG_074_MONOMER__c => 4 ADP__c + 4 H__c + MG_074_MONOMER__e + 4 PI__c; Function_for_ATP__c___H2O__c___MG_074_MONOMER__c__MG_055_170_277_464_476_20MER__m__MG_072_DIMER__c___ADP__c___H__c___MG_074_MONOMER__e___PI__c(ATP__c, Km1_MG_074_MONOMER__c, Km2_ATP__c, MG_055_170_277_464_476_20MER__m, MG_072_DIMER__c, MG_074_MONOMER__c, mwf0062c5f_03f3_4812_9cbb_b3ecb3061e20_mw5fbd4daf_77f4_4231_b8c3_ace2a12e5290); reaction_1612 is "ATP__c + H2O__c + MG_074_MONOMER__c -MG_055_170_277_464_476_20MER__m, MG_072_DIMER__c-> ADP__c + H__c + MG_074_MONOMER__e + PI__c";  // modifiers: MG_055_170_277_464_476_20MER__m, MG_072_DIMER__c
  reaction_1613: 7 ATP__c + 7 H2O__c + MG_114_MONOMER__c => 7 ADP__c + 7 H__c + MG_114_MONOMER__m + 7 PI__c; Function_for_ATP__c___H2O__c___MG_114_MONOMER__c__MG_055_170_277_464_476_20MER__m__MG_072_DIMER__c___ADP__c___H__c___MG_114_MONOMER__m___PI__c(ATP__c, Km1_MG_114_MONOMER__c, Km2_ATP__c, MG_055_170_277_464_476_20MER__m, MG_072_DIMER__c, MG_114_MONOMER__c, mwf7de5321_f42e_44e0_8c4f_b52cbfff7b94_mwa5e78af7_d1af_4a48_b4b8_a9b35369d040); reaction_1613 is "ATP__c + H2O__c + MG_114_MONOMER__c -MG_055_170_277_464_476_20MER__m, MG_072_DIMER__c-> ADP__c + H__c + MG_114_MONOMER__m + PI__c";  // modifiers: MG_055_170_277_464_476_20MER__m, MG_072_DIMER__c
  reaction_1614: 4 ATP__c + 4 H2O__c + MG_389_MONOMER__c => 4 ADP__c + 4 H__c + MG_389_MONOMER__e + 4 PI__c; Function_for_ATP__c___H2O__c___MG_389_MONOMER__c__MG_055_170_277_464_476_20MER__m__MG_072_DIMER__c___ADP__c___H__c___MG_389_MONOMER__e___PI__c(ATP__c, Km1_MG_389_MONOMER__c, Km2_ATP__c, MG_055_170_277_464_476_20MER__m, MG_072_DIMER__c, MG_389_MONOMER__c, mwfd8a9675_dd2d_4d4c_b754_430c14e3af37_mwfe629141_d2cf_4c43_a01e_eb4cf494b38d); reaction_1614 is "ATP__c + H2O__c + MG_389_MONOMER__c -MG_055_170_277_464_476_20MER__m, MG_072_DIMER__c-> ADP__c + H__c + MG_389_MONOMER__e + PI__c";  // modifiers: MG_055_170_277_464_476_20MER__m, MG_072_DIMER__c
end
