// SBML level 2 version 1

model tRNAAminoacylation()
  // tRNAAminoacylation module

  // Compartments:
  compartment c = 1;
  compartment m = 1;
  compartment e = 1;

  // Species:
  species ADP__c in c = 3623/c;
  species ALA__c in c = 8303/c; ALA__c is "L-alanine";
  species AMP__c in c = 1449/c;
  species ARG__c in c = 5991/c; ARG__c is "L-Arginine";
  species ASN__c in c = 11161/c; ASN__c is "L-Asparagine";
  species ASP__c in c = 9407/c; ASP__c is "L-Aspartate";
  species ATP__c in c = 36234/c;
  species CYS__c in c = 2181/c; CYS__c is "L-Cysteine";
  species FMET__c in c = 0; FMET__c is "N-Formyl-L-methionine";
  species FTHF10__c in c = 2895/c; FTHF10__c is "10-formyl-tetrahydrofolate";
  species GLU__c in c = 9518/c; GLU__c is "L-Glutamate";
  species GLY__c in c = 7679/c; GLY__c is "glycine";
  species H__c in c = 13042/c; H__c is "hydrogen ion";
  species H2O__c in c = 309737899/c; H2O__c is "water";
  species HIS__c in c = 2933/c; HIS__c is "L-Histidine";
  species ILE__c in c = 14247/c; ILE__c is "L-Isoleucine";
  species LEU__c in c = 17971/c; LEU__c is "L-Leucine";
  species LYS__c in c = 15094/c; LYS__c is "L-Lysine";
  species MET__c in c = 2792/c; MET__c is "L-Methionine";
  species PHE__c in c = 7681/c; PHE__c is "L-phenylalanine";
  species PI__c in c = 7246/c; PI__c is "phosphate";
  species PPI__c in c = 5796/c; PPI__c is "diphosphate";
  species PRO__c in c = 4140/c; PRO__c is "L-Proline";
  species SER__c in c = 8749/c; SER__c is "L-Serine";
  species THF__c in c = 2895/c; THF__c is "5,6,7,8-Tetrahydrofolate";
  species THR__c in c = 4460/c; THR__c is "L-Threonine";
  species TRP__c in c = 1084/c; TRP__c is "L-tryptophan";
  species TYR__c in c = 5375/c; TYR__c is "L-tyrosine";
  species VAL__c in c = 9500/c; VAL__c is "L-Valine";
  species GLN__c in c = 7920/c; GLN__c is "L-glutamine";
  species MG471__c in c = 0;
  species MG471_aa__c in c = 72/c; MG471_aa__c is "MG471-AA";
  species MG472__c in c = 0;
  species MG472_aa__c in c = 72/c; MG472_aa__c is "MG472-AA";
  species MG475__c in c = 0;
  species MG475_aa__c in c = 14/c; MG475_aa__c is "MG475-AA";
  species MG479__c in c = 0;
  species MG479_aa__c in c = 25/c; MG479_aa__c is "MG479-AA";
  species MG483__c in c = 0;
  species MG483_aa__c in c = 10/c; MG483_aa__c is "MG483-AA";
  species MG484__c in c = 0;
  species MG484_aa__c in c = 61/c; MG484_aa__c is "MG484-AA";
  species MG485__c in c = 0;
  species MG485_aa__c in c = 14/c; MG485_aa__c is "MG485-AA";
  species MG486__c in c = 0;
  species MG486_aa__c in c = 46/c; MG486_aa__c is "MG486-AA";
  species MG487__c in c = 0;
  species MG487_aa__c in c = 20/c; MG487_aa__c is "MG487-AA";
  species MG488__c in c = 0;
  species MG488_aa__c in c = 11/c; MG488_aa__c is "MG488-AA";
  species MG489__c in c = 0;
  species MG489_aa__c in c = 84/c; MG489_aa__c is "MG489-AA";
  species MG490__c in c = 0;
  species MG490_aa__c in c = 55/c; MG490_aa__c is "MG490-AA";
  species MG492__c in c = 0;
  species MG492_aa__c in c = 13/c; MG492_aa__c is "MG492-AA";
  species MG493__c in c = 0;
  species MG493_aa__c in c = 51/c; MG493_aa__c is "MG493-AA";
  species MG495__c in c = 0;
  species MG495_aa__c in c = 8/c; MG495_aa__c is "MG495-AA";
  species MG496__c in c = 0;
  species MG496_aa__c in c = 9/c; MG496_aa__c is "MG496-AA";
  species MG497__c in c = 0;
  species MG497_aa__c in c = 9/c; MG497_aa__c is "MG497-AA";
  species MG499__c in c = 0;
  species MG499_aa__c in c = 42/c; MG499_aa__c is "MG499-AA";
  species MG500__c in c = 0;
  species MG500_aa__c in c = 60/c; MG500_aa__c is "MG500-AA";
  species MG501__c in c = 0;
  species MG501_aa__c in c = 36/c; MG501_aa__c is "MG501-AA";
  species MG502__c in c = 0;
  species MG502_aa__c in c = 75/c; MG502_aa__c is "MG502-AA";
  species MG503__c in c = 0;
  species MG503_aa__c in c = 46/c; MG503_aa__c is "MG503-AA";
  species MG504__c in c = 0;
  species MG504_aa__c in c = 10/c; MG504_aa__c is "MG504-AA";
  species MG506__c in c = 0;
  species MG506_aa__c in c = 16/c; MG506_aa__c is "MG506-AA";
  species MG507__c in c = 0;
  species MG507_aa__c in c = 23/c; MG507_aa__c is "MG507-AA";
  species MG508__c in c = 0;
  species MG508_aa__c in c = 61/c; MG508_aa__c is "MG508-AA";
  species MG509__c in c = 0;
  species MG509_aa__c in c = 56/c; MG509_aa__c is "MG509-AA";
  species MG510__c in c = 0;
  species MG510_aa__c in c = 50/c; MG510_aa__c is "MG510-AA";
  species MG511__c in c = 0;
  species MG511_aa__c in c = 55/c; MG511_aa__c is "MG511-AA";
  species MG512__c in c = 0;
  species MG512_aa__c in c = 62/c; MG512_aa__c is "MG512-AA";
  species MG513__c in c = 0;
  species MG513_aa__c in c = 54/c; MG513_aa__c is "MG513-AA";
  species MG514__c in c = 0;
  species MG514_aa__c in c = 56/c; MG514_aa__c is "MG514-AA";
  species MG518__c in c = 0;
  species MG518_aa__c in c = 19/c; MG518_aa__c is "MG518-AA";
  species MG519__c in c = 0;
  species MG519_aa__c in c = 26/c; MG519_aa__c is "MG519-AA";
  species MG520__c in c = 0;
  species MG520_aa__c in c = 33/c; MG520_aa__c is "MG520-AA";
  species MG523__c in c = 0;
  species MG523_aa__c in c = 14/c; MG523_aa__c is "MG523-AA";
  species MG_253_MONOMER__c in c = 16/c; MG_253_MONOMER__c is "cysteinyl-tRNA synthetase";
  species MG_266_MONOMER__c in c = 62/c; MG_266_MONOMER__c is "leucyl-tRNA synthetase";
  species MG_334_MONOMER__c in c = 34/c; MG_334_MONOMER__c is "valyl-tRNA synthetase";
  species MG_345_MONOMER__c in c = 48/c; MG_345_MONOMER__c is "isoleucyl-tRNA synthetase";
  species MG_365_MONOMER__c in c = 18/c; MG_365_MONOMER__c is "methionyl-tRNA formyltransferase";
  species MG_378_MONOMER__c in c = 33/c; MG_378_MONOMER__c is "arginyl-tRNA synthetase";
  species MG_462_MONOMER__c in c = 81/c; MG_462_MONOMER__c is "glutamyl-tRNA synthetase";
  species MG_005_DIMER__c in c = 118/c; MG_005_DIMER__c is "seryl-tRNA synthetase";
  species MG_021_DIMER__c in c = 20/c; MG_021_DIMER__c is "methionyl-tRNA synthetase";
  species MG_035_DIMER__c in c = 19/c; MG_035_DIMER__c is "histidyl-tRNA synthetase";
  species MG_036_DIMER__c in c = 21/c; MG_036_DIMER__c is "aspartyl-tRNA synthetase";
  species MG_098_099_100_TRIMER__c in c = 139/c; MG_098_099_100_TRIMER__c is "glutamyl-tRNA(Gln) and/or aspartyl-tRNA(Asn) amidotransferase";
  species MG_113_DIMER__c in c = 18/c; MG_113_DIMER__c is "asparaginyl-tRNA synthetase";
  species MG_126_DIMER__c in c = 13/c; MG_126_DIMER__c is "tryptophanyl-tRNA synthetase";
  species MG_136_DIMER__c in c = 23/c; MG_136_DIMER__c is "lysyl-tRNA synthetase";
  species MG_194_195_TETRAMER__c in c = 27/c; MG_194_195_TETRAMER__c is "phenylalanyl-tRNA synthetase";
  species MG_251_DIMER__c in c = 14/c; MG_251_DIMER__c is "glycyl-tRNA synthetase";
  species MG_283_DIMER__c in c = 14/c; MG_283_DIMER__c is "prolyl-tRNA synthetase";
  species MG_292_TETRAMER__c in c = 18/c; MG_292_TETRAMER__c is "alanyl-tRNA synthetase";
  species MG_375_DIMER__c in c = 124/c; MG_375_DIMER__c is "threonyl-tRNA synthetase";
  species MG_455_DIMER__c in c = 95/c; MG_455_DIMER__c is "tyrosyl-tRNA synthetase";
  species MG_188_MONOMER__m in m = 15/m; MG_188_MONOMER__m is "Oligosaccharide or polyol ABC transporter, permease protein";
  species MG_189_MONOMER__m in m = 17/m; MG_189_MONOMER__m is "Oligosaccharide or polyol ABC transporter, permease protein";
  species MG_194_MONOMER__c in c = 0; MG_194_MONOMER__c is "phenylalanyl-tRNA synthetase, alpha subunit";
  species MG_195_MONOMER__c in c = 8/c; MG_195_MONOMER__c is "phenylalanyl-tRNA synthetase, beta subunit";
  species MG_196_MONOMER__c in c = 206/c; MG_196_MONOMER__c is "translation initiation factor IF-3";
  species MG_197_MONOMER__c in c = 146/c; MG_197_MONOMER__c is "ribosomal protein L35";
  species MG_198_MONOMER__c in c = 142/c; MG_198_MONOMER__c is "ribosomal protein L20";
  species MG_201_MONOMER__c in c = 0; MG_201_MONOMER__c is "co-chaperone GrpE";
  species MG_203_MONOMER__c in c = 1/c; MG_203_MONOMER__c is "DNA topoisomerase IV, B subunit";
  species MG_204_MONOMER__c in c = 2/c; MG_204_MONOMER__c is "DNA topoisomerase IV, A subunit";
  species MG_205_MONOMER__c in c = 1/c; MG_205_MONOMER__c is "heat-inducible transcription repressor HrcA, putative";
  species MG_206_MONOMER__c in c = 7/c; MG_206_MONOMER__c is "excinuclease ABC, C subunit";
  species MG_208_MONOMER__c in c = 0; MG_208_MONOMER__c is "glycoprotease";
  species MG_481_MONOMER__c in c = 119/c; MG_481_MONOMER__c is "30S ribosomal protein S21";
  species MG_482_MONOMER__c in c = 0; MG_482_MONOMER__c is "holo-(acyl-carrier-protein) synthase";
  species MG_213_MONOMER__c in c = 0; MG_213_MONOMER__c is "segregation and condensation protein A";
  species MG_214_MONOMER__c in c = 4/c; MG_214_MONOMER__c is "segregation and condensation protein B";
  species MG_215_MONOMER__c in c = 2/c; MG_215_MONOMER__c is "6-phosphofructokinase";
  species MG_216_MONOMER__c in c = 2/c; MG_216_MONOMER__c is "pyruvate kinase";
  species MG_221_MONOMER__c in c = 6/c; MG_221_MONOMER__c is "mraZ protein";
  species MG_224_MONOMER__c in c = 0; MG_224_MONOMER__c is "cell division protein FtsZ";
  species MG_225_MONOMER__m in m = 1/m; MG_225_MONOMER__m is "amino acid-polyamine-organocation (APC) permease";
  species MG_226_MONOMER__m in m = 1/m; MG_226_MONOMER__m is "amino acid-polyamine-organocation (APC) permease";
  species MG_227_MONOMER__c in c = 0; MG_227_MONOMER__c is "thymidylate synthase";
  species MG_228_MONOMER__c in c = 3/c; MG_228_MONOMER__c is "dihydrofolate reductase";
  species MG_229_MONOMER__c in c = 2/c; MG_229_MONOMER__c is "ribonucleoside-diphosphate reductase, beta chain";
  species MG_231_MONOMER__c in c = 0; MG_231_MONOMER__c is "ribonucleoside-diphosphate reductase, alpha chain";
  species MG_232_MONOMER__c in c = 136/c; MG_232_MONOMER__c is "ribosomal protein L21";
  species MG_234_MONOMER__c in c = 127/c; MG_234_MONOMER__c is "ribosomal protein L27";
  species MG_239_MONOMER__c in c = 5/c; MG_239_MONOMER__c is "ATP-dependent protease La";
  species MG_240_MONOMER__c in c = 3/c; MG_240_MONOMER__c is "nicotinamide-nucleotide adenylyltransferase/conserved hypothetical protein";
  species MG_244_MONOMER__c in c = 1/c; MG_244_MONOMER__c is "3-5' helicase";
  species MG_249_MONOMER__c in c = 13/c; MG_249_MONOMER__c is "RNA polymerase sigma factor RpoD";
  species MG_250_MONOMER__c in c = 33/c; MG_250_MONOMER__c is "DNA primase";
  species MG_251_MONOMER__c in c = 1/c; MG_251_MONOMER__c is "glycyl-tRNA synthetase";
  species MG_252_MONOMER__c in c = 0; MG_252_MONOMER__c is "23S rRNA methyltransferase; G2251";
  species MG_257_MONOMER__c in c = 114/c; MG_257_MONOMER__c is "ribosomal protein L31";
  species MG_259_MONOMER__c in c = 2/c; MG_259_MONOMER__c is "modification methylase";
  species MG_261_MONOMER__c in c = 0; MG_261_MONOMER__c is "DNA polymerase III, alpha subunit";
  species MG_265_MONOMER__c in c = 1/c; MG_265_MONOMER__c is "sugar phosphatase";
  species MG_271_MONOMER__c in c = 628/c; MG_271_MONOMER__c is "dihydrolipoamide dehydrogenase";
  species MG_272_MONOMER__c in c = 91/c; MG_272_MONOMER__c is "dihydrolipoamide acetyltransferase";
  species MG_273_MONOMER__c in c = 34/c; MG_273_MONOMER__c is "pyruvate dehydrogenase component E1, beta subunit";
  species MG_274_MONOMER__c in c = 38/c; MG_274_MONOMER__c is "pyruvate dehydrogenase component E1, alpha subunit";
  species MG_275_MONOMER__m in m = 3/m; MG_275_MONOMER__m is "NADH oxidase";
  species MG_276_MONOMER__c in c = 0; MG_276_MONOMER__c is "adenine phosphoribosyltransferase";
  species MG_277_MONOMER__m in m = 43/m; MG_277_MONOMER__m is "Protein-export membrane protein secDF";
  species MG_278_MONOMER__c in c = 1/c; MG_278_MONOMER__c is "GTP diphosphokinase";
  species MG_283_MONOMER__c in c = 1/c; MG_283_MONOMER__c is "prolyl-tRNA synthetase";
  species MG_287_MONOMER__c in c = 48/c; MG_287_MONOMER__c is "acyl carrier protein";
  species MG_289_MONOMER__e in e = 38/e; MG_289_MONOMER__e is "phosphonate ABC transporter, substrate binding protein (P37), putative";
  species MG_290_MONOMER__c in c = 1/c; MG_290_MONOMER__c is "phosphonate ABC transporter, ATP-binding protein, putative";
  species MG_291_MONOMER__m in m = 25/m; MG_291_MONOMER__m is "phosphonate ABC transporter, permease protein (P69), putative";
  species MG_292_MONOMER__c in c = 2/c; MG_292_MONOMER__c is "alanyl-tRNA synthetase";
  species MG_293_MONOMER__c in c = 1/c; MG_293_MONOMER__c is "glycerophosphoryl diester phosphodiesterase";
  species MG_295_MONOMER__c in c = 39/c; MG_295_MONOMER__c is "tRNA U34 sulfurtransferase";
  species MG_298_MONOMER__c in c = 7/c; MG_298_MONOMER__c is "chromosome segregation protein SMC";
  species MG_299_MONOMER__c in c = 0; MG_299_MONOMER__c is "phosphate acetyltransferase";
  species MG_301_MONOMER__c in c = 2/c; MG_301_MONOMER__c is "glyceraldehyde-3-phosphate dehydrogenase, type I";
  species MG_302_MONOMER__m in m = 1/m; MG_302_MONOMER__m is "metal ion (cobalt) ABC transporter, permease protein, putative";
  species MG_303_MONOMER__c in c = 38/c; MG_303_MONOMER__c is "metal ion (cobalt) ABC transporter, ATP-binding protein, putative";
  species MG_304_MONOMER__c in c = 5/c; MG_304_MONOMER__c is "metal ion (cobalt) ABC transporter, ATP-binding protein, putative";
  species MG_311_MONOMER__c in c = 97/c; MG_311_MONOMER__c is "ribosomal protein S4";
  species MG_315_MONOMER__c in c = 4/c; MG_315_MONOMER__c is "DNA polymerase III, delta subunit, putative";
  species MG_316_MONOMER__m in m = 0; MG_316_MONOMER__m is "DNA internalization-related competence protein ComEC/Rec2";
  species MG_321_MONOMER__e in e = 0; MG_321_MONOMER__e is "oligopeptide ABC transporter, substrate binding protein";
  species MG_322_MONOMER__m in m = 2/m; MG_322_MONOMER__m is "potassium uptake protein";
  species MG_323_MONOMER__c in c = 0; MG_323_MONOMER__c is "potassium uptake protein";
  species MG_325_MONOMER__c in c = 132/c; MG_325_MONOMER__c is "ribosomal protein L33";
  species MG_333_MONOMER__c in c = 1/c; MG_333_MONOMER__c is "FMN-dependent NADH-azoreductase, putative";
  species MG_336_MONOMER__c in c = 0; MG_336_MONOMER__c is "cysteine desulfurase";
  species MG_340_MONOMER__c in c = 11/c; MG_340_MONOMER__c is "DNA-directed RNA polymerase, beta subunit";
  species MG_341_MONOMER__c in c = 0; MG_341_MONOMER__c is "DNA-directed RNA polymerase, beta subunit";
  species MG_346_MONOMER__c in c = 1/c; MG_346_MONOMER__c is "23S rRNA methyltransferase; U2552";
  species MG_347_MONOMER__c in c = 1/c; MG_347_MONOMER__c is "tRNA (guanine-N(7)-)-methyltransferase";
  species MG_349_MONOMER__c in c = 1/c; MG_349_MONOMER__c is "Replication initiation/membrane attachment protein";
  species MG_351_MONOMER__c in c = 4/c; MG_351_MONOMER__c is "inorganic pyrophosphatase";
  species MG_352_MONOMER__c in c = 0; MG_352_MONOMER__c is "Holliday junction endonuclease";
  species MG_353_MONOMER__c in c = 1/c; MG_353_MONOMER__c is "DNA-binding protein HU, putative";
  species MG_355_MONOMER__c in c = 2/c; MG_355_MONOMER__c is "ATP-dependent Clp protease, ATPase subunit";
  species MG_357_MONOMER__c in c = 1/c; MG_357_MONOMER__c is "acetate kinase";
  species MG_358_MONOMER__c in c = 35/c; MG_358_MONOMER__c is "Holliday junction DNA helicase";
  species MG_359_MONOMER__c in c = 4/c; MG_359_MONOMER__c is "Holliday junction DNA helicase RuvB";
  species MG_361_MONOMER__c in c = 107/c; MG_361_MONOMER__c is "ribosomal protein L10";
  species MG_362_MONOMER__c in c = 118/c; MG_362_MONOMER__c is "ribosomal protein L7/L12";
  species MG_363_MONOMER__c in c = 118/c; MG_363_MONOMER__c is "ribosomal protein L32";
  species MG_522_MONOMER__c in c = 99/c; MG_522_MONOMER__c is "ribosomal protein S20";
  species MG_367_MONOMER__c in c = 0; MG_367_MONOMER__c is "ribonuclease III";
  species MG_368_MONOMER__c in c = 1/c; MG_368_MONOMER__c is "fatty acid/phospholipid synthesis protein PlsX";
  species MG_369_MONOMER__c in c = 0; MG_369_MONOMER__c is "DAK2 phosphatase domain protein";
  species MG_372_MONOMER__c in c = 1/c; MG_372_MONOMER__c is "thiamine biosynthesis/tRNA modification protein ThiI";
  species MG_375_MONOMER__c in c = 1/c; MG_375_MONOMER__c is "threonyl-tRNA synthetase";
  species MG_376_MONOMER__c in c = 3/c;
  species MG_379_MONOMER__c in c = 0; MG_379_MONOMER__c is "tRNA uridine 5-carboxymethylaminomethyl modification enzyme GidA";
  species MG_382_MONOMER__c in c = 2/c; MG_382_MONOMER__c is "uridine kinase";
  species MG_383_MONOMER__c in c = 0; MG_383_MONOMER__c is "NH(3)-dependent NAD+ synthetase, putative";
  species MG_385_MONOMER__c in c = 0; MG_385_MONOMER__c is "glycerophosphoryl diester phosphodiesterase family protein";
  species MG_390_MONOMER__m in m = 1/m; MG_390_MONOMER__m is "toxin ABC transporter, ATP-binding/permease protein";
  species MG_391_MONOMER__c in c = 4/c; MG_391_MONOMER__c is "cytosol aminopeptidase";
  species MG_392_MONOMER__c in c = 3/c; MG_392_MONOMER__c is "chaperonin";
  species MG_393_MONOMER__c in c = 97/c; MG_393_MONOMER__c is "chaperonin, 10 kDa";
  species MG_394_MONOMER__c in c = 3/c; MG_394_MONOMER__c is "serine hydroxymethyltransferase";
  species MG_396_MONOMER__c in c = 0; MG_396_MONOMER__c is "ribose 5-phosphate isomerase B";
  species MG_398_MONOMER__c in c = 2/c; MG_398_MONOMER__c is "ATP synthase F1, epsilon subunit";
  species MG_399_MONOMER__c in c = 0; MG_399_MONOMER__c is "ATP synthase F1, beta subunit";
  species MG_400_MONOMER__c in c = 31/c; MG_400_MONOMER__c is "ATP synthase F1, gamma subunit";
  species MG_401_MONOMER__c in c = 16/c; MG_401_MONOMER__c is "ATP synthase F1, alpha subunit";
  species MG_402_MONOMER__c in c = 77/c; MG_402_MONOMER__c is "ATP synthase F1, delta subunit";
  species MG_403_MONOMER__m in m = 124/m; MG_403_MONOMER__m is "ATP synthase F0, B subunit";
  species MG_404_MONOMER__m in m = 26/m; MG_404_MONOMER__m is "ATP synthase F0, C subunit";
  species MG_405_MONOMER__m in m = 124/m; MG_405_MONOMER__m is "ATP synthase F0, A subunit";
  species MG_407_MONOMER__c in c = 0; MG_407_MONOMER__c is "enolase";
  species MG_409_MONOMER__c in c = 0; MG_409_MONOMER__c is "phosphate transport system regulatory protein PhoU, putative";
  species MG_410_MONOMER__c in c = 0; MG_410_MONOMER__c is "phosphate ABC transporter, ATP-binding protein";
  species MG_411_MONOMER__m in m = 15/m; MG_411_MONOMER__m is "phosphate ABC transporter, permease protein PstA";
  species MG_412_MONOMER__e in e = 28/e; MG_412_MONOMER__e is "phosphate ABC transporter, substrate-binding protein";
  species MG_417_MONOMER__c in c = 123/c; MG_417_MONOMER__c is "ribosomal protein S9";
  species MG_418_MONOMER__c in c = 114/c; MG_418_MONOMER__c is "ribosomal protein L13";
  species MG_419_MONOMER__c in c = 2/c; MG_419_MONOMER__c is "DNA polymerase III, subunit gamma and tau";
  species MG_421_MONOMER__c in c = 20/c; MG_421_MONOMER__c is "excinuclease ABC, A subunit";
  species MG_424_MONOMER__c in c = 119/c; MG_424_MONOMER__c is "ribosomal protein S15";
  species MG_425_MONOMER__c in c = 0; MG_425_MONOMER__c is "ATP-dependent RNA helicase";
  species MG_426_MONOMER__c in c = 152/c; MG_426_MONOMER__c is "ribosomal protein L28";
  species MG_427_MONOMER__c in c = 0; MG_427_MONOMER__c is "osmotically inducible peroxidase";
  species MG_428_MONOMER__c in c = 1/c; MG_428_MONOMER__c is "LuxR bacterial regulatory protein, putative";
  species MG_429_MONOMER__c in c = 0; MG_429_MONOMER__c is "PTS system, E1";
  species MG_431_MONOMER__c in c = 1/c; MG_431_MONOMER__c is "triosephosphate isomerase";
  species MG_433_MONOMER__c in c = 0; MG_433_MONOMER__c is "translation elongation factor Ts";
  species MG_434_MONOMER__c in c = 3/c; MG_434_MONOMER__c is "uridylate kinase";
  species MG_437_MONOMER__m in m = 1/m; MG_437_MONOMER__m is "phosphatidate cytidylyltransferase";
  species MG_444_MONOMER__c in c = 140/c; MG_444_MONOMER__c is "ribosomal protein L19";
  species MG_445_MONOMER__c in c = 1/c; MG_445_MONOMER__c is "tRNA (guanine-N1)-methyltransferase";
  species MG_446_MONOMER__c in c = 109/c; MG_446_MONOMER__c is "ribosomal protein S16";
  species MG_451_MONOMER__c in c = 0; MG_451_MONOMER__c is "translation elongation factor Tu";
  species MG_453_MONOMER__c in c = 1/c; MG_453_MONOMER__c is "UTP-glucose-1-phosphate uridylyltransferase";
  species MG_454_MONOMER__c in c = 0; MG_454_MONOMER__c is "thiol-dependent peroxidase";
  species MG_455_MONOMER__c in c = 1/c; MG_455_MONOMER__c is "tyrosyl-tRNA synthetase";
  species MG_457_MONOMER__m in m = 4/m; MG_457_MONOMER__m is "ATP-dependent metalloprotease FtsH";
  species MG_458_MONOMER__c in c = 2/c; MG_458_MONOMER__c is "hypoxanthine phosphoribosyltransferase";
  species MG_460_MONOMER__c in c = 0; MG_460_MONOMER__c is "L-lactate dehydrogenase/malate dehydrogenase";
  species MG_464_MONOMER__m in m = 0; MG_464_MONOMER__m is "inner-membrane protein insertion factor";
  species MG_465_MONOMER__c in c = 11/c; MG_465_MONOMER__c is "ribonuclease P protein component";
  species MG_466_MONOMER__c in c = 134/c; MG_466_MONOMER__c is "ribosomal protein L34";
  species MG_467_MONOMER__c in c = 13/c; MG_467_MONOMER__c is "salivaricin A ABC transporter, ATP-binding protein";
  species MG_468_MONOMER__m in m = 1/m; MG_468_MONOMER__m is "salivaricin A ABC transporter, permease protein";
  species MG_526_MONOMER__c in c = 6/c; MG_526_MONOMER__c is "salivaricin A ABC transporter, ATP-binding protein";
  species MG_469_MONOMER__c in c = 0; MG_469_MONOMER__c is "chromosomal replication initiator protein DnaA";
  species MGrrnA16S__c in c = 0; MGrrnA16S__c is "16S ribosomal rRNA";
  species MGrrnA23S__c in c = 0; MGrrnA23S__c is "23S ribosomal rRNA";
  species MGrrnA5S__c in c = 29/c; MGrrnA5S__c is "5S ribosomal rRNA";
  species MG_0001__c in c = 0; MG_0001__c is "scRNA, signal recognition particle 4.5S RNA, MCS1";
  species MG_0003__c in c = 0; MG_0003__c is "Rnase P RNA, MCS5, M1 RNA";
  species DNA_GYRASE__c in c = 50/c; DNA_GYRASE__c is "DNA gyrase";
  species DNA_POLYMERASE_2CORE_BETA_CLAMP_GAMMA_COMPLEX_PRIMASE__c in c = 0; DNA_POLYMERASE_2CORE_BETA_CLAMP_GAMMA_COMPLEX_PRIMASE__c is "DNA polymerase (2) core, XX-clamp, XXX-complex, and primase";
  species DNA_POLYMERASE_CORE__c in c = 26/c; DNA_POLYMERASE_CORE__c is "DNA-directed DNA polymerase";
  species DNA_POLYMERASE_CORE_BETA_CLAMP_GAMMA_COMPLEX__c in c = 0; DNA_POLYMERASE_CORE_BETA_CLAMP_GAMMA_COMPLEX__c is "DNA polymerase core, beta-clamp, and gamma-complex";
  species DNA_POLYMERASE_CORE_BETA_CLAMP_PRIMASE__c in c = 0; DNA_POLYMERASE_CORE_BETA_CLAMP_PRIMASE__c is "DNA polymerase core, beta-clamp, and primase";
  species DNA_POLYMERASE_GAMMA_COMPLEX__c in c = 14/c; DNA_POLYMERASE_GAMMA_COMPLEX__c is "DNA-directed DNA polymerase gamma complex";
  species DNA_POLYMERASE_HOLOENZYME__c in c = 0; DNA_POLYMERASE_HOLOENZYME__c is "DNA-directed DNA polymerase holoenzyme";
  species MG_0001_048__c in c = 29/c; MG_0001_048__c is "signal recognition particle";
  species MG_0003_465__c in c = 25/c; MG_0003_465__c is "ribonuclease P";
  species MG_001_DIMER__c in c = 0; MG_001_DIMER__c is "DNA polymerase III, beta clamp";
  species MG_006_DIMER__c in c = 134/c; MG_006_DIMER__c is "thymidylate kinase";
  species MG_008_379_TETRAMER__c in c = 18/c; MG_008_379_TETRAMER__c is "tRNA uridine 5-carboxymethylaminomethyl modification enzyme";
  species MG_013_DIMER__c in c = 9/c; MG_013_DIMER__c is "methylenetetrahydrofolate dehydrogenase/methylenetetrahydrofolate cyclohydrolase";
  species MG_014_015_DIMER__m in m = 21/m; MG_014_015_DIMER__m is "multidrug ABC transporter";
  species MG_019_DIMER__c in c = 25/c; MG_019_DIMER__c is "chaperone protein DnaJ";
  species MG_023_DIMER__c in c = 127/c; MG_023_DIMER__c is "fructose-1,6-bisphosphate aldolase, class II";
  species MG_029_DIMER__c in c = 21/c; MG_029_DIMER__c is "DJ-1/PfpI family protein";
  species MG_030_TRIMER__c in c = 15/c; MG_030_TRIMER__c is "uracil phosphoribosyltransferase";
  species MG_033_TETRAMER__m in m = 16/m; MG_033_TETRAMER__m is "glycerol uptake facilitator";
  species MG_034_DIMER__c in c = 23/c; MG_034_DIMER__c is "thymidine kinase";
  species MG_038_TETRAMER__c in c = 15/c; MG_038_TETRAMER__c is "glycerol kinase";
  species MG_039_DIMER__c in c = 12/c; MG_039_DIMER__c is "FAD-dependent glycerol-3-phosphate dehydrogenase, putative";
  species MG_040_119_120_121_PENTAMER__m in m = 44/m; MG_040_119_120_121_PENTAMER__m is "Monosaccharide (riboside/galactoside) ABC transporter";
  species MG_041_062_429_PENTAMER__m in m = 17/m; MG_041_062_429_PENTAMER__m is "PTS system, fructose-specific";
  species MG_041_069_429_PENTAMER__m in m = 8/m; MG_041_069_429_PENTAMER__m is "PTS system, glucose-specific";
  species MG_042_043_044_045_PENTAMER__m in m = 18/m; MG_042_043_044_045_PENTAMER__m is "spermidine/putrescine (polyamine) ABC transporter";
  species MG_046_DIMER__c in c = 21/c; MG_046_DIMER__c is "metalloendopeptidase";
  species MG_047_TETRAMER__c in c = 13/c; MG_047_TETRAMER__c is "S-adenosylmethionine synthetase";
  species MG_049_HEXAMER__c in c = 21/c; MG_049_HEXAMER__c is "purine nucleoside phosphorylase";
  species MG_051_DIMER__c in c = 59/c; MG_051_DIMER__c is "pyrimidine-nucleoside phosphorylase";
  species MG_052_DIMER__c in c = 32/c; MG_052_DIMER__c is "cytidine deaminase";
  species MG_053_TRIMER__c in c = 23/c; MG_053_TRIMER__c is "phosphoglucomutase/phosphomannomutase, putative";
  species MG_055_170_277_464_476_20MER__m in m = 13/m; MG_055_170_277_464_476_20MER__m is "preprotein translocase";
  species MG_058_HEXAMER__c in c = 8/c; MG_058_HEXAMER__c is "ribose-phosphate pyrophosphokinase";
  species MG_063_DIMER__c in c = 20/c; MG_063_DIMER__c is "1-phosphofructokinase, putative";
  species MG_064_065_TETRAMER__m in m = 16/m; MG_064_065_TETRAMER__m is "ABC transporter";
  species MG_066_DIMER__c in c = 24/c; MG_066_DIMER__c is "transketolase";
  species MG_072_DIMER__c in c = 13/c; MG_072_DIMER__c is "preprotein translocase, SecA subunit";
  species MG_073_206_421_TETRAMER__c in c = 16/c; MG_073_206_421_TETRAMER__c is "DNA incision complex";
  species MG_077_078_079_080_321_PENTAMER__m in m = 7/m; MG_077_078_079_080_321_PENTAMER__m is "oligopeptide ABC transporter";
  species MG_084_TETRAMER__c in c = 18/c; MG_084_TETRAMER__c is "tRNA(Ile)-lysidine synthetase";
  species MG_085_HEXAMER__c in c = 14/c; MG_085_HEXAMER__c is "HPr(Ser) kinase/phosphatase";
  species MG_089_DIMER__c in c = 133/c; MG_089_DIMER__c is "translation elongation factor G";
  species MG_091_OCTAMER__c in c = 0; MG_091_OCTAMER__c is "single-strand binding protein family, octamer";
  species MG_091_TETRAMER__c in c = 65/c; MG_091_TETRAMER__c is "single-strand binding protein family, tetramer";
  species MG_094_HEXAMER__c in c = 36/c; MG_094_HEXAMER__c is "replicative DNA helicase";
  species MG_102_DIMER__c in c = 22/c; MG_102_DIMER__c is "thioredoxin-disulfide reductase";
  species MG_102_DIMER_ox__c in c = 0; MG_102_DIMER_ox__c is "oxidized thioredoxin-disulfide reductase";
  species MG_105_OCTAMER__c in c = 11/c; MG_105_OCTAMER__c is "putative DNA integrity scanning protein";
  species MG_106_DIMER__c in c = 22/c; MG_106_DIMER__c is "peptide deformylase";
  species MG_107_DIMER__c in c = 25/c; MG_107_DIMER__c is "guanylate kinase";
  species MG_109_DIMER__m in m = 34/m; MG_109_DIMER__m is "serine/threonine protein kinase, putative";
  species MG_111_DIMER__c in c = 18/c; MG_111_DIMER__c is "glucose-6-phosphate isomerase";
  species MG_112_DIMER__c in c = 19/c; MG_112_DIMER__c is "ribulose-phosphate 3-epimerase";
  species MG_114_DIMER__m in m = 19/m; MG_114_DIMER__m is "CDP-diacylglycerol--glycerol-3-phosphate 3-phosphatidyltransferase";
  species MG_118_DIMER__c in c = 12/c; MG_118_DIMER__c is "UDP-glucose 4-epimerase";
  species MG_123_DIMER__m in m = 11/m; MG_123_DIMER__m is "arginine deaminase";
  species MG_124_MONOMER_ox__c in c = 0; MG_124_MONOMER_ox__c is "oxidized thioredoxin";
  species MG_127_MONOMER_ox__c in c = 0; MG_127_MONOMER_ox__c is "oxidized Spx subfamily protein";
  species MG_128_HEXAMER__c in c = 9/c; MG_128_HEXAMER__c is "inorganic polyphosphate/ATP-NAD kinase, probable";
  species MG_132_DIMER__c in c = 14/c; MG_132_DIMER__c is "purine nucleoside phosphoramidase";
  species MG_137_DIMER__c in c = 25/c; MG_137_DIMER__c is "UDP-galactopyranose mutase";
  species MG_139_DIMER__c in c = 10/c; MG_139_DIMER__c is "ribonuclease J";
  species MG_179_180_181_TETRAMER__m in m = 14/m; MG_179_180_181_TETRAMER__m is "metal ion (cobalt) ABC transporter";
  species MG_182_DIMER__c in c = 13/c; MG_182_DIMER__c is "Pseudouridylate synthase";
  species MG_184_DIMER__c in c = 29/c; MG_184_DIMER__c is "adenine-specific DNA modification methylase";
  species MG_186_187_188_189_PENTAMER__m in m = 18/m; MG_186_187_188_189_PENTAMER__m is "Oligosaccharide or polyol ABC transporter";
  species MG_201_DIMER__c in c = 11/c; MG_201_DIMER__c is "co-chaperone GrpE";
  species MG_203_204_TETRAMER__c in c = 12/c; MG_203_204_TETRAMER__c is "topoisomerase IV";
  species MG_205_DIMER__c in c = 23/c; MG_205_DIMER__c is "heat-inducible transcription repressor HrcA, putative";
  species MG_208_DIMER__c in c = 24/c; MG_208_DIMER__c is "glycoprotease family protein";
  species MG_213_214_298_6MER__c in c = 5/c; MG_213_214_298_6MER__c is "chromosome segregation protein SMC";
  species MG_213_214_298_6MER_ADP__c in c = 81/c; MG_213_214_298_6MER_ADP__c is "Chromosome Segregation Protein SMC with SCP Proteins-ADP";
  species MG_215_TETRAMER__c in c = 18/c; MG_215_TETRAMER__c is "6-phosphofructokinase";
  species MG_216_TETRAMER__c in c = 19/c; MG_216_TETRAMER__c is "pyruvate kinase";
  species MG_221_OCTAMER__c in c = 12/c; MG_221_OCTAMER__c is "mraZ protein";
  species MG_224_2MER_GTP__c in c = 1/c; MG_224_2MER_GTP__c is "cell division protein ftsZ activated 2mer";
  species MG_224_3MER_GTP__c in c = 1/c; MG_224_3MER_GTP__c is "cell division protein ftsZ activated 3mer";
  species MG_224_4MER_GTP__c in c = 2/c; MG_224_4MER_GTP__c is "cell division protein ftsZ activated 4mer";
  species MG_224_5MER_GTP__c in c = 3/c; MG_224_5MER_GTP__c is "cell division protein ftsZ activated 5mer";
  species MG_224_6MER_GTP__c in c = 5/c; MG_224_6MER_GTP__c is "cell division protein ftsZ activated 6mer";
  species MG_224_7MER_GTP__c in c = 8/c; MG_224_7MER_GTP__c is "cell division protein ftsZ activated 7mer";
  species MG_224_8MER_GTP__c in c = 12/c; MG_224_8MER_GTP__c is "cell division protein ftsZ activated 8mer";
  species MG_224_9MER_GDP__c in c = 0; MG_224_9MER_GDP__c is "cell division protein ftsZ deactivated 9mer";
  species MG_224_9MER_GTP__c in c = 20/c; MG_224_9MER_GTP__c is "cell division protein ftsZ activated 9mer";
  species MG_224_MONOMER_GDP__c in c = 3/c; MG_224_MONOMER_GDP__c is "cell division protein ftsZ hydrolysed";
  species MG_224_MONOMER_GTP__c in c = 6/c; MG_224_MONOMER_GTP__c is "cell division protein ftsZ activated";
  species MG_225_DIMER__m in m = 15/m; MG_225_DIMER__m is "amino acid transporter";
  species MG_226_DIMER__m in m = 14/m; MG_226_DIMER__m is "amino acid transporter";
  species MG_227_DIMER__c in c = 22/c; MG_227_DIMER__c is "thymidylate synthase";
  species MG_228_TETRAMER__c in c = 15/c; MG_228_TETRAMER__c is "dihydrofolate reductase";
  species MG_229_231_TETRAMER__c in c = 30/c; MG_229_231_TETRAMER__c is "ribonucleoside-diphosphate reductase";
  species MG_229_231_TETRAMER_ox__c in c = 0; MG_229_231_TETRAMER_ox__c is "oxidized ribonucleoside-diphosphate reductase";
  species MG_239_HEXAMER__c in c = 14/c; MG_239_HEXAMER__c is "ATP-dependent protease La";
  species MG_240_HEXAMER__c in c = 13/c; MG_240_HEXAMER__c is "nicotinamide-nucleotide adenylyltransferase/conserved hypothetical protein";
  species MG_244_DIMER__c in c = 8/c; MG_244_DIMER__c is "3-5' helicase";
  species MG_252_DIMER__c in c = 9/c; MG_252_DIMER__c is "23S rRNA methyltransferase";
  species MG_259_TETRAMER__c in c = 48/c; MG_259_TETRAMER__c is "modification methylase";
  species MG_265_DIMER__c in c = 40/c; MG_265_DIMER__c is "sugar phosphatase";
  species MG_271_272_273_274_192MER__c in c = 11/c; MG_271_272_273_274_192MER__c is "pyruvate dehydrogenase";
  species MG_271_272_273_274_192MER_ox__c in c = 0; MG_271_272_273_274_192MER_ox__c is "oxidized dihydrolipoamide dehydrogenase";
  species MG_275_TETRAMER__m in m = 242/m; MG_275_TETRAMER__m is "NADH oxidase";
  species MG_276_DIMER__c in c = 24/c; MG_276_DIMER__c is "adenine phosphoribosyltransferase";
  species MG_278_DIMER__c in c = 16/c; MG_278_DIMER__c is "GTP pyrophosphokinase";
  species MG_287_MONOMER_ACP__c in c = 0; MG_287_MONOMER_ACP__c is "holo acyl carrier protein";
  species MG_287_MONOMER_ddcaACP__c in c = 0; MG_287_MONOMER_ddcaACP__c is "Dodecanoyl-ACP (n-C12:0ACP)";
  species MG_287_MONOMER_hdeACP__c in c = 0; MG_287_MONOMER_hdeACP__c is "cis-hexadec-9-enoyl-[acyl-carrier protein] (n-C16:1)";
  species MG_287_MONOMER_myrsACP__c in c = 0; MG_287_MONOMER_myrsACP__c is "Myristoyl-ACP (n-C14:0ACP)";
  species MG_287_MONOMER_ocdcaACP__c in c = 0; MG_287_MONOMER_ocdcaACP__c is "Octadecanoyl-ACP (n-C18:0ACP)";
  species MG_287_MONOMER_octeACP__c in c = 0; MG_287_MONOMER_octeACP__c is "cis-octadec-11-enoyl-[acyl-carrier protein] (n-C18:1)";
  species MG_287_MONOMER_palmACP__c in c = 0; MG_287_MONOMER_palmACP__c is "Palmitoyl-ACP (n-C16:0ACP)";
  species MG_287_MONOMER_tdeACP__c in c = 0; MG_287_MONOMER_tdeACP__c is "cis-tetradec-7-enoyl-[acyl-carrier protein] (n-C14:1)";
  species MG_289_290_291_PENTAMER__m in m = 15/m; MG_289_290_291_PENTAMER__m is "phosphonate ABC transporter";
  species MG_293_DIMER__c in c = 33/c; MG_293_DIMER__c is "glycerophosphoryl diester phosphodiesterase family protein";
  species MG_295_MONOMER_ox__c in c = 0; MG_295_MONOMER_ox__c is "oxidized tRNA U34 sulfurtransferase";
  species MG_299_DIMER__c in c = 22/c; MG_299_DIMER__c is "phosphate acetyltransferase";
  species MG_301_TETRAMER__c in c = 15/c; MG_301_TETRAMER__c is "glyceraldehyde-3-phosphate dehydrogenase, type I";
  species MG_302_303_304_TETRAMER__m in m = 16/m; MG_302_303_304_TETRAMER__m is "metal ion (cobalt) ABC transporter";
  species MG_316_DIMER__m in m = 21/m; MG_316_DIMER__m is "DNA internalization-related competence protein ComEC/Rec2";
  species MG_322_323_TETRAMER__m in m = 10/m; MG_322_323_TETRAMER__m is "potassium uptake protein, TrkH family, putative";
  species MG_333_DIMER__c in c = 15/c; MG_333_DIMER__c is "FMN-dependent NADH-azoreductase, putative";
  species MG_336_DIMER__c in c = 15/c; MG_336_DIMER__c is "cysteine desulfurase";
  species MG_346_DIMER__c in c = 13/c; MG_346_DIMER__c is "23S rRNA methyltransferase";
  species MG_347_DIMER__c in c = 11/c; MG_347_DIMER__c is "tRNA (guanine-N(7)-)-methyltransferase";
  species MG_349_HEXAMER__c in c = 13/c; MG_349_HEXAMER__c is "Replication initiation/membrane attachment protein";
  species MG_351_HEXAMER__c in c = 11/c; MG_351_HEXAMER__c is "inorganic pyrophosphatase";
  species MG_352_DIMER__c in c = 18/c; MG_352_DIMER__c is "Holliday junction endonuclease";
  species MG_353_DIMER__c in c = 16/c; MG_353_DIMER__c is "DNA-binding protein HU, putative";
  species MG_355_HEXAMER__c in c = 13/c; MG_355_HEXAMER__c is "ATP-dependent Clp protease, ATPase subunit";
  species MG_357_DIMER__c in c = 54/c; MG_357_DIMER__c is "acetate kinase";
  species MG_358_359_10MER__c in c = 13/c; MG_358_359_10MER__c is "Holliday junction DNA helicase";
  species MG_367_DIMER__c in c = 13/c; MG_367_DIMER__c is "ribonuclease III";
  species MG_368_DIMER__c in c = 14/c; MG_368_DIMER__c is "fatty acid/phospholipid synthesis protein PlsX";
  species MG_369_DIMER__c in c = 14/c; MG_369_DIMER__c is "DAK2 phosphatase domain protein";
  species MG_372_DIMER__c in c = 108/c; MG_372_DIMER__c is "thiamine biosynthesis/tRNA modification protein ThiI";
  species MG_376_HEXAMER__c in c = 16/c;
  species MG_382_TETRAMER__c in c = 10/c; MG_382_TETRAMER__c is "uridine kinase";
  species MG_383_DIMER__c in c = 16/c; MG_383_DIMER__c is "NH(3)-dependent NAD+ synthetase, putative";
  species MG_385_DIMER__c in c = 10/c; MG_385_DIMER__c is "glycerophosphoryl diester phosphodiesterase family protein";
  species MG_390_DIMER__m in m = 16/m; MG_390_DIMER__m is "toxin ABC transporter, ATP-binding/permease protein";
  species MG_391_HEXAMER__c in c = 35/c; MG_391_HEXAMER__c is "cytosol aminopeptidase";
  species MG_392_393_21MER__c in c = 13/c; MG_392_393_21MER__c is "GroEL-GroES chaperonin complex";
  species MG_394_TETRAMER__c in c = 14/c; MG_394_TETRAMER__c is "serine hydroxymethyltransferase";
  species MG_396_DIMER__c in c = 27/c; MG_396_DIMER__c is "ribose 5-phosphate isomerase B";
  species MG_398_399_400_401_402_403_404_405_22MER__m in m = 11/m; MG_398_399_400_401_402_403_404_405_22MER__m is "H(+)-transporting two-sector ATPase";
  species MG_407_DIMER__c in c = 34/c; MG_407_DIMER__c is "enolase";
  species MG_409_DIMER__c in c = 16/c; MG_409_DIMER__c is "phosphate transport system regulatory protein PhoU, putative";
  species MG_410_411_412_PENTAMER__m in m = 17/m; MG_410_411_412_PENTAMER__m is "phosphate ABC transporter";
  species MG_425_DIMER__c in c = 9/c; MG_425_DIMER__c is "ATP-dependent RNA helicase";
  species MG_427_DIMER__c in c = 17/c; MG_427_DIMER__c is "osmotically inducible peroxidase";
  species MG_427_DIMER_ox__c in c = 0; MG_427_DIMER_ox__c is "oxidized osmotically inducible peroxidase";
  species MG_428_DIMER__c in c = 10/c; MG_428_DIMER__c is "LuxR bacterial regulatory protein, putative";
  species MG_431_DIMER__c in c = 25/c; MG_431_DIMER__c is "triosephosphate isomerase";
  species MG_433_DIMER__c in c = 122/c; MG_433_DIMER__c is "translation elongation factor Ts";
  species MG_434_HEXAMER__c in c = 14/c; MG_434_HEXAMER__c is "uridylate kinase";
  species MG_437_DIMER__m in m = 13/m; MG_437_DIMER__m is "phosphatidate cytidylyltransferase";
  species MG_445_DIMER__c in c = 107/c; MG_445_DIMER__c is "tRNA (guanine-N1)-methyltransferase";
  species MG_451_DIMER__c in c = 139/c; MG_451_DIMER__c is "translation elongation factor Tu";
  species MG_453_TETRAMER__c in c = 9/c; MG_453_TETRAMER__c is "UTP-glucose-1-phosphate uridylyltransferase";
  species MG_454_DIMER__c in c = 29/c; MG_454_DIMER__c is "thiol-dependent peroxidase";
  species MG_454_DIMER_ox__c in c = 0; MG_454_DIMER_ox__c is "oxidized thiol-dependent peroxidase";
  species MG_457_HEXAMER__m in m = 70/m; MG_457_HEXAMER__m is "ATP-dependent metalloprotease FtsH";
  species MG_458_TETRAMER__c in c = 17/c; MG_458_TETRAMER__c is "hypoxanthine phosphoribosyltransferase";
  species MG_460_TETRAMER__c in c = 13/c; MG_460_TETRAMER__c is "L-lactate dehydrogenase/malate dehydrogenase";
  species MG_467_468_526_TETRAMER__m in m = 26/m; MG_467_468_526_TETRAMER__m is "salivaricin A ABC transporter";
  species MG_469_1MER_ADP__c in c = 0; MG_469_1MER_ADP__c is "DnaA-ADP";
  species MG_469_1MER_ATP__c in c = 25/c; MG_469_1MER_ATP__c is "DnaA-ATP";
  species MG_469_2MER_1ATP_ADP__c in c = 0; MG_469_2MER_1ATP_ADP__c is "DnaA 2mer-(1)ATP-(1)ADP";
  species MG_469_2MER_ATP__c in c = 0; MG_469_2MER_ATP__c is "DnaA-ATP 2mer";
  species MG_469_3MER_2ATP_ADP__c in c = 0; MG_469_3MER_2ATP_ADP__c is "DnaA 3mer-(2)ATP-(1)ADP";
  species MG_469_3MER_ATP__c in c = 0; MG_469_3MER_ATP__c is "DnaA-ATP 3mer";
  species MG_469_4MER_3ATP_ADP__c in c = 0; MG_469_4MER_3ATP_ADP__c is "DnaA 4mer-(3)ATP-(1)ADP";
  species MG_469_4MER_ATP__c in c = 0; MG_469_4MER_ATP__c is "DnaA-ATP 4mer";
  species MG_469_5MER_4ATP_ADP__c in c = 0; MG_469_5MER_4ATP_ADP__c is "DnaA 5mer-(4)ATP-(1)ADP";
  species MG_469_5MER_ATP__c in c = 0; MG_469_5MER_ATP__c is "DnaA-ATP 5mer";
  species MG_469_6MER_5ATP_ADP__c in c = 0; MG_469_6MER_5ATP_ADP__c is "DnaA 6mer-(5)ATP-(1)ADP";
  species MG_469_6MER_ATP__c in c = 0; MG_469_6MER_ATP__c is "DnaA-ATP 6mer";
  species MG_469_7MER_6ATP_ADP__c in c = 0; MG_469_7MER_6ATP_ADP__c is "DnaA 7mer-(6)ATP-(1)ADP";
  species MG_469_7MER_ATP__c in c = 4/c; MG_469_7MER_ATP__c is "DnaA-ATP 7mer";
  species MG_482_DIMER__c in c = 13/c; MG_482_DIMER__c is "holo-(acyl-carrier-protein) synthase";
  species REPLISOME__c in c = 0; REPLISOME__c is "Replisome";
  species RIBOSOME_30S__c in c = 25/c; RIBOSOME_30S__c is "30S ribosomal subunit";
  species RIBOSOME_30S_IF3__c in c = 0; RIBOSOME_30S_IF3__c is "30S ribosomal subunit - translation initiation factor IF-3 complex";
  species RIBOSOME_50S__c in c = 12/c; RIBOSOME_50S__c is "50S ribosomal subunit";
  species RIBOSOME_70S__c in c = 56/c; RIBOSOME_70S__c is "70S ribosome";
  species RNA_POLYMERASE__c in c = 40/c; RNA_POLYMERASE__c is "DNA-directed RNA polymerase";
  species RNA_POLYMERASE_HOLOENZYME__c in c = 0; RNA_POLYMERASE_HOLOENZYME__c is "DNA-directed RNA polymerase holoenzyme";

  // Parameters:
  k_tRnaAa_MG471 = 7.6;
  k_tRnaAa_MG472 = 4.2627;
  k_tRnaAa_MG475 = 7.6;
  k_tRnaAa_MG479 = 90;
  k_tRnaAa_MG483 = 141.9;
  k_tRnaAa_MG484 = 14;
  k_tRnaAa_MG485 = 3.2;
  k_tRnaAa_MG486 = 4.2627;
  k_tRnaAa_MG487 = 7.6;
  k_tRnaAa_MG488 = 10.8;
  k_tRnaAa_MG489 = 7.6;
  k_tRnaAa_MG490 = 5.4;
  k_tRnaAa_MG492 = 2.8;
  k_tRnaAa_MG493 = 7.6;
  k_tRnaAa_MG495 = 2.8;
  k_tRnaAa_MG496 = 7.6;
  k_tRnaAa_MG497 = 2.8;
  k_tRnaAa_MG499 = 7.6;
  k_tRnaAa_MG500 = 5.1;
  k_tRnaAa_MG501 = 7.6;
  k_tRnaAa_MG502 = 5.36;
  k_tRnaAa_MG503 = 0.74;
  k_tRnaAa_MG504 = 7.6;
  k_tRnaAa_MG506 = 7.6;
  k_tRnaAa_MG507 = 7.6;
  k_tRnaAa_MG508 = 5.1;
  k_tRnaAa_MG509 = 7.6;
  k_tRnaAa_MG510 = 90;
  k_tRnaAa_MG511 = 7.6;
  k_tRnaAa_MG512 = 90;
  k_tRnaAa_MG513 = 4.4;
  k_tRnaAa_MG514 = 27;
  k_tRnaAa_MG518 = 142;
  k_tRnaAa_MG519 = 5.1;
  k_tRnaAa_MG520 = 5.1;
  k_tRnaAa_MG523 = 2.8;

  // Reactions:
  Aminoacylation_MG471: MG471__c + ALA__c + ATP__c -> MG471_aa__c + AMP__c + PPI__c; k_tRnaAa_MG471*MG471__c*ALA__c*ATP__c*MG_292_TETRAMER__c*((1 + MG471__c*Aminoacylation_MG471_KM1^(-1))*(1 + ALA__c*Aminoacylation_MG471_KM2^(-1))*(1 + ATP__c*Aminoacylation_MG471_KM3^(-1)))^(-1); Aminoacylation_MG471 is "Aminoacylation (MG471)";  // modifiers: MG_292_TETRAMER__c
    Aminoacylation_MG471_KM1 = 1; Aminoacylation_MG471_KM2 = 1; Aminoacylation_MG471_KM3 = 1;
  Aminoacylation_MG472: MG472__c + ATP__c + ILE__c -> MG472_aa__c + AMP__c + PPI__c; k_tRnaAa_MG472*MG472__c*ATP__c*ILE__c*MG_345_MONOMER__c*((1 + MG472__c*Aminoacylation_MG472_KM1^(-1))*(1 + ATP__c*Aminoacylation_MG472_KM2^(-1))*(1 + ILE__c*Aminoacylation_MG472_KM3^(-1)))^(-1); Aminoacylation_MG472 is "Aminoacylation (MG472)";  // modifiers: MG_345_MONOMER__c
    Aminoacylation_MG472_KM1 = 1; Aminoacylation_MG472_KM2 = 1; Aminoacylation_MG472_KM3 = 1;
  Aminoacylation_MG475: MG475__c + ATP__c + SER__c -> MG475_aa__c + AMP__c + PPI__c; k_tRnaAa_MG475*MG475__c*ATP__c*SER__c*MG_005_DIMER__c*((1 + MG475__c*Aminoacylation_MG475_KM1^(-1))*(1 + ATP__c*Aminoacylation_MG475_KM2^(-1))*(1 + SER__c*Aminoacylation_MG475_KM3^(-1)))^(-1); Aminoacylation_MG475 is "Aminoacylation (MG475)";  // modifiers: MG_005_DIMER__c
    Aminoacylation_MG475_KM1 = 1; Aminoacylation_MG475_KM2 = 1; Aminoacylation_MG475_KM3 = 1;
  Aminoacylation_MG479: MG479__c + ATP__c + THR__c -> MG479_aa__c + AMP__c + PPI__c; k_tRnaAa_MG479*MG479__c*ATP__c*THR__c*MG_375_DIMER__c*((1 + MG479__c*Aminoacylation_MG479_KM1^(-1))*(1 + ATP__c*Aminoacylation_MG479_KM2^(-1))*(1 + THR__c*Aminoacylation_MG479_KM3^(-1)))^(-1); Aminoacylation_MG479 is "Aminoacylation (MG479)";  // modifiers: MG_375_DIMER__c
    Aminoacylation_MG479_KM1 = 1; Aminoacylation_MG479_KM2 = 1; Aminoacylation_MG479_KM3 = 1;
  Aminoacylation_MG483: MG483__c + ATP__c + CYS__c -> MG483_aa__c + AMP__c + PPI__c; k_tRnaAa_MG483*MG483__c*ATP__c*CYS__c*MG_253_MONOMER__c*((1 + MG483__c*Aminoacylation_MG483_KM1^(-1))*(1 + ATP__c*Aminoacylation_MG483_KM2^(-1))*(1 + CYS__c*Aminoacylation_MG483_KM3^(-1)))^(-1); Aminoacylation_MG483 is "Aminoacylation (MG483)";  // modifiers: MG_253_MONOMER__c
    Aminoacylation_MG483_KM1 = 1; Aminoacylation_MG483_KM2 = 1; Aminoacylation_MG483_KM3 = 1;
  Aminoacylation_MG484: MG484__c + ATP__c + PRO__c -> MG484_aa__c + AMP__c + PPI__c; k_tRnaAa_MG484*MG484__c*ATP__c*PRO__c*MG_283_DIMER__c*((1 + MG484__c*Aminoacylation_MG484_KM1^(-1))*(1 + ATP__c*Aminoacylation_MG484_KM2^(-1))*(1 + PRO__c*Aminoacylation_MG484_KM3^(-1)))^(-1); Aminoacylation_MG484 is "Aminoacylation (MG484)";  // modifiers: MG_283_DIMER__c
    Aminoacylation_MG484_KM1 = 1; Aminoacylation_MG484_KM2 = 1; Aminoacylation_MG484_KM3 = 1;
  Aminoacylation_MG485: MG485__c + ATP__c + MET__c -> MG485_aa__c + AMP__c + PPI__c; k_tRnaAa_MG485*MG485__c*ATP__c*MET__c*MG_021_DIMER__c*((1 + MG485__c*Aminoacylation_MG485_KM1^(-1))*(1 + ATP__c*Aminoacylation_MG485_KM2^(-1))*(1 + MET__c*Aminoacylation_MG485_KM3^(-1)))^(-1); Aminoacylation_MG485 is "Aminoacylation (MG485)";  // modifiers: MG_021_DIMER__c
    Aminoacylation_MG485_KM1 = 1; Aminoacylation_MG485_KM2 = 1; Aminoacylation_MG485_KM3 = 1;
  Aminoacylation_MG486: MG486__c + ATP__c + ILE__c -> MG486_aa__c + AMP__c + PPI__c; k_tRnaAa_MG486*MG486__c*ATP__c*ILE__c*MG_345_MONOMER__c*((1 + MG486__c*Aminoacylation_MG486_KM1^(-1))*(1 + ATP__c*Aminoacylation_MG486_KM2^(-1))*(1 + ILE__c*Aminoacylation_MG486_KM3^(-1)))^(-1); Aminoacylation_MG486 is "Aminoacylation (MG486)";  // modifiers: MG_345_MONOMER__c
    Aminoacylation_MG486_KM1 = 1; Aminoacylation_MG486_KM2 = 1; Aminoacylation_MG486_KM3 = 1;
  Aminoacylation_MG487: MG487__c + ATP__c + SER__c -> MG487_aa__c + AMP__c + PPI__c; k_tRnaAa_MG487*MG487__c*ATP__c*SER__c*MG_005_DIMER__c*((1 + MG487__c*Aminoacylation_MG487_KM1^(-1))*(1 + ATP__c*Aminoacylation_MG487_KM2^(-1))*(1 + SER__c*Aminoacylation_MG487_KM3^(-1)))^(-1); Aminoacylation_MG487 is "Aminoacylation (MG487)";  // modifiers: MG_005_DIMER__c
    Aminoacylation_MG487_KM1 = 1; Aminoacylation_MG487_KM2 = 1; Aminoacylation_MG487_KM3 = 1;
  Aminoacylation_MG488: MG488__c + ATP__c + FTHF10__c + MET__c -> MG488_aa__c + AMP__c + PPI__c + THF__c; k_tRnaAa_MG488*MG488__c*ATP__c*FTHF10__c*MET__c*MG_365_MONOMER__c*MG_021_DIMER__c*((1 + MG488__c*Aminoacylation_MG488_KM1^(-1))*(1 + ATP__c*Aminoacylation_MG488_KM2^(-1))*(1 + FTHF10__c*Aminoacylation_MG488_KM3^(-1))*(1 + MET__c*Aminoacylation_MG488_KM4^(-1)))^(-1); Aminoacylation_MG488 is "Aminoacylation (MG488)";  // modifiers: MG_365_MONOMER__c, MG_021_DIMER__c
    Aminoacylation_MG488_KM1 = 1; Aminoacylation_MG488_KM2 = 1; Aminoacylation_MG488_KM3 = 1; Aminoacylation_MG488_KM4 = 1;
  Aminoacylation_MG489: MG489__c + ASP__c + ATP__c -> MG489_aa__c + AMP__c + PPI__c; k_tRnaAa_MG489*MG489__c*ASP__c*ATP__c*MG_036_DIMER__c*((1 + MG489__c*Aminoacylation_MG489_KM1^(-1))*(1 + ASP__c*Aminoacylation_MG489_KM2^(-1))*(1 + ATP__c*Aminoacylation_MG489_KM3^(-1)))^(-1); Aminoacylation_MG489 is "Aminoacylation (MG489)";  // modifiers: MG_036_DIMER__c
    Aminoacylation_MG489_KM1 = 1; Aminoacylation_MG489_KM2 = 1; Aminoacylation_MG489_KM3 = 1;
  Aminoacylation_MG490: MG490__c + ATP__c + PHE__c -> MG490_aa__c + AMP__c + PPI__c; k_tRnaAa_MG490*MG490__c*ATP__c*PHE__c*MG_194_195_TETRAMER__c*((1 + MG490__c*Aminoacylation_MG490_KM1^(-1))*(1 + ATP__c*Aminoacylation_MG490_KM2^(-1))*(1 + PHE__c*Aminoacylation_MG490_KM3^(-1)))^(-1); Aminoacylation_MG490 is "Aminoacylation (MG490)";  // modifiers: MG_194_195_TETRAMER__c
    Aminoacylation_MG490_KM1 = 1; Aminoacylation_MG490_KM2 = 1; Aminoacylation_MG490_KM3 = 1;
  Aminoacylation_MG492: MG492__c + ARG__c + ATP__c -> MG492_aa__c + AMP__c + PPI__c; k_tRnaAa_MG492*MG492__c*ARG__c*ATP__c*MG_378_MONOMER__c*((1 + MG492__c*Aminoacylation_MG492_KM1^(-1))*(1 + ARG__c*Aminoacylation_MG492_KM2^(-1))*(1 + ATP__c*Aminoacylation_MG492_KM3^(-1)))^(-1); Aminoacylation_MG492 is "Aminoacylation (MG492)";  // modifiers: MG_378_MONOMER__c
    Aminoacylation_MG492_KM1 = 1; Aminoacylation_MG492_KM2 = 1; Aminoacylation_MG492_KM3 = 1;
  Aminoacylation_MG493: MG493__c + ATP__c + GLY__c -> MG493_aa__c + AMP__c + PPI__c; k_tRnaAa_MG493*MG493__c*ATP__c*GLY__c*MG_251_DIMER__c*((1 + MG493__c*Aminoacylation_MG493_KM1^(-1))*(1 + ATP__c*Aminoacylation_MG493_KM2^(-1))*(1 + GLY__c*Aminoacylation_MG493_KM3^(-1)))^(-1); Aminoacylation_MG493 is "Aminoacylation (MG493)";  // modifiers: MG_251_DIMER__c
    Aminoacylation_MG493_KM1 = 1; Aminoacylation_MG493_KM2 = 1; Aminoacylation_MG493_KM3 = 1;
  Aminoacylation_MG495: MG495__c + ARG__c + ATP__c -> MG495_aa__c + AMP__c + PPI__c; k_tRnaAa_MG495*MG495__c*ARG__c*ATP__c*MG_378_MONOMER__c*((1 + MG495__c*Aminoacylation_MG495_KM1^(-1))*(1 + ARG__c*Aminoacylation_MG495_KM2^(-1))*(1 + ATP__c*Aminoacylation_MG495_KM3^(-1)))^(-1); Aminoacylation_MG495 is "Aminoacylation (MG495)";  // modifiers: MG_378_MONOMER__c
    Aminoacylation_MG495_KM1 = 1; Aminoacylation_MG495_KM2 = 1; Aminoacylation_MG495_KM3 = 1;
  Aminoacylation_MG496: MG496__c + ATP__c + TRP__c -> MG496_aa__c + AMP__c + PPI__c; k_tRnaAa_MG496*MG496__c*ATP__c*TRP__c*MG_126_DIMER__c*((1 + MG496__c*Aminoacylation_MG496_KM1^(-1))*(1 + ATP__c*Aminoacylation_MG496_KM2^(-1))*(1 + TRP__c*Aminoacylation_MG496_KM3^(-1)))^(-1); Aminoacylation_MG496 is "Aminoacylation (MG496)";  // modifiers: MG_126_DIMER__c
    Aminoacylation_MG496_KM1 = 1; Aminoacylation_MG496_KM2 = 1; Aminoacylation_MG496_KM3 = 1;
  Aminoacylation_MG497: MG497__c + ARG__c + ATP__c -> MG497_aa__c + AMP__c + PPI__c; k_tRnaAa_MG497*MG497__c*ARG__c*ATP__c*MG_378_MONOMER__c*((1 + MG497__c*Aminoacylation_MG497_KM1^(-1))*(1 + ARG__c*Aminoacylation_MG497_KM2^(-1))*(1 + ATP__c*Aminoacylation_MG497_KM3^(-1)))^(-1); Aminoacylation_MG497 is "Aminoacylation (MG497)";  // modifiers: MG_378_MONOMER__c
    Aminoacylation_MG497_KM1 = 1; Aminoacylation_MG497_KM2 = 1; Aminoacylation_MG497_KM3 = 1;
  Aminoacylation_MG499: MG499__c + ATP__c + GLY__c -> MG499_aa__c + AMP__c + PPI__c; k_tRnaAa_MG499*MG499__c*ATP__c*GLY__c*MG_251_DIMER__c*((1 + MG499__c*Aminoacylation_MG499_KM1^(-1))*(1 + ATP__c*Aminoacylation_MG499_KM2^(-1))*(1 + GLY__c*Aminoacylation_MG499_KM3^(-1)))^(-1); Aminoacylation_MG499 is "Aminoacylation (MG499)";  // modifiers: MG_251_DIMER__c
    Aminoacylation_MG499_KM1 = 1; Aminoacylation_MG499_KM2 = 1; Aminoacylation_MG499_KM3 = 1;
  Aminoacylation_MG500: MG500__c + ATP__c + LEU__c -> MG500_aa__c + AMP__c + PPI__c; k_tRnaAa_MG500*MG500__c*ATP__c*LEU__c*MG_266_MONOMER__c*((1 + MG500__c*Aminoacylation_MG500_KM1^(-1))*(1 + ATP__c*Aminoacylation_MG500_KM2^(-1))*(1 + LEU__c*Aminoacylation_MG500_KM3^(-1)))^(-1); Aminoacylation_MG500 is "Aminoacylation (MG500)";  // modifiers: MG_266_MONOMER__c
    Aminoacylation_MG500_KM1 = 1; Aminoacylation_MG500_KM2 = 1; Aminoacylation_MG500_KM3 = 1;
  Aminoacylation_MG501: MG501__c + ATP__c + LYS__c -> MG501_aa__c + AMP__c + PPI__c; k_tRnaAa_MG501*MG501__c*ATP__c*LYS__c*MG_136_DIMER__c*((1 + MG501__c*Aminoacylation_MG501_KM1^(-1))*(1 + ATP__c*Aminoacylation_MG501_KM2^(-1))*(1 + LYS__c*Aminoacylation_MG501_KM3^(-1)))^(-1); Aminoacylation_MG501 is "Aminoacylation (MG501)";  // modifiers: MG_136_DIMER__c
    Aminoacylation_MG501_KM1 = 1; Aminoacylation_MG501_KM2 = 1; Aminoacylation_MG501_KM3 = 1;
  Aminoacylation_MG502: MG502__c + 2 ATP__c + H2O__c + GLN__c -> MG502_aa__c + ADP__c + AMP__c + H__c + PI__c + PPI__c; k_tRnaAa_MG502*MG502__c*ATP__c*H2O__c*GLN__c*MG_462_MONOMER__c*MG_098_099_100_TRIMER__c*((1 + MG502__c*Aminoacylation_MG502_KM1^(-1))*(1 + ATP__c*Aminoacylation_MG502_KM2^(-1))*(1 + H2O__c*Aminoacylation_MG502_KM3^(-1))*(1 + GLN__c*Aminoacylation_MG502_KM4^(-1)))^(-1); Aminoacylation_MG502 is "Aminoacylation (MG502)";  // modifiers: MG_462_MONOMER__c, MG_098_099_100_TRIMER__c
    Aminoacylation_MG502_KM1 = 1; Aminoacylation_MG502_KM2 = 1; Aminoacylation_MG502_KM3 = 1; Aminoacylation_MG502_KM4 = 1;
  Aminoacylation_MG503: MG503__c + ATP__c + TYR__c -> MG503_aa__c + AMP__c + PPI__c; k_tRnaAa_MG503*MG503__c*ATP__c*TYR__c*MG_455_DIMER__c*((1 + MG503__c*Aminoacylation_MG503_KM1^(-1))*(1 + ATP__c*Aminoacylation_MG503_KM2^(-1))*(1 + TYR__c*Aminoacylation_MG503_KM3^(-1)))^(-1); Aminoacylation_MG503 is "Aminoacylation (MG503)";  // modifiers: MG_455_DIMER__c
    Aminoacylation_MG503_KM1 = 1; Aminoacylation_MG503_KM2 = 1; Aminoacylation_MG503_KM3 = 1;
  Aminoacylation_MG504: MG504__c + ATP__c + TRP__c -> MG504_aa__c + AMP__c + PPI__c; k_tRnaAa_MG504*MG504__c*ATP__c*TRP__c*MG_126_DIMER__c*((1 + MG504__c*Aminoacylation_MG504_KM1^(-1))*(1 + ATP__c*Aminoacylation_MG504_KM2^(-1))*(1 + TRP__c*Aminoacylation_MG504_KM3^(-1)))^(-1); Aminoacylation_MG504 is "Aminoacylation (MG504)";  // modifiers: MG_126_DIMER__c
    Aminoacylation_MG504_KM1 = 1; Aminoacylation_MG504_KM2 = 1; Aminoacylation_MG504_KM3 = 1;
  Aminoacylation_MG506: MG506__c + ATP__c + SER__c -> MG506_aa__c + AMP__c + PPI__c; k_tRnaAa_MG506*MG506__c*ATP__c*SER__c*MG_005_DIMER__c*((1 + MG506__c*Aminoacylation_MG506_KM1^(-1))*(1 + ATP__c*Aminoacylation_MG506_KM2^(-1))*(1 + SER__c*Aminoacylation_MG506_KM3^(-1)))^(-1); Aminoacylation_MG506 is "Aminoacylation (MG506)";  // modifiers: MG_005_DIMER__c
    Aminoacylation_MG506_KM1 = 1; Aminoacylation_MG506_KM2 = 1; Aminoacylation_MG506_KM3 = 1;
  Aminoacylation_MG507: MG507__c + ATP__c + SER__c -> MG507_aa__c + AMP__c + PPI__c; k_tRnaAa_MG507*MG507__c*ATP__c*SER__c*MG_005_DIMER__c*((1 + MG507__c*Aminoacylation_MG507_KM1^(-1))*(1 + ATP__c*Aminoacylation_MG507_KM2^(-1))*(1 + SER__c*Aminoacylation_MG507_KM3^(-1)))^(-1); Aminoacylation_MG507 is "Aminoacylation (MG507)";  // modifiers: MG_005_DIMER__c
    Aminoacylation_MG507_KM1 = 1; Aminoacylation_MG507_KM2 = 1; Aminoacylation_MG507_KM3 = 1;
  Aminoacylation_MG508: MG508__c + ATP__c + LEU__c -> MG508_aa__c + AMP__c + PPI__c; k_tRnaAa_MG508*MG508__c*ATP__c*LEU__c*MG_266_MONOMER__c*((1 + MG508__c*Aminoacylation_MG508_KM1^(-1))*(1 + ATP__c*Aminoacylation_MG508_KM2^(-1))*(1 + LEU__c*Aminoacylation_MG508_KM3^(-1)))^(-1); Aminoacylation_MG508 is "Aminoacylation (MG508)";  // modifiers: MG_266_MONOMER__c
    Aminoacylation_MG508_KM1 = 1; Aminoacylation_MG508_KM2 = 1; Aminoacylation_MG508_KM3 = 1;
  Aminoacylation_MG509: MG509__c + ATP__c + LYS__c -> MG509_aa__c + AMP__c + PPI__c; k_tRnaAa_MG509*MG509__c*ATP__c*LYS__c*MG_136_DIMER__c*((1 + MG509__c*Aminoacylation_MG509_KM1^(-1))*(1 + ATP__c*Aminoacylation_MG509_KM2^(-1))*(1 + LYS__c*Aminoacylation_MG509_KM3^(-1)))^(-1); Aminoacylation_MG509 is "Aminoacylation (MG509)";  // modifiers: MG_136_DIMER__c
    Aminoacylation_MG509_KM1 = 1; Aminoacylation_MG509_KM2 = 1; Aminoacylation_MG509_KM3 = 1;
  Aminoacylation_MG510: MG510__c + ATP__c + THR__c -> MG510_aa__c + AMP__c + PPI__c; k_tRnaAa_MG510*MG510__c*ATP__c*THR__c*MG_375_DIMER__c*((1 + MG510__c*Aminoacylation_MG510_KM1^(-1))*(1 + ATP__c*Aminoacylation_MG510_KM2^(-1))*(1 + THR__c*Aminoacylation_MG510_KM3^(-1)))^(-1); Aminoacylation_MG510 is "Aminoacylation (MG510)";  // modifiers: MG_375_DIMER__c
    Aminoacylation_MG510_KM1 = 1; Aminoacylation_MG510_KM2 = 1; Aminoacylation_MG510_KM3 = 1;
  Aminoacylation_MG511: MG511__c + ATP__c + VAL__c -> MG511_aa__c + AMP__c + PPI__c; k_tRnaAa_MG511*MG511__c*ATP__c*VAL__c*MG_334_MONOMER__c*((1 + MG511__c*Aminoacylation_MG511_KM1^(-1))*(1 + ATP__c*Aminoacylation_MG511_KM2^(-1))*(1 + VAL__c*Aminoacylation_MG511_KM3^(-1)))^(-1); Aminoacylation_MG511 is "Aminoacylation (MG511)";  // modifiers: MG_334_MONOMER__c
    Aminoacylation_MG511_KM1 = 1; Aminoacylation_MG511_KM2 = 1; Aminoacylation_MG511_KM3 = 1;
  Aminoacylation_MG512: MG512__c + ATP__c + THR__c -> MG512_aa__c + AMP__c + PPI__c; k_tRnaAa_MG512*MG512__c*ATP__c*THR__c*MG_375_DIMER__c*((1 + MG512__c*Aminoacylation_MG512_KM1^(-1))*(1 + ATP__c*Aminoacylation_MG512_KM2^(-1))*(1 + THR__c*Aminoacylation_MG512_KM3^(-1)))^(-1); Aminoacylation_MG512 is "Aminoacylation (MG512)";  // modifiers: MG_375_DIMER__c
    Aminoacylation_MG512_KM1 = 1; Aminoacylation_MG512_KM2 = 1; Aminoacylation_MG512_KM3 = 1;
  Aminoacylation_MG513: MG513__c + ATP__c + GLU__c -> MG513_aa__c + AMP__c + PPI__c; k_tRnaAa_MG513*MG513__c*ATP__c*GLU__c*MG_462_MONOMER__c*((1 + MG513__c*Aminoacylation_MG513_KM1^(-1))*(1 + ATP__c*Aminoacylation_MG513_KM2^(-1))*(1 + GLU__c*Aminoacylation_MG513_KM3^(-1)))^(-1); Aminoacylation_MG513 is "Aminoacylation (MG513)";  // modifiers: MG_462_MONOMER__c
    Aminoacylation_MG513_KM1 = 1; Aminoacylation_MG513_KM2 = 1; Aminoacylation_MG513_KM3 = 1;
  Aminoacylation_MG514: MG514__c + ASN__c + ATP__c -> MG514_aa__c + AMP__c + PPI__c; k_tRnaAa_MG514*MG514__c*ASN__c*ATP__c*MG_113_DIMER__c*((1 + MG514__c*Aminoacylation_MG514_KM1^(-1))*(1 + ASN__c*Aminoacylation_MG514_KM2^(-1))*(1 + ATP__c*Aminoacylation_MG514_KM3^(-1)))^(-1); Aminoacylation_MG514 is "Aminoacylation (MG514)";  // modifiers: MG_113_DIMER__c
    Aminoacylation_MG514_KM1 = 1; Aminoacylation_MG514_KM2 = 1; Aminoacylation_MG514_KM3 = 1;
  Aminoacylation_MG518: MG518__c + ATP__c + HIS__c -> MG518_aa__c + AMP__c + PPI__c; k_tRnaAa_MG518*MG518__c*ATP__c*HIS__c*MG_035_DIMER__c*((1 + MG518__c*Aminoacylation_MG518_KM1^(-1))*(1 + ATP__c*Aminoacylation_MG518_KM2^(-1))*(1 + HIS__c*Aminoacylation_MG518_KM3^(-1)))^(-1); Aminoacylation_MG518 is "Aminoacylation (MG518)";  // modifiers: MG_035_DIMER__c
    Aminoacylation_MG518_KM1 = 1; Aminoacylation_MG518_KM2 = 1; Aminoacylation_MG518_KM3 = 1;
  Aminoacylation_MG519: MG519__c + ATP__c + LEU__c -> MG519_aa__c + AMP__c + PPI__c; k_tRnaAa_MG519*MG519__c*ATP__c*LEU__c*MG_266_MONOMER__c*((1 + MG519__c*Aminoacylation_MG519_KM1^(-1))*(1 + ATP__c*Aminoacylation_MG519_KM2^(-1))*(1 + LEU__c*Aminoacylation_MG519_KM3^(-1)))^(-1); Aminoacylation_MG519 is "Aminoacylation (MG519)";  // modifiers: MG_266_MONOMER__c
    Aminoacylation_MG519_KM1 = 1; Aminoacylation_MG519_KM2 = 1; Aminoacylation_MG519_KM3 = 1;
  Aminoacylation_MG520: MG520__c + ATP__c + LEU__c -> MG520_aa__c + AMP__c + PPI__c; k_tRnaAa_MG520*MG520__c*ATP__c*LEU__c*MG_266_MONOMER__c*((1 + MG520__c*Aminoacylation_MG520_KM1^(-1))*(1 + ATP__c*Aminoacylation_MG520_KM2^(-1))*(1 + LEU__c*Aminoacylation_MG520_KM3^(-1)))^(-1); Aminoacylation_MG520 is "Aminoacylation (MG520)";  // modifiers: MG_266_MONOMER__c
    Aminoacylation_MG520_KM1 = 1; Aminoacylation_MG520_KM2 = 1; Aminoacylation_MG520_KM3 = 1;
  Aminoacylation_MG523: MG523__c + ARG__c + ATP__c -> MG523_aa__c + AMP__c + PPI__c; k_tRnaAa_MG523*MG523__c*ARG__c*ATP__c*MG_378_MONOMER__c*((1 + MG523__c*Aminoacylation_MG523_KM1^(-1))*(1 + ARG__c*Aminoacylation_MG523_KM2^(-1))*(1 + ATP__c*Aminoacylation_MG523_KM3^(-1)))^(-1); Aminoacylation_MG523 is "Aminoacylation (MG523)";  // modifiers: MG_378_MONOMER__c
    Aminoacylation_MG523_KM1 = 1; Aminoacylation_MG523_KM2 = 1; Aminoacylation_MG523_KM3 = 1;
end
